# Small-system (8 atoms) LAMMPS ground truth for cross-validating exaStamp's new
# compute_descriptor_pod_global against real LAMMPS compute pod/global. Unlike pod/atom or
# podd/atom, this compute produces a GLOBAL ARRAY (not a per-atom quantity), which can't be
# exported with an ordinary `dump` command -- instead every element is printed explicitly via
# LAMMPS's immediate-variable c_ID[i][j] syntax. Rows/cols (25 x 32) are specific to this fixed
# 8-atom Ta_small system + Ta_param.pod (Mdesc=31, nl1=1, nelements=1 -> nCoeffAll=32,
# 1+3*8=25 rows) -- generated once (not a general-purpose loop) since both dimensions are fixed
# and known in advance for this test config, matching how other LAMMPS scripts in this test dir
# already hardcode config-specific values (e.g. in.pod_descriptors's element-name argument).

units       metal
atom_style  atomic
boundary    p p p

read_data   Ta_small.lmp

pair_style  zero 5.01
pair_coeff  * *

compute podg all pod/global Ta_param.pod Ta_coefficients.pod Ta

run         0

print "$(c_podg[1][1]:%.17g) $(c_podg[1][2]:%.17g) $(c_podg[1][3]:%.17g) $(c_podg[1][4]:%.17g) $(c_podg[1][5]:%.17g) $(c_podg[1][6]:%.17g) $(c_podg[1][7]:%.17g) $(c_podg[1][8]:%.17g) $(c_podg[1][9]:%.17g) $(c_podg[1][10]:%.17g) $(c_podg[1][11]:%.17g) $(c_podg[1][12]:%.17g) $(c_podg[1][13]:%.17g) $(c_podg[1][14]:%.17g) $(c_podg[1][15]:%.17g) $(c_podg[1][16]:%.17g) $(c_podg[1][17]:%.17g) $(c_podg[1][18]:%.17g) $(c_podg[1][19]:%.17g) $(c_podg[1][20]:%.17g) $(c_podg[1][21]:%.17g) $(c_podg[1][22]:%.17g) $(c_podg[1][23]:%.17g) $(c_podg[1][24]:%.17g) $(c_podg[1][25]:%.17g) $(c_podg[1][26]:%.17g) $(c_podg[1][27]:%.17g) $(c_podg[1][28]:%.17g) $(c_podg[1][29]:%.17g) $(c_podg[1][30]:%.17g) $(c_podg[1][31]:%.17g) $(c_podg[1][32]:%.17g)" screen no file lammps_pod_global_small.txt
print "$(c_podg[2][1]:%.17g) $(c_podg[2][2]:%.17g) $(c_podg[2][3]:%.17g) $(c_podg[2][4]:%.17g) $(c_podg[2][5]:%.17g) $(c_podg[2][6]:%.17g) $(c_podg[2][7]:%.17g) $(c_podg[2][8]:%.17g) $(c_podg[2][9]:%.17g) $(c_podg[2][10]:%.17g) $(c_podg[2][11]:%.17g) $(c_podg[2][12]:%.17g) $(c_podg[2][13]:%.17g) $(c_podg[2][14]:%.17g) $(c_podg[2][15]:%.17g) $(c_podg[2][16]:%.17g) $(c_podg[2][17]:%.17g) $(c_podg[2][18]:%.17g) $(c_podg[2][19]:%.17g) $(c_podg[2][20]:%.17g) $(c_podg[2][21]:%.17g) $(c_podg[2][22]:%.17g) $(c_podg[2][23]:%.17g) $(c_podg[2][24]:%.17g) $(c_podg[2][25]:%.17g) $(c_podg[2][26]:%.17g) $(c_podg[2][27]:%.17g) $(c_podg[2][28]:%.17g) $(c_podg[2][29]:%.17g) $(c_podg[2][30]:%.17g) $(c_podg[2][31]:%.17g) $(c_podg[2][32]:%.17g)" screen no append lammps_pod_global_small.txt
print "$(c_podg[3][1]:%.17g) $(c_podg[3][2]:%.17g) $(c_podg[3][3]:%.17g) $(c_podg[3][4]:%.17g) $(c_podg[3][5]:%.17g) $(c_podg[3][6]:%.17g) $(c_podg[3][7]:%.17g) $(c_podg[3][8]:%.17g) $(c_podg[3][9]:%.17g) $(c_podg[3][10]:%.17g) $(c_podg[3][11]:%.17g) $(c_podg[3][12]:%.17g) $(c_podg[3][13]:%.17g) $(c_podg[3][14]:%.17g) $(c_podg[3][15]:%.17g) $(c_podg[3][16]:%.17g) $(c_podg[3][17]:%.17g) $(c_podg[3][18]:%.17g) $(c_podg[3][19]:%.17g) $(c_podg[3][20]:%.17g) $(c_podg[3][21]:%.17g) $(c_podg[3][22]:%.17g) $(c_podg[3][23]:%.17g) $(c_podg[3][24]:%.17g) $(c_podg[3][25]:%.17g) $(c_podg[3][26]:%.17g) $(c_podg[3][27]:%.17g) $(c_podg[3][28]:%.17g) $(c_podg[3][29]:%.17g) $(c_podg[3][30]:%.17g) $(c_podg[3][31]:%.17g) $(c_podg[3][32]:%.17g)" screen no append lammps_pod_global_small.txt
print "$(c_podg[4][1]:%.17g) $(c_podg[4][2]:%.17g) $(c_podg[4][3]:%.17g) $(c_podg[4][4]:%.17g) $(c_podg[4][5]:%.17g) $(c_podg[4][6]:%.17g) $(c_podg[4][7]:%.17g) $(c_podg[4][8]:%.17g) $(c_podg[4][9]:%.17g) $(c_podg[4][10]:%.17g) $(c_podg[4][11]:%.17g) $(c_podg[4][12]:%.17g) $(c_podg[4][13]:%.17g) $(c_podg[4][14]:%.17g) $(c_podg[4][15]:%.17g) $(c_podg[4][16]:%.17g) $(c_podg[4][17]:%.17g) $(c_podg[4][18]:%.17g) $(c_podg[4][19]:%.17g) $(c_podg[4][20]:%.17g) $(c_podg[4][21]:%.17g) $(c_podg[4][22]:%.17g) $(c_podg[4][23]:%.17g) $(c_podg[4][24]:%.17g) $(c_podg[4][25]:%.17g) $(c_podg[4][26]:%.17g) $(c_podg[4][27]:%.17g) $(c_podg[4][28]:%.17g) $(c_podg[4][29]:%.17g) $(c_podg[4][30]:%.17g) $(c_podg[4][31]:%.17g) $(c_podg[4][32]:%.17g)" screen no append lammps_pod_global_small.txt
print "$(c_podg[5][1]:%.17g) $(c_podg[5][2]:%.17g) $(c_podg[5][3]:%.17g) $(c_podg[5][4]:%.17g) $(c_podg[5][5]:%.17g) $(c_podg[5][6]:%.17g) $(c_podg[5][7]:%.17g) $(c_podg[5][8]:%.17g) $(c_podg[5][9]:%.17g) $(c_podg[5][10]:%.17g) $(c_podg[5][11]:%.17g) $(c_podg[5][12]:%.17g) $(c_podg[5][13]:%.17g) $(c_podg[5][14]:%.17g) $(c_podg[5][15]:%.17g) $(c_podg[5][16]:%.17g) $(c_podg[5][17]:%.17g) $(c_podg[5][18]:%.17g) $(c_podg[5][19]:%.17g) $(c_podg[5][20]:%.17g) $(c_podg[5][21]:%.17g) $(c_podg[5][22]:%.17g) $(c_podg[5][23]:%.17g) $(c_podg[5][24]:%.17g) $(c_podg[5][25]:%.17g) $(c_podg[5][26]:%.17g) $(c_podg[5][27]:%.17g) $(c_podg[5][28]:%.17g) $(c_podg[5][29]:%.17g) $(c_podg[5][30]:%.17g) $(c_podg[5][31]:%.17g) $(c_podg[5][32]:%.17g)" screen no append lammps_pod_global_small.txt
print "$(c_podg[6][1]:%.17g) $(c_podg[6][2]:%.17g) $(c_podg[6][3]:%.17g) $(c_podg[6][4]:%.17g) $(c_podg[6][5]:%.17g) $(c_podg[6][6]:%.17g) $(c_podg[6][7]:%.17g) $(c_podg[6][8]:%.17g) $(c_podg[6][9]:%.17g) $(c_podg[6][10]:%.17g) $(c_podg[6][11]:%.17g) $(c_podg[6][12]:%.17g) $(c_podg[6][13]:%.17g) $(c_podg[6][14]:%.17g) $(c_podg[6][15]:%.17g) $(c_podg[6][16]:%.17g) $(c_podg[6][17]:%.17g) $(c_podg[6][18]:%.17g) $(c_podg[6][19]:%.17g) $(c_podg[6][20]:%.17g) $(c_podg[6][21]:%.17g) $(c_podg[6][22]:%.17g) $(c_podg[6][23]:%.17g) $(c_podg[6][24]:%.17g) $(c_podg[6][25]:%.17g) $(c_podg[6][26]:%.17g) $(c_podg[6][27]:%.17g) $(c_podg[6][28]:%.17g) $(c_podg[6][29]:%.17g) $(c_podg[6][30]:%.17g) $(c_podg[6][31]:%.17g) $(c_podg[6][32]:%.17g)" screen no append lammps_pod_global_small.txt
print "$(c_podg[7][1]:%.17g) $(c_podg[7][2]:%.17g) $(c_podg[7][3]:%.17g) $(c_podg[7][4]:%.17g) $(c_podg[7][5]:%.17g) $(c_podg[7][6]:%.17g) $(c_podg[7][7]:%.17g) $(c_podg[7][8]:%.17g) $(c_podg[7][9]:%.17g) $(c_podg[7][10]:%.17g) $(c_podg[7][11]:%.17g) $(c_podg[7][12]:%.17g) $(c_podg[7][13]:%.17g) $(c_podg[7][14]:%.17g) $(c_podg[7][15]:%.17g) $(c_podg[7][16]:%.17g) $(c_podg[7][17]:%.17g) $(c_podg[7][18]:%.17g) $(c_podg[7][19]:%.17g) $(c_podg[7][20]:%.17g) $(c_podg[7][21]:%.17g) $(c_podg[7][22]:%.17g) $(c_podg[7][23]:%.17g) $(c_podg[7][24]:%.17g) $(c_podg[7][25]:%.17g) $(c_podg[7][26]:%.17g) $(c_podg[7][27]:%.17g) $(c_podg[7][28]:%.17g) $(c_podg[7][29]:%.17g) $(c_podg[7][30]:%.17g) $(c_podg[7][31]:%.17g) $(c_podg[7][32]:%.17g)" screen no append lammps_pod_global_small.txt
print "$(c_podg[8][1]:%.17g) $(c_podg[8][2]:%.17g) $(c_podg[8][3]:%.17g) $(c_podg[8][4]:%.17g) $(c_podg[8][5]:%.17g) $(c_podg[8][6]:%.17g) $(c_podg[8][7]:%.17g) $(c_podg[8][8]:%.17g) $(c_podg[8][9]:%.17g) $(c_podg[8][10]:%.17g) $(c_podg[8][11]:%.17g) $(c_podg[8][12]:%.17g) $(c_podg[8][13]:%.17g) $(c_podg[8][14]:%.17g) $(c_podg[8][15]:%.17g) $(c_podg[8][16]:%.17g) $(c_podg[8][17]:%.17g) $(c_podg[8][18]:%.17g) $(c_podg[8][19]:%.17g) $(c_podg[8][20]:%.17g) $(c_podg[8][21]:%.17g) $(c_podg[8][22]:%.17g) $(c_podg[8][23]:%.17g) $(c_podg[8][24]:%.17g) $(c_podg[8][25]:%.17g) $(c_podg[8][26]:%.17g) $(c_podg[8][27]:%.17g) $(c_podg[8][28]:%.17g) $(c_podg[8][29]:%.17g) $(c_podg[8][30]:%.17g) $(c_podg[8][31]:%.17g) $(c_podg[8][32]:%.17g)" screen no append lammps_pod_global_small.txt
print "$(c_podg[9][1]:%.17g) $(c_podg[9][2]:%.17g) $(c_podg[9][3]:%.17g) $(c_podg[9][4]:%.17g) $(c_podg[9][5]:%.17g) $(c_podg[9][6]:%.17g) $(c_podg[9][7]:%.17g) $(c_podg[9][8]:%.17g) $(c_podg[9][9]:%.17g) $(c_podg[9][10]:%.17g) $(c_podg[9][11]:%.17g) $(c_podg[9][12]:%.17g) $(c_podg[9][13]:%.17g) $(c_podg[9][14]:%.17g) $(c_podg[9][15]:%.17g) $(c_podg[9][16]:%.17g) $(c_podg[9][17]:%.17g) $(c_podg[9][18]:%.17g) $(c_podg[9][19]:%.17g) $(c_podg[9][20]:%.17g) $(c_podg[9][21]:%.17g) $(c_podg[9][22]:%.17g) $(c_podg[9][23]:%.17g) $(c_podg[9][24]:%.17g) $(c_podg[9][25]:%.17g) $(c_podg[9][26]:%.17g) $(c_podg[9][27]:%.17g) $(c_podg[9][28]:%.17g) $(c_podg[9][29]:%.17g) $(c_podg[9][30]:%.17g) $(c_podg[9][31]:%.17g) $(c_podg[9][32]:%.17g)" screen no append lammps_pod_global_small.txt
print "$(c_podg[10][1]:%.17g) $(c_podg[10][2]:%.17g) $(c_podg[10][3]:%.17g) $(c_podg[10][4]:%.17g) $(c_podg[10][5]:%.17g) $(c_podg[10][6]:%.17g) $(c_podg[10][7]:%.17g) $(c_podg[10][8]:%.17g) $(c_podg[10][9]:%.17g) $(c_podg[10][10]:%.17g) $(c_podg[10][11]:%.17g) $(c_podg[10][12]:%.17g) $(c_podg[10][13]:%.17g) $(c_podg[10][14]:%.17g) $(c_podg[10][15]:%.17g) $(c_podg[10][16]:%.17g) $(c_podg[10][17]:%.17g) $(c_podg[10][18]:%.17g) $(c_podg[10][19]:%.17g) $(c_podg[10][20]:%.17g) $(c_podg[10][21]:%.17g) $(c_podg[10][22]:%.17g) $(c_podg[10][23]:%.17g) $(c_podg[10][24]:%.17g) $(c_podg[10][25]:%.17g) $(c_podg[10][26]:%.17g) $(c_podg[10][27]:%.17g) $(c_podg[10][28]:%.17g) $(c_podg[10][29]:%.17g) $(c_podg[10][30]:%.17g) $(c_podg[10][31]:%.17g) $(c_podg[10][32]:%.17g)" screen no append lammps_pod_global_small.txt
print "$(c_podg[11][1]:%.17g) $(c_podg[11][2]:%.17g) $(c_podg[11][3]:%.17g) $(c_podg[11][4]:%.17g) $(c_podg[11][5]:%.17g) $(c_podg[11][6]:%.17g) $(c_podg[11][7]:%.17g) $(c_podg[11][8]:%.17g) $(c_podg[11][9]:%.17g) $(c_podg[11][10]:%.17g) $(c_podg[11][11]:%.17g) $(c_podg[11][12]:%.17g) $(c_podg[11][13]:%.17g) $(c_podg[11][14]:%.17g) $(c_podg[11][15]:%.17g) $(c_podg[11][16]:%.17g) $(c_podg[11][17]:%.17g) $(c_podg[11][18]:%.17g) $(c_podg[11][19]:%.17g) $(c_podg[11][20]:%.17g) $(c_podg[11][21]:%.17g) $(c_podg[11][22]:%.17g) $(c_podg[11][23]:%.17g) $(c_podg[11][24]:%.17g) $(c_podg[11][25]:%.17g) $(c_podg[11][26]:%.17g) $(c_podg[11][27]:%.17g) $(c_podg[11][28]:%.17g) $(c_podg[11][29]:%.17g) $(c_podg[11][30]:%.17g) $(c_podg[11][31]:%.17g) $(c_podg[11][32]:%.17g)" screen no append lammps_pod_global_small.txt
print "$(c_podg[12][1]:%.17g) $(c_podg[12][2]:%.17g) $(c_podg[12][3]:%.17g) $(c_podg[12][4]:%.17g) $(c_podg[12][5]:%.17g) $(c_podg[12][6]:%.17g) $(c_podg[12][7]:%.17g) $(c_podg[12][8]:%.17g) $(c_podg[12][9]:%.17g) $(c_podg[12][10]:%.17g) $(c_podg[12][11]:%.17g) $(c_podg[12][12]:%.17g) $(c_podg[12][13]:%.17g) $(c_podg[12][14]:%.17g) $(c_podg[12][15]:%.17g) $(c_podg[12][16]:%.17g) $(c_podg[12][17]:%.17g) $(c_podg[12][18]:%.17g) $(c_podg[12][19]:%.17g) $(c_podg[12][20]:%.17g) $(c_podg[12][21]:%.17g) $(c_podg[12][22]:%.17g) $(c_podg[12][23]:%.17g) $(c_podg[12][24]:%.17g) $(c_podg[12][25]:%.17g) $(c_podg[12][26]:%.17g) $(c_podg[12][27]:%.17g) $(c_podg[12][28]:%.17g) $(c_podg[12][29]:%.17g) $(c_podg[12][30]:%.17g) $(c_podg[12][31]:%.17g) $(c_podg[12][32]:%.17g)" screen no append lammps_pod_global_small.txt
print "$(c_podg[13][1]:%.17g) $(c_podg[13][2]:%.17g) $(c_podg[13][3]:%.17g) $(c_podg[13][4]:%.17g) $(c_podg[13][5]:%.17g) $(c_podg[13][6]:%.17g) $(c_podg[13][7]:%.17g) $(c_podg[13][8]:%.17g) $(c_podg[13][9]:%.17g) $(c_podg[13][10]:%.17g) $(c_podg[13][11]:%.17g) $(c_podg[13][12]:%.17g) $(c_podg[13][13]:%.17g) $(c_podg[13][14]:%.17g) $(c_podg[13][15]:%.17g) $(c_podg[13][16]:%.17g) $(c_podg[13][17]:%.17g) $(c_podg[13][18]:%.17g) $(c_podg[13][19]:%.17g) $(c_podg[13][20]:%.17g) $(c_podg[13][21]:%.17g) $(c_podg[13][22]:%.17g) $(c_podg[13][23]:%.17g) $(c_podg[13][24]:%.17g) $(c_podg[13][25]:%.17g) $(c_podg[13][26]:%.17g) $(c_podg[13][27]:%.17g) $(c_podg[13][28]:%.17g) $(c_podg[13][29]:%.17g) $(c_podg[13][30]:%.17g) $(c_podg[13][31]:%.17g) $(c_podg[13][32]:%.17g)" screen no append lammps_pod_global_small.txt
print "$(c_podg[14][1]:%.17g) $(c_podg[14][2]:%.17g) $(c_podg[14][3]:%.17g) $(c_podg[14][4]:%.17g) $(c_podg[14][5]:%.17g) $(c_podg[14][6]:%.17g) $(c_podg[14][7]:%.17g) $(c_podg[14][8]:%.17g) $(c_podg[14][9]:%.17g) $(c_podg[14][10]:%.17g) $(c_podg[14][11]:%.17g) $(c_podg[14][12]:%.17g) $(c_podg[14][13]:%.17g) $(c_podg[14][14]:%.17g) $(c_podg[14][15]:%.17g) $(c_podg[14][16]:%.17g) $(c_podg[14][17]:%.17g) $(c_podg[14][18]:%.17g) $(c_podg[14][19]:%.17g) $(c_podg[14][20]:%.17g) $(c_podg[14][21]:%.17g) $(c_podg[14][22]:%.17g) $(c_podg[14][23]:%.17g) $(c_podg[14][24]:%.17g) $(c_podg[14][25]:%.17g) $(c_podg[14][26]:%.17g) $(c_podg[14][27]:%.17g) $(c_podg[14][28]:%.17g) $(c_podg[14][29]:%.17g) $(c_podg[14][30]:%.17g) $(c_podg[14][31]:%.17g) $(c_podg[14][32]:%.17g)" screen no append lammps_pod_global_small.txt
print "$(c_podg[15][1]:%.17g) $(c_podg[15][2]:%.17g) $(c_podg[15][3]:%.17g) $(c_podg[15][4]:%.17g) $(c_podg[15][5]:%.17g) $(c_podg[15][6]:%.17g) $(c_podg[15][7]:%.17g) $(c_podg[15][8]:%.17g) $(c_podg[15][9]:%.17g) $(c_podg[15][10]:%.17g) $(c_podg[15][11]:%.17g) $(c_podg[15][12]:%.17g) $(c_podg[15][13]:%.17g) $(c_podg[15][14]:%.17g) $(c_podg[15][15]:%.17g) $(c_podg[15][16]:%.17g) $(c_podg[15][17]:%.17g) $(c_podg[15][18]:%.17g) $(c_podg[15][19]:%.17g) $(c_podg[15][20]:%.17g) $(c_podg[15][21]:%.17g) $(c_podg[15][22]:%.17g) $(c_podg[15][23]:%.17g) $(c_podg[15][24]:%.17g) $(c_podg[15][25]:%.17g) $(c_podg[15][26]:%.17g) $(c_podg[15][27]:%.17g) $(c_podg[15][28]:%.17g) $(c_podg[15][29]:%.17g) $(c_podg[15][30]:%.17g) $(c_podg[15][31]:%.17g) $(c_podg[15][32]:%.17g)" screen no append lammps_pod_global_small.txt
print "$(c_podg[16][1]:%.17g) $(c_podg[16][2]:%.17g) $(c_podg[16][3]:%.17g) $(c_podg[16][4]:%.17g) $(c_podg[16][5]:%.17g) $(c_podg[16][6]:%.17g) $(c_podg[16][7]:%.17g) $(c_podg[16][8]:%.17g) $(c_podg[16][9]:%.17g) $(c_podg[16][10]:%.17g) $(c_podg[16][11]:%.17g) $(c_podg[16][12]:%.17g) $(c_podg[16][13]:%.17g) $(c_podg[16][14]:%.17g) $(c_podg[16][15]:%.17g) $(c_podg[16][16]:%.17g) $(c_podg[16][17]:%.17g) $(c_podg[16][18]:%.17g) $(c_podg[16][19]:%.17g) $(c_podg[16][20]:%.17g) $(c_podg[16][21]:%.17g) $(c_podg[16][22]:%.17g) $(c_podg[16][23]:%.17g) $(c_podg[16][24]:%.17g) $(c_podg[16][25]:%.17g) $(c_podg[16][26]:%.17g) $(c_podg[16][27]:%.17g) $(c_podg[16][28]:%.17g) $(c_podg[16][29]:%.17g) $(c_podg[16][30]:%.17g) $(c_podg[16][31]:%.17g) $(c_podg[16][32]:%.17g)" screen no append lammps_pod_global_small.txt
print "$(c_podg[17][1]:%.17g) $(c_podg[17][2]:%.17g) $(c_podg[17][3]:%.17g) $(c_podg[17][4]:%.17g) $(c_podg[17][5]:%.17g) $(c_podg[17][6]:%.17g) $(c_podg[17][7]:%.17g) $(c_podg[17][8]:%.17g) $(c_podg[17][9]:%.17g) $(c_podg[17][10]:%.17g) $(c_podg[17][11]:%.17g) $(c_podg[17][12]:%.17g) $(c_podg[17][13]:%.17g) $(c_podg[17][14]:%.17g) $(c_podg[17][15]:%.17g) $(c_podg[17][16]:%.17g) $(c_podg[17][17]:%.17g) $(c_podg[17][18]:%.17g) $(c_podg[17][19]:%.17g) $(c_podg[17][20]:%.17g) $(c_podg[17][21]:%.17g) $(c_podg[17][22]:%.17g) $(c_podg[17][23]:%.17g) $(c_podg[17][24]:%.17g) $(c_podg[17][25]:%.17g) $(c_podg[17][26]:%.17g) $(c_podg[17][27]:%.17g) $(c_podg[17][28]:%.17g) $(c_podg[17][29]:%.17g) $(c_podg[17][30]:%.17g) $(c_podg[17][31]:%.17g) $(c_podg[17][32]:%.17g)" screen no append lammps_pod_global_small.txt
print "$(c_podg[18][1]:%.17g) $(c_podg[18][2]:%.17g) $(c_podg[18][3]:%.17g) $(c_podg[18][4]:%.17g) $(c_podg[18][5]:%.17g) $(c_podg[18][6]:%.17g) $(c_podg[18][7]:%.17g) $(c_podg[18][8]:%.17g) $(c_podg[18][9]:%.17g) $(c_podg[18][10]:%.17g) $(c_podg[18][11]:%.17g) $(c_podg[18][12]:%.17g) $(c_podg[18][13]:%.17g) $(c_podg[18][14]:%.17g) $(c_podg[18][15]:%.17g) $(c_podg[18][16]:%.17g) $(c_podg[18][17]:%.17g) $(c_podg[18][18]:%.17g) $(c_podg[18][19]:%.17g) $(c_podg[18][20]:%.17g) $(c_podg[18][21]:%.17g) $(c_podg[18][22]:%.17g) $(c_podg[18][23]:%.17g) $(c_podg[18][24]:%.17g) $(c_podg[18][25]:%.17g) $(c_podg[18][26]:%.17g) $(c_podg[18][27]:%.17g) $(c_podg[18][28]:%.17g) $(c_podg[18][29]:%.17g) $(c_podg[18][30]:%.17g) $(c_podg[18][31]:%.17g) $(c_podg[18][32]:%.17g)" screen no append lammps_pod_global_small.txt
print "$(c_podg[19][1]:%.17g) $(c_podg[19][2]:%.17g) $(c_podg[19][3]:%.17g) $(c_podg[19][4]:%.17g) $(c_podg[19][5]:%.17g) $(c_podg[19][6]:%.17g) $(c_podg[19][7]:%.17g) $(c_podg[19][8]:%.17g) $(c_podg[19][9]:%.17g) $(c_podg[19][10]:%.17g) $(c_podg[19][11]:%.17g) $(c_podg[19][12]:%.17g) $(c_podg[19][13]:%.17g) $(c_podg[19][14]:%.17g) $(c_podg[19][15]:%.17g) $(c_podg[19][16]:%.17g) $(c_podg[19][17]:%.17g) $(c_podg[19][18]:%.17g) $(c_podg[19][19]:%.17g) $(c_podg[19][20]:%.17g) $(c_podg[19][21]:%.17g) $(c_podg[19][22]:%.17g) $(c_podg[19][23]:%.17g) $(c_podg[19][24]:%.17g) $(c_podg[19][25]:%.17g) $(c_podg[19][26]:%.17g) $(c_podg[19][27]:%.17g) $(c_podg[19][28]:%.17g) $(c_podg[19][29]:%.17g) $(c_podg[19][30]:%.17g) $(c_podg[19][31]:%.17g) $(c_podg[19][32]:%.17g)" screen no append lammps_pod_global_small.txt
print "$(c_podg[20][1]:%.17g) $(c_podg[20][2]:%.17g) $(c_podg[20][3]:%.17g) $(c_podg[20][4]:%.17g) $(c_podg[20][5]:%.17g) $(c_podg[20][6]:%.17g) $(c_podg[20][7]:%.17g) $(c_podg[20][8]:%.17g) $(c_podg[20][9]:%.17g) $(c_podg[20][10]:%.17g) $(c_podg[20][11]:%.17g) $(c_podg[20][12]:%.17g) $(c_podg[20][13]:%.17g) $(c_podg[20][14]:%.17g) $(c_podg[20][15]:%.17g) $(c_podg[20][16]:%.17g) $(c_podg[20][17]:%.17g) $(c_podg[20][18]:%.17g) $(c_podg[20][19]:%.17g) $(c_podg[20][20]:%.17g) $(c_podg[20][21]:%.17g) $(c_podg[20][22]:%.17g) $(c_podg[20][23]:%.17g) $(c_podg[20][24]:%.17g) $(c_podg[20][25]:%.17g) $(c_podg[20][26]:%.17g) $(c_podg[20][27]:%.17g) $(c_podg[20][28]:%.17g) $(c_podg[20][29]:%.17g) $(c_podg[20][30]:%.17g) $(c_podg[20][31]:%.17g) $(c_podg[20][32]:%.17g)" screen no append lammps_pod_global_small.txt
print "$(c_podg[21][1]:%.17g) $(c_podg[21][2]:%.17g) $(c_podg[21][3]:%.17g) $(c_podg[21][4]:%.17g) $(c_podg[21][5]:%.17g) $(c_podg[21][6]:%.17g) $(c_podg[21][7]:%.17g) $(c_podg[21][8]:%.17g) $(c_podg[21][9]:%.17g) $(c_podg[21][10]:%.17g) $(c_podg[21][11]:%.17g) $(c_podg[21][12]:%.17g) $(c_podg[21][13]:%.17g) $(c_podg[21][14]:%.17g) $(c_podg[21][15]:%.17g) $(c_podg[21][16]:%.17g) $(c_podg[21][17]:%.17g) $(c_podg[21][18]:%.17g) $(c_podg[21][19]:%.17g) $(c_podg[21][20]:%.17g) $(c_podg[21][21]:%.17g) $(c_podg[21][22]:%.17g) $(c_podg[21][23]:%.17g) $(c_podg[21][24]:%.17g) $(c_podg[21][25]:%.17g) $(c_podg[21][26]:%.17g) $(c_podg[21][27]:%.17g) $(c_podg[21][28]:%.17g) $(c_podg[21][29]:%.17g) $(c_podg[21][30]:%.17g) $(c_podg[21][31]:%.17g) $(c_podg[21][32]:%.17g)" screen no append lammps_pod_global_small.txt
print "$(c_podg[22][1]:%.17g) $(c_podg[22][2]:%.17g) $(c_podg[22][3]:%.17g) $(c_podg[22][4]:%.17g) $(c_podg[22][5]:%.17g) $(c_podg[22][6]:%.17g) $(c_podg[22][7]:%.17g) $(c_podg[22][8]:%.17g) $(c_podg[22][9]:%.17g) $(c_podg[22][10]:%.17g) $(c_podg[22][11]:%.17g) $(c_podg[22][12]:%.17g) $(c_podg[22][13]:%.17g) $(c_podg[22][14]:%.17g) $(c_podg[22][15]:%.17g) $(c_podg[22][16]:%.17g) $(c_podg[22][17]:%.17g) $(c_podg[22][18]:%.17g) $(c_podg[22][19]:%.17g) $(c_podg[22][20]:%.17g) $(c_podg[22][21]:%.17g) $(c_podg[22][22]:%.17g) $(c_podg[22][23]:%.17g) $(c_podg[22][24]:%.17g) $(c_podg[22][25]:%.17g) $(c_podg[22][26]:%.17g) $(c_podg[22][27]:%.17g) $(c_podg[22][28]:%.17g) $(c_podg[22][29]:%.17g) $(c_podg[22][30]:%.17g) $(c_podg[22][31]:%.17g) $(c_podg[22][32]:%.17g)" screen no append lammps_pod_global_small.txt
print "$(c_podg[23][1]:%.17g) $(c_podg[23][2]:%.17g) $(c_podg[23][3]:%.17g) $(c_podg[23][4]:%.17g) $(c_podg[23][5]:%.17g) $(c_podg[23][6]:%.17g) $(c_podg[23][7]:%.17g) $(c_podg[23][8]:%.17g) $(c_podg[23][9]:%.17g) $(c_podg[23][10]:%.17g) $(c_podg[23][11]:%.17g) $(c_podg[23][12]:%.17g) $(c_podg[23][13]:%.17g) $(c_podg[23][14]:%.17g) $(c_podg[23][15]:%.17g) $(c_podg[23][16]:%.17g) $(c_podg[23][17]:%.17g) $(c_podg[23][18]:%.17g) $(c_podg[23][19]:%.17g) $(c_podg[23][20]:%.17g) $(c_podg[23][21]:%.17g) $(c_podg[23][22]:%.17g) $(c_podg[23][23]:%.17g) $(c_podg[23][24]:%.17g) $(c_podg[23][25]:%.17g) $(c_podg[23][26]:%.17g) $(c_podg[23][27]:%.17g) $(c_podg[23][28]:%.17g) $(c_podg[23][29]:%.17g) $(c_podg[23][30]:%.17g) $(c_podg[23][31]:%.17g) $(c_podg[23][32]:%.17g)" screen no append lammps_pod_global_small.txt
print "$(c_podg[24][1]:%.17g) $(c_podg[24][2]:%.17g) $(c_podg[24][3]:%.17g) $(c_podg[24][4]:%.17g) $(c_podg[24][5]:%.17g) $(c_podg[24][6]:%.17g) $(c_podg[24][7]:%.17g) $(c_podg[24][8]:%.17g) $(c_podg[24][9]:%.17g) $(c_podg[24][10]:%.17g) $(c_podg[24][11]:%.17g) $(c_podg[24][12]:%.17g) $(c_podg[24][13]:%.17g) $(c_podg[24][14]:%.17g) $(c_podg[24][15]:%.17g) $(c_podg[24][16]:%.17g) $(c_podg[24][17]:%.17g) $(c_podg[24][18]:%.17g) $(c_podg[24][19]:%.17g) $(c_podg[24][20]:%.17g) $(c_podg[24][21]:%.17g) $(c_podg[24][22]:%.17g) $(c_podg[24][23]:%.17g) $(c_podg[24][24]:%.17g) $(c_podg[24][25]:%.17g) $(c_podg[24][26]:%.17g) $(c_podg[24][27]:%.17g) $(c_podg[24][28]:%.17g) $(c_podg[24][29]:%.17g) $(c_podg[24][30]:%.17g) $(c_podg[24][31]:%.17g) $(c_podg[24][32]:%.17g)" screen no append lammps_pod_global_small.txt
print "$(c_podg[25][1]:%.17g) $(c_podg[25][2]:%.17g) $(c_podg[25][3]:%.17g) $(c_podg[25][4]:%.17g) $(c_podg[25][5]:%.17g) $(c_podg[25][6]:%.17g) $(c_podg[25][7]:%.17g) $(c_podg[25][8]:%.17g) $(c_podg[25][9]:%.17g) $(c_podg[25][10]:%.17g) $(c_podg[25][11]:%.17g) $(c_podg[25][12]:%.17g) $(c_podg[25][13]:%.17g) $(c_podg[25][14]:%.17g) $(c_podg[25][15]:%.17g) $(c_podg[25][16]:%.17g) $(c_podg[25][17]:%.17g) $(c_podg[25][18]:%.17g) $(c_podg[25][19]:%.17g) $(c_podg[25][20]:%.17g) $(c_podg[25][21]:%.17g) $(c_podg[25][22]:%.17g) $(c_podg[25][23]:%.17g) $(c_podg[25][24]:%.17g) $(c_podg[25][25]:%.17g) $(c_podg[25][26]:%.17g) $(c_podg[25][27]:%.17g) $(c_podg[25][28]:%.17g) $(c_podg[25][29]:%.17g) $(c_podg[25][30]:%.17g) $(c_podg[25][31]:%.17g) $(c_podg[25][32]:%.17g)" screen no append lammps_pod_global_small.txt
