# 2-atom A-B LAMMPS ground truth for compute_descriptor_pod_global multi-species (nelements=2)
# verification -- 7 rows (1+3*2), 176 cols (nCoeffPerElement=88 * nelements=2), no label column.

units       metal
atom_style  atomic
boundary    p p p

read_data   AB_pair.lmp

pair_style  zero 5.01
pair_coeff  * *

compute podg all pod/global AB_param.pod AB_coefficients.pod A B

run         0

print "$(c_podg[1][1]:%.17g) $(c_podg[1][2]:%.17g) $(c_podg[1][3]:%.17g) $(c_podg[1][4]:%.17g) $(c_podg[1][5]:%.17g) $(c_podg[1][6]:%.17g) $(c_podg[1][7]:%.17g) $(c_podg[1][8]:%.17g) $(c_podg[1][9]:%.17g) $(c_podg[1][10]:%.17g) $(c_podg[1][11]:%.17g) $(c_podg[1][12]:%.17g) $(c_podg[1][13]:%.17g) $(c_podg[1][14]:%.17g) $(c_podg[1][15]:%.17g) $(c_podg[1][16]:%.17g) $(c_podg[1][17]:%.17g) $(c_podg[1][18]:%.17g) $(c_podg[1][19]:%.17g) $(c_podg[1][20]:%.17g) $(c_podg[1][21]:%.17g) $(c_podg[1][22]:%.17g) $(c_podg[1][23]:%.17g) $(c_podg[1][24]:%.17g) $(c_podg[1][25]:%.17g) $(c_podg[1][26]:%.17g) $(c_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
print "$(c_podg[2][1]:%.17g) $(c_podg[2][2]:%.17g) $(c_podg[2][3]:%.17g) $(c_podg[2][4]:%.17g) $(c_podg[2][5]:%.17g) $(c_podg[2][6]:%.17g) $(c_podg[2][7]:%.17g) $(c_podg[2][8]:%.17g) $(c_podg[2][9]:%.17g) $(c_podg[2][10]:%.17g) $(c_podg[2][11]:%.17g) $(c_podg[2][12]:%.17g) $(c_podg[2][13]:%.17g) $(c_podg[2][14]:%.17g) $(c_podg[2][15]:%.17g) $(c_podg[2][16]:%.17g) $(c_podg[2][17]:%.17g) $(c_podg[2][18]:%.17g) $(c_podg[2][19]:%.17g) $(c_podg[2][20]:%.17g) $(c_podg[2][21]:%.17g) $(c_podg[2][22]:%.17g) $(c_podg[2][23]:%.17g) $(c_podg[2][24]:%.17g) $(c_podg[2][25]:%.17g) $(c_podg[2][26]:%.17g) $(c_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
print "$(c_podg[3][1]:%.17g) $(c_podg[3][2]:%.17g) $(c_podg[3][3]:%.17g) $(c_podg[3][4]:%.17g) $(c_podg[3][5]:%.17g) $(c_podg[3][6]:%.17g) $(c_podg[3][7]:%.17g) $(c_podg[3][8]:%.17g) $(c_podg[3][9]:%.17g) $(c_podg[3][10]:%.17g) $(c_podg[3][11]:%.17g) $(c_podg[3][12]:%.17g) $(c_podg[3][13]:%.17g) $(c_podg[3][14]:%.17g) $(c_podg[3][15]:%.17g) $(c_podg[3][16]:%.17g) $(c_podg[3][17]:%.17g) $(c_podg[3][18]:%.17g) $(c_podg[3][19]:%.17g) $(c_podg[3][20]:%.17g) $(c_podg[3][21]:%.17g) $(c_podg[3][22]:%.17g) $(c_podg[3][23]:%.17g) $(c_podg[3][24]:%.17g) $(c_podg[3][25]:%.17g) $(c_podg[3][26]:%.17g) $(c_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
print "$(c_podg[4][1]:%.17g) $(c_podg[4][2]:%.17g) $(c_podg[4][3]:%.17g) $(c_podg[4][4]:%.17g) $(c_podg[4][5]:%.17g) $(c_podg[4][6]:%.17g) $(c_podg[4][7]:%.17g) $(c_podg[4][8]:%.17g) $(c_podg[4][9]:%.17g) $(c_podg[4][10]:%.17g) $(c_podg[4][11]:%.17g) $(c_podg[4][12]:%.17g) $(c_podg[4][13]:%.17g) $(c_podg[4][14]:%.17g) $(c_podg[4][15]:%.17g) $(c_podg[4][16]:%.17g) $(c_podg[4][17]:%.17g) $(c_podg[4][18]:%.17g) $(c_podg[4][19]:%.17g) $(c_podg[4][20]:%.17g) $(c_podg[4][21]:%.17g) $(c_podg[4][22]:%.17g) $(c_podg[4][23]:%.17g) $(c_podg[4][24]:%.17g) $(c_podg[4][25]:%.17g) $(c_podg[4][26]:%.17g) $(c_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
print "$(c_podg[5][1]:%.17g) $(c_podg[5][2]:%.17g) $(c_podg[5][3]:%.17g) $(c_podg[5][4]:%.17g) $(c_podg[5][5]:%.17g) $(c_podg[5][6]:%.17g) $(c_podg[5][7]:%.17g) $(c_podg[5][8]:%.17g) $(c_podg[5][9]:%.17g) $(c_podg[5][10]:%.17g) $(c_podg[5][11]:%.17g) $(c_podg[5][12]:%.17g) $(c_podg[5][13]:%.17g) $(c_podg[5][14]:%.17g) $(c_podg[5][15]:%.17g) $(c_podg[5][16]:%.17g) $(c_podg[5][17]:%.17g) $(c_podg[5][18]:%.17g) $(c_podg[5][19]:%.17g) $(c_podg[5][20]:%.17g) $(c_podg[5][21]:%.17g) $(c_podg[5][22]:%.17g) $(c_podg[5][23]:%.17g) $(c_podg[5][24]:%.17g) $(c_podg[5][25]:%.17g) $(c_podg[5][26]:%.17g) $(c_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
print "$(c_podg[6][1]:%.17g) $(c_podg[6][2]:%.17g) $(c_podg[6][3]:%.17g) $(c_podg[6][4]:%.17g) $(c_podg[6][5]:%.17g) $(c_podg[6][6]:%.17g) $(c_podg[6][7]:%.17g) $(c_podg[6][8]:%.17g) $(c_podg[6][9]:%.17g) $(c_podg[6][10]:%.17g) $(c_podg[6][11]:%.17g) $(c_podg[6][12]:%.17g) $(c_podg[6][13]:%.17g) $(c_podg[6][14]:%.17g) $(c_podg[6][15]:%.17g) $(c_podg[6][16]:%.17g) $(c_podg[6][17]:%.17g) $(c_podg[6][18]:%.17g) $(c_podg[6][19]:%.17g) $(c_podg[6][20]:%.17g) $(c_podg[6][21]:%.17g) $(c_podg[6][22]:%.17g) $(c_podg[6][23]:%.17g) $(c_podg[6][24]:%.17g) $(c_podg[6][25]:%.17g) $(c_podg[6][26]:%.17g) $(c_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
print "$(c_podg[7][1]:%.17g) $(c_podg[7][2]:%.17g) $(c_podg[7][3]:%.17g) $(c_podg[7][4]:%.17g) $(c_podg[7][5]:%.17g) $(c_podg[7][6]:%.17g) $(c_podg[7][7]:%.17g) $(c_podg[7][8]:%.17g) $(c_podg[7][9]:%.17g) $(c_podg[7][10]:%.17g) $(c_podg[7][11]:%.17g) $(c_podg[7][12]:%.17g) $(c_podg[7][13]:%.17g) $(c_podg[7][14]:%.17g) $(c_podg[7][15]:%.17g) $(c_podg[7][16]:%.17g) $(c_podg[7][17]:%.17g) $(c_podg[7][18]:%.17g) $(c_podg[7][19]:%.17g) $(c_podg[7][20]:%.17g) $(c_podg[7][21]:%.17g) $(c_podg[7][22]:%.17g) $(c_podg[7][23]:%.17g) $(c_podg[7][24]:%.17g) $(c_podg[7][25]:%.17g) $(c_podg[7][26]:%.17g) $(c_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
