# Small (8-atom) In/P LAMMPS ground truth for cross-validating exaStamp's compute_descriptor_snap_global
# chem_flag=true (multi-element bispectrum) support against real LAMMPS compute snap. Rows/cols
# (31 x 481) are specific to this fixed 8-atom InP_small system + InP_JCPA2020 param/coeff
# (ncoeff=240 per type -- SNA's own chem_flag=true bispectrum-component count for twojmax=6,
# nelements=2, NOT the coeff file's "241" header value, which includes an extra per-element
# linear-regression intercept term compute snap doesn't output -- ntypes=2 -> 480 cols + 1
# trailing reference-label column = 481; 1+3*8+6=31 rows).

units       metal
atom_style  atomic
boundary    p p p

read_data   InP_small.lmp

pair_style  zero 8.5
pair_coeff  * *

variable    rcutfac  equal 1.0
variable    rfac0    equal 0.99363
variable    twojmax  equal 6
variable    radelem1 equal 3.81205
variable    radelem2 equal 3.82945
variable    wj1      equal 1.0
variable    wj2      equal 0.929316

compute snapg all snap ${rcutfac} ${rfac0} ${twojmax} ${radelem1} ${radelem2} ${wj1} ${wj2} rmin0 0.0 bzeroflag 1 quadraticflag 0 chem 2 0 1 bnormflag 1 wselfallflag 1

run         0

print "$(c_snapg[1][1]:%.17g) $(c_snapg[1][2]:%.17g) $(c_snapg[1][3]:%.17g) $(c_snapg[1][4]:%.17g) $(c_snapg[1][5]:%.17g) $(c_snapg[1][6]:%.17g) $(c_snapg[1][7]:%.17g) $(c_snapg[1][8]:%.17g) $(c_snapg[1][9]:%.17g) $(c_snapg[1][10]:%.17g) $(c_snapg[1][11]:%.17g) $(c_snapg[1][12]:%.17g) $(c_snapg[1][13]:%.17g) $(c_snapg[1][14]:%.17g) $(c_snapg[1][15]:%.17g) $(c_snapg[1][16]:%.17g) $(c_snapg[1][17]:%.17g) $(c_snapg[1][18]:%.17g) $(c_snapg[1][19]:%.17g) $(c_snapg[1][20]:%.17g) $(c_snapg[1][21]:%.17g) $(c_snapg[1][22]:%.17g) $(c_snapg[1][23]:%.17g) $(c_snapg[1][24]:%.17g) $(c_snapg[1][25]:%.17g) $(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
print "$(c_snapg[2][1]:%.17g) $(c_snapg[2][2]:%.17g) $(c_snapg[2][3]:%.17g) $(c_snapg[2][4]:%.17g) $(c_snapg[2][5]:%.17g) $(c_snapg[2][6]:%.17g) $(c_snapg[2][7]:%.17g) $(c_snapg[2][8]:%.17g) $(c_snapg[2][9]:%.17g) $(c_snapg[2][10]:%.17g) $(c_snapg[2][11]:%.17g) $(c_snapg[2][12]:%.17g) $(c_snapg[2][13]:%.17g) $(c_snapg[2][14]:%.17g) $(c_snapg[2][15]:%.17g) $(c_snapg[2][16]:%.17g) $(c_snapg[2][17]:%.17g) $(c_snapg[2][18]:%.17g) $(c_snapg[2][19]:%.17g) $(c_snapg[2][20]:%.17g) $(c_snapg[2][21]:%.17g) $(c_snapg[2][22]:%.17g) $(c_snapg[2][23]:%.17g) $(c_snapg[2][24]:%.17g) $(c_snapg[2][25]:%.17g) $(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
print "$(c_snapg[3][1]:%.17g) $(c_snapg[3][2]:%.17g) $(c_snapg[3][3]:%.17g) $(c_snapg[3][4]:%.17g) $(c_snapg[3][5]:%.17g) $(c_snapg[3][6]:%.17g) $(c_snapg[3][7]:%.17g) $(c_snapg[3][8]:%.17g) $(c_snapg[3][9]:%.17g) $(c_snapg[3][10]:%.17g) $(c_snapg[3][11]:%.17g) $(c_snapg[3][12]:%.17g) $(c_snapg[3][13]:%.17g) $(c_snapg[3][14]:%.17g) $(c_snapg[3][15]:%.17g) $(c_snapg[3][16]:%.17g) $(c_snapg[3][17]:%.17g) $(c_snapg[3][18]:%.17g) $(c_snapg[3][19]:%.17g) $(c_snapg[3][20]:%.17g) $(c_snapg[3][21]:%.17g) $(c_snapg[3][22]:%.17g) $(c_snapg[3][23]:%.17g) $(c_snapg[3][24]:%.17g) $(c_snapg[3][25]:%.17g) $(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
print "$(c_snapg[4][1]:%.17g) $(c_snapg[4][2]:%.17g) $(c_snapg[4][3]:%.17g) $(c_snapg[4][4]:%.17g) $(c_snapg[4][5]:%.17g) $(c_snapg[4][6]:%.17g) $(c_snapg[4][7]:%.17g) $(c_snapg[4][8]:%.17g) $(c_snapg[4][9]:%.17g) $(c_snapg[4][10]:%.17g) $(c_snapg[4][11]:%.17g) $(c_snapg[4][12]:%.17g) $(c_snapg[4][13]:%.17g) $(c_snapg[4][14]:%.17g) $(c_snapg[4][15]:%.17g) $(c_snapg[4][16]:%.17g) $(c_snapg[4][17]:%.17g) $(c_snapg[4][18]:%.17g) $(c_snapg[4][19]:%.17g) $(c_snapg[4][20]:%.17g) $(c_snapg[4][21]:%.17g) $(c_snapg[4][22]:%.17g) $(c_snapg[4][23]:%.17g) $(c_snapg[4][24]:%.17g) $(c_snapg[4][25]:%.17g) $(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
print "$(c_snapg[5][1]:%.17g) $(c_snapg[5][2]:%.17g) $(c_snapg[5][3]:%.17g) $(c_snapg[5][4]:%.17g) $(c_snapg[5][5]:%.17g) $(c_snapg[5][6]:%.17g) $(c_snapg[5][7]:%.17g) $(c_snapg[5][8]:%.17g) $(c_snapg[5][9]:%.17g) $(c_snapg[5][10]:%.17g) $(c_snapg[5][11]:%.17g) $(c_snapg[5][12]:%.17g) $(c_snapg[5][13]:%.17g) $(c_snapg[5][14]:%.17g) $(c_snapg[5][15]:%.17g) $(c_snapg[5][16]:%.17g) $(c_snapg[5][17]:%.17g) $(c_snapg[5][18]:%.17g) $(c_snapg[5][19]:%.17g) $(c_snapg[5][20]:%.17g) $(c_snapg[5][21]:%.17g) $(c_snapg[5][22]:%.17g) $(c_snapg[5][23]:%.17g) $(c_snapg[5][24]:%.17g) $(c_snapg[5][25]:%.17g) $(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
print "$(c_snapg[6][1]:%.17g) $(c_snapg[6][2]:%.17g) $(c_snapg[6][3]:%.17g) $(c_snapg[6][4]:%.17g) $(c_snapg[6][5]:%.17g) $(c_snapg[6][6]:%.17g) $(c_snapg[6][7]:%.17g) $(c_snapg[6][8]:%.17g) $(c_snapg[6][9]:%.17g) $(c_snapg[6][10]:%.17g) $(c_snapg[6][11]:%.17g) $(c_snapg[6][12]:%.17g) $(c_snapg[6][13]:%.17g) $(c_snapg[6][14]:%.17g) $(c_snapg[6][15]:%.17g) $(c_snapg[6][16]:%.17g) $(c_snapg[6][17]:%.17g) $(c_snapg[6][18]:%.17g) $(c_snapg[6][19]:%.17g) $(c_snapg[6][20]:%.17g) $(c_snapg[6][21]:%.17g) $(c_snapg[6][22]:%.17g) $(c_snapg[6][23]:%.17g) $(c_snapg[6][24]:%.17g) $(c_snapg[6][25]:%.17g) $(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
print "$(c_snapg[7][1]:%.17g) $(c_snapg[7][2]:%.17g) $(c_snapg[7][3]:%.17g) $(c_snapg[7][4]:%.17g) $(c_snapg[7][5]:%.17g) $(c_snapg[7][6]:%.17g) $(c_snapg[7][7]:%.17g) $(c_snapg[7][8]:%.17g) $(c_snapg[7][9]:%.17g) $(c_snapg[7][10]:%.17g) $(c_snapg[7][11]:%.17g) $(c_snapg[7][12]:%.17g) $(c_snapg[7][13]:%.17g) $(c_snapg[7][14]:%.17g) $(c_snapg[7][15]:%.17g) $(c_snapg[7][16]:%.17g) $(c_snapg[7][17]:%.17g) $(c_snapg[7][18]:%.17g) $(c_snapg[7][19]:%.17g) $(c_snapg[7][20]:%.17g) $(c_snapg[7][21]:%.17g) $(c_snapg[7][22]:%.17g) $(c_snapg[7][23]:%.17g) $(c_snapg[7][24]:%.17g) $(c_snapg[7][25]:%.17g) $(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
print "$(c_snapg[8][1]:%.17g) $(c_snapg[8][2]:%.17g) $(c_snapg[8][3]:%.17g) $(c_snapg[8][4]:%.17g) $(c_snapg[8][5]:%.17g) $(c_snapg[8][6]:%.17g) $(c_snapg[8][7]:%.17g) $(c_snapg[8][8]:%.17g) $(c_snapg[8][9]:%.17g) $(c_snapg[8][10]:%.17g) $(c_snapg[8][11]:%.17g) $(c_snapg[8][12]:%.17g) $(c_snapg[8][13]:%.17g) $(c_snapg[8][14]:%.17g) $(c_snapg[8][15]:%.17g) $(c_snapg[8][16]:%.17g) $(c_snapg[8][17]:%.17g) $(c_snapg[8][18]:%.17g) $(c_snapg[8][19]:%.17g) $(c_snapg[8][20]:%.17g) $(c_snapg[8][21]:%.17g) $(c_snapg[8][22]:%.17g) $(c_snapg[8][23]:%.17g) $(c_snapg[8][24]:%.17g) $(c_snapg[8][25]:%.17g) $(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
print "$(c_snapg[9][1]:%.17g) $(c_snapg[9][2]:%.17g) $(c_snapg[9][3]:%.17g) $(c_snapg[9][4]:%.17g) $(c_snapg[9][5]:%.17g) $(c_snapg[9][6]:%.17g) $(c_snapg[9][7]:%.17g) $(c_snapg[9][8]:%.17g) $(c_snapg[9][9]:%.17g) $(c_snapg[9][10]:%.17g) $(c_snapg[9][11]:%.17g) $(c_snapg[9][12]:%.17g) $(c_snapg[9][13]:%.17g) $(c_snapg[9][14]:%.17g) $(c_snapg[9][15]:%.17g) $(c_snapg[9][16]:%.17g) $(c_snapg[9][17]:%.17g) $(c_snapg[9][18]:%.17g) $(c_snapg[9][19]:%.17g) $(c_snapg[9][20]:%.17g) $(c_snapg[9][21]:%.17g) $(c_snapg[9][22]:%.17g) $(c_snapg[9][23]:%.17g) $(c_snapg[9][24]:%.17g) $(c_snapg[9][25]:%.17g) $(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
print "$(c_snapg[10][1]:%.17g) $(c_snapg[10][2]:%.17g) $(c_snapg[10][3]:%.17g) $(c_snapg[10][4]:%.17g) $(c_snapg[10][5]:%.17g) $(c_snapg[10][6]:%.17g) $(c_snapg[10][7]:%.17g) $(c_snapg[10][8]:%.17g) $(c_snapg[10][9]:%.17g) $(c_snapg[10][10]:%.17g) $(c_snapg[10][11]:%.17g) $(c_snapg[10][12]:%.17g) $(c_snapg[10][13]:%.17g) $(c_snapg[10][14]:%.17g) $(c_snapg[10][15]:%.17g) $(c_snapg[10][16]:%.17g) $(c_snapg[10][17]:%.17g) $(c_snapg[10][18]:%.17g) $(c_snapg[10][19]:%.17g) $(c_snapg[10][20]:%.17g) $(c_snapg[10][21]:%.17g) $(c_snapg[10][22]:%.17g) $(c_snapg[10][23]:%.17g) $(c_snapg[10][24]:%.17g) $(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
print "$(c_snapg[11][1]:%.17g) $(c_snapg[11][2]:%.17g) $(c_snapg[11][3]:%.17g) $(c_snapg[11][4]:%.17g) $(c_snapg[11][5]:%.17g) $(c_snapg[11][6]:%.17g) $(c_snapg[11][7]:%.17g) $(c_snapg[11][8]:%.17g) $(c_snapg[11][9]:%.17g) $(c_snapg[11][10]:%.17g) $(c_snapg[11][11]:%.17g) $(c_snapg[11][12]:%.17g) $(c_snapg[11][13]:%.17g) $(c_snapg[11][14]:%.17g) $(c_snapg[11][15]:%.17g) $(c_snapg[11][16]:%.17g) $(c_snapg[11][17]:%.17g) $(c_snapg[11][18]:%.17g) $(c_snapg[11][19]:%.17g) $(c_snapg[11][20]:%.17g) $(c_snapg[11][21]:%.17g) $(c_snapg[11][22]:%.17g) $(c_snapg[11][23]:%.17g) $(c_snapg[11][24]:%.17g) $(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
print "$(c_snapg[12][1]:%.17g) $(c_snapg[12][2]:%.17g) $(c_snapg[12][3]:%.17g) $(c_snapg[12][4]:%.17g) $(c_snapg[12][5]:%.17g) $(c_snapg[12][6]:%.17g) $(c_snapg[12][7]:%.17g) $(c_snapg[12][8]:%.17g) $(c_snapg[12][9]:%.17g) $(c_snapg[12][10]:%.17g) $(c_snapg[12][11]:%.17g) $(c_snapg[12][12]:%.17g) $(c_snapg[12][13]:%.17g) $(c_snapg[12][14]:%.17g) $(c_snapg[12][15]:%.17g) $(c_snapg[12][16]:%.17g) $(c_snapg[12][17]:%.17g) $(c_snapg[12][18]:%.17g) $(c_snapg[12][19]:%.17g) $(c_snapg[12][20]:%.17g) $(c_snapg[12][21]:%.17g) $(c_snapg[12][22]:%.17g) $(c_snapg[12][23]:%.17g) $(c_snapg[12][24]:%.17g) $(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
print "$(c_snapg[13][1]:%.17g) $(c_snapg[13][2]:%.17g) $(c_snapg[13][3]:%.17g) $(c_snapg[13][4]:%.17g) $(c_snapg[13][5]:%.17g) $(c_snapg[13][6]:%.17g) $(c_snapg[13][7]:%.17g) $(c_snapg[13][8]:%.17g) $(c_snapg[13][9]:%.17g) $(c_snapg[13][10]:%.17g) $(c_snapg[13][11]:%.17g) $(c_snapg[13][12]:%.17g) $(c_snapg[13][13]:%.17g) $(c_snapg[13][14]:%.17g) $(c_snapg[13][15]:%.17g) $(c_snapg[13][16]:%.17g) $(c_snapg[13][17]:%.17g) $(c_snapg[13][18]:%.17g) $(c_snapg[13][19]:%.17g) $(c_snapg[13][20]:%.17g) $(c_snapg[13][21]:%.17g) $(c_snapg[13][22]:%.17g) $(c_snapg[13][23]:%.17g) $(c_snapg[13][24]:%.17g) $(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
print "$(c_snapg[14][1]:%.17g) $(c_snapg[14][2]:%.17g) $(c_snapg[14][3]:%.17g) $(c_snapg[14][4]:%.17g) $(c_snapg[14][5]:%.17g) $(c_snapg[14][6]:%.17g) $(c_snapg[14][7]:%.17g) $(c_snapg[14][8]:%.17g) $(c_snapg[14][9]:%.17g) $(c_snapg[14][10]:%.17g) $(c_snapg[14][11]:%.17g) $(c_snapg[14][12]:%.17g) $(c_snapg[14][13]:%.17g) $(c_snapg[14][14]:%.17g) $(c_snapg[14][15]:%.17g) $(c_snapg[14][16]:%.17g) $(c_snapg[14][17]:%.17g) $(c_snapg[14][18]:%.17g) $(c_snapg[14][19]:%.17g) $(c_snapg[14][20]:%.17g) $(c_snapg[14][21]:%.17g) $(c_snapg[14][22]:%.17g) $(c_snapg[14][23]:%.17g) $(c_snapg[14][24]:%.17g) $(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
print "$(c_snapg[15][1]:%.17g) $(c_snapg[15][2]:%.17g) $(c_snapg[15][3]:%.17g) $(c_snapg[15][4]:%.17g) $(c_snapg[15][5]:%.17g) $(c_snapg[15][6]:%.17g) $(c_snapg[15][7]:%.17g) $(c_snapg[15][8]:%.17g) $(c_snapg[15][9]:%.17g) $(c_snapg[15][10]:%.17g) $(c_snapg[15][11]:%.17g) $(c_snapg[15][12]:%.17g) $(c_snapg[15][13]:%.17g) $(c_snapg[15][14]:%.17g) $(c_snapg[15][15]:%.17g) $(c_snapg[15][16]:%.17g) $(c_snapg[15][17]:%.17g) $(c_snapg[15][18]:%.17g) $(c_snapg[15][19]:%.17g) $(c_snapg[15][20]:%.17g) $(c_snapg[15][21]:%.17g) $(c_snapg[15][22]:%.17g) $(c_snapg[15][23]:%.17g) $(c_snapg[15][24]:%.17g) $(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
print "$(c_snapg[16][1]:%.17g) $(c_snapg[16][2]:%.17g) $(c_snapg[16][3]:%.17g) $(c_snapg[16][4]:%.17g) $(c_snapg[16][5]:%.17g) $(c_snapg[16][6]:%.17g) $(c_snapg[16][7]:%.17g) $(c_snapg[16][8]:%.17g) $(c_snapg[16][9]:%.17g) $(c_snapg[16][10]:%.17g) $(c_snapg[16][11]:%.17g) $(c_snapg[16][12]:%.17g) $(c_snapg[16][13]:%.17g) $(c_snapg[16][14]:%.17g) $(c_snapg[16][15]:%.17g) $(c_snapg[16][16]:%.17g) $(c_snapg[16][17]:%.17g) $(c_snapg[16][18]:%.17g) $(c_snapg[16][19]:%.17g) $(c_snapg[16][20]:%.17g) $(c_snapg[16][21]:%.17g) $(c_snapg[16][22]:%.17g) $(c_snapg[16][23]:%.17g) $(c_snapg[16][24]:%.17g) $(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
print "$(c_snapg[17][1]:%.17g) $(c_snapg[17][2]:%.17g) $(c_snapg[17][3]:%.17g) $(c_snapg[17][4]:%.17g) $(c_snapg[17][5]:%.17g) $(c_snapg[17][6]:%.17g) $(c_snapg[17][7]:%.17g) $(c_snapg[17][8]:%.17g) $(c_snapg[17][9]:%.17g) $(c_snapg[17][10]:%.17g) $(c_snapg[17][11]:%.17g) $(c_snapg[17][12]:%.17g) $(c_snapg[17][13]:%.17g) $(c_snapg[17][14]:%.17g) $(c_snapg[17][15]:%.17g) $(c_snapg[17][16]:%.17g) $(c_snapg[17][17]:%.17g) $(c_snapg[17][18]:%.17g) $(c_snapg[17][19]:%.17g) $(c_snapg[17][20]:%.17g) $(c_snapg[17][21]:%.17g) $(c_snapg[17][22]:%.17g) $(c_snapg[17][23]:%.17g) $(c_snapg[17][24]:%.17g) $(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
print "$(c_snapg[18][1]:%.17g) $(c_snapg[18][2]:%.17g) $(c_snapg[18][3]:%.17g) $(c_snapg[18][4]:%.17g) $(c_snapg[18][5]:%.17g) $(c_snapg[18][6]:%.17g) $(c_snapg[18][7]:%.17g) $(c_snapg[18][8]:%.17g) $(c_snapg[18][9]:%.17g) $(c_snapg[18][10]:%.17g) $(c_snapg[18][11]:%.17g) $(c_snapg[18][12]:%.17g) $(c_snapg[18][13]:%.17g) $(c_snapg[18][14]:%.17g) $(c_snapg[18][15]:%.17g) $(c_snapg[18][16]:%.17g) $(c_snapg[18][17]:%.17g) $(c_snapg[18][18]:%.17g) $(c_snapg[18][19]:%.17g) $(c_snapg[18][20]:%.17g) $(c_snapg[18][21]:%.17g) $(c_snapg[18][22]:%.17g) $(c_snapg[18][23]:%.17g) $(c_snapg[18][24]:%.17g) $(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
print "$(c_snapg[19][1]:%.17g) $(c_snapg[19][2]:%.17g) $(c_snapg[19][3]:%.17g) $(c_snapg[19][4]:%.17g) $(c_snapg[19][5]:%.17g) $(c_snapg[19][6]:%.17g) $(c_snapg[19][7]:%.17g) $(c_snapg[19][8]:%.17g) $(c_snapg[19][9]:%.17g) $(c_snapg[19][10]:%.17g) $(c_snapg[19][11]:%.17g) $(c_snapg[19][12]:%.17g) $(c_snapg[19][13]:%.17g) $(c_snapg[19][14]:%.17g) $(c_snapg[19][15]:%.17g) $(c_snapg[19][16]:%.17g) $(c_snapg[19][17]:%.17g) $(c_snapg[19][18]:%.17g) $(c_snapg[19][19]:%.17g) $(c_snapg[19][20]:%.17g) $(c_snapg[19][21]:%.17g) $(c_snapg[19][22]:%.17g) $(c_snapg[19][23]:%.17g) $(c_snapg[19][24]:%.17g) $(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
print "$(c_snapg[20][1]:%.17g) $(c_snapg[20][2]:%.17g) $(c_snapg[20][3]:%.17g) $(c_snapg[20][4]:%.17g) $(c_snapg[20][5]:%.17g) $(c_snapg[20][6]:%.17g) $(c_snapg[20][7]:%.17g) $(c_snapg[20][8]:%.17g) $(c_snapg[20][9]:%.17g) $(c_snapg[20][10]:%.17g) $(c_snapg[20][11]:%.17g) $(c_snapg[20][12]:%.17g) $(c_snapg[20][13]:%.17g) $(c_snapg[20][14]:%.17g) $(c_snapg[20][15]:%.17g) $(c_snapg[20][16]:%.17g) $(c_snapg[20][17]:%.17g) $(c_snapg[20][18]:%.17g) $(c_snapg[20][19]:%.17g) $(c_snapg[20][20]:%.17g) $(c_snapg[20][21]:%.17g) $(c_snapg[20][22]:%.17g) $(c_snapg[20][23]:%.17g) $(c_snapg[20][24]:%.17g) $(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
print "$(c_snapg[21][1]:%.17g) $(c_snapg[21][2]:%.17g) $(c_snapg[21][3]:%.17g) $(c_snapg[21][4]:%.17g) $(c_snapg[21][5]:%.17g) $(c_snapg[21][6]:%.17g) $(c_snapg[21][7]:%.17g) $(c_snapg[21][8]:%.17g) $(c_snapg[21][9]:%.17g) $(c_snapg[21][10]:%.17g) $(c_snapg[21][11]:%.17g) $(c_snapg[21][12]:%.17g) $(c_snapg[21][13]:%.17g) $(c_snapg[21][14]:%.17g) $(c_snapg[21][15]:%.17g) $(c_snapg[21][16]:%.17g) $(c_snapg[21][17]:%.17g) $(c_snapg[21][18]:%.17g) $(c_snapg[21][19]:%.17g) $(c_snapg[21][20]:%.17g) $(c_snapg[21][21]:%.17g) $(c_snapg[21][22]:%.17g) $(c_snapg[21][23]:%.17g) $(c_snapg[21][24]:%.17g) $(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
print "$(c_snapg[22][1]:%.17g) $(c_snapg[22][2]:%.17g) $(c_snapg[22][3]:%.17g) $(c_snapg[22][4]:%.17g) $(c_snapg[22][5]:%.17g) $(c_snapg[22][6]:%.17g) $(c_snapg[22][7]:%.17g) $(c_snapg[22][8]:%.17g) $(c_snapg[22][9]:%.17g) $(c_snapg[22][10]:%.17g) $(c_snapg[22][11]:%.17g) $(c_snapg[22][12]:%.17g) $(c_snapg[22][13]:%.17g) $(c_snapg[22][14]:%.17g) $(c_snapg[22][15]:%.17g) $(c_snapg[22][16]:%.17g) $(c_snapg[22][17]:%.17g) $(c_snapg[22][18]:%.17g) $(c_snapg[22][19]:%.17g) $(c_snapg[22][20]:%.17g) $(c_snapg[22][21]:%.17g) $(c_snapg[22][22]:%.17g) $(c_snapg[22][23]:%.17g) $(c_snapg[22][24]:%.17g) $(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
print "$(c_snapg[23][1]:%.17g) $(c_snapg[23][2]:%.17g) $(c_snapg[23][3]:%.17g) $(c_snapg[23][4]:%.17g) $(c_snapg[23][5]:%.17g) $(c_snapg[23][6]:%.17g) $(c_snapg[23][7]:%.17g) $(c_snapg[23][8]:%.17g) $(c_snapg[23][9]:%.17g) $(c_snapg[23][10]:%.17g) $(c_snapg[23][11]:%.17g) $(c_snapg[23][12]:%.17g) $(c_snapg[23][13]:%.17g) $(c_snapg[23][14]:%.17g) $(c_snapg[23][15]:%.17g) $(c_snapg[23][16]:%.17g) $(c_snapg[23][17]:%.17g) $(c_snapg[23][18]:%.17g) $(c_snapg[23][19]:%.17g) $(c_snapg[23][20]:%.17g) $(c_snapg[23][21]:%.17g) $(c_snapg[23][22]:%.17g) $(c_snapg[23][23]:%.17g) $(c_snapg[23][24]:%.17g) $(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
print "$(c_snapg[24][1]:%.17g) $(c_snapg[24][2]:%.17g) $(c_snapg[24][3]:%.17g) $(c_snapg[24][4]:%.17g) $(c_snapg[24][5]:%.17g) $(c_snapg[24][6]:%.17g) $(c_snapg[24][7]:%.17g) $(c_snapg[24][8]:%.17g) $(c_snapg[24][9]:%.17g) $(c_snapg[24][10]:%.17g) $(c_snapg[24][11]:%.17g) $(c_snapg[24][12]:%.17g) $(c_snapg[24][13]:%.17g) $(c_snapg[24][14]:%.17g) $(c_snapg[24][15]:%.17g) $(c_snapg[24][16]:%.17g) $(c_snapg[24][17]:%.17g) $(c_snapg[24][18]:%.17g) $(c_snapg[24][19]:%.17g) $(c_snapg[24][20]:%.17g) $(c_snapg[24][21]:%.17g) $(c_snapg[24][22]:%.17g) $(c_snapg[24][23]:%.17g) $(c_snapg[24][24]:%.17g) $(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
print "$(c_snapg[25][1]:%.17g) $(c_snapg[25][2]:%.17g) $(c_snapg[25][3]:%.17g) $(c_snapg[25][4]:%.17g) $(c_snapg[25][5]:%.17g) $(c_snapg[25][6]:%.17g) $(c_snapg[25][7]:%.17g) $(c_snapg[25][8]:%.17g) $(c_snapg[25][9]:%.17g) $(c_snapg[25][10]:%.17g) $(c_snapg[25][11]:%.17g) $(c_snapg[25][12]:%.17g) $(c_snapg[25][13]:%.17g) $(c_snapg[25][14]:%.17g) $(c_snapg[25][15]:%.17g) $(c_snapg[25][16]:%.17g) $(c_snapg[25][17]:%.17g) $(c_snapg[25][18]:%.17g) $(c_snapg[25][19]:%.17g) $(c_snapg[25][20]:%.17g) $(c_snapg[25][21]:%.17g) $(c_snapg[25][22]:%.17g) $(c_snapg[25][23]:%.17g) $(c_snapg[25][24]:%.17g) $(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
print "$(c_snapg[26][1]:%.17g) $(c_snapg[26][2]:%.17g) $(c_snapg[26][3]:%.17g) $(c_snapg[26][4]:%.17g) $(c_snapg[26][5]:%.17g) $(c_snapg[26][6]:%.17g) $(c_snapg[26][7]:%.17g) $(c_snapg[26][8]:%.17g) $(c_snapg[26][9]:%.17g) $(c_snapg[26][10]:%.17g) $(c_snapg[26][11]:%.17g) $(c_snapg[26][12]:%.17g) $(c_snapg[26][13]:%.17g) $(c_snapg[26][14]:%.17g) $(c_snapg[26][15]:%.17g) $(c_snapg[26][16]:%.17g) $(c_snapg[26][17]:%.17g) $(c_snapg[26][18]:%.17g) $(c_snapg[26][19]:%.17g) $(c_snapg[26][20]:%.17g) $(c_snapg[26][21]:%.17g) $(c_snapg[26][22]:%.17g) $(c_snapg[26][23]:%.17g) $(c_snapg[26][24]:%.17g) $(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
print "$(c_snapg[27][1]:%.17g) $(c_snapg[27][2]:%.17g) $(c_snapg[27][3]:%.17g) $(c_snapg[27][4]:%.17g) $(c_snapg[27][5]:%.17g) $(c_snapg[27][6]:%.17g) $(c_snapg[27][7]:%.17g) $(c_snapg[27][8]:%.17g) $(c_snapg[27][9]:%.17g) $(c_snapg[27][10]:%.17g) $(c_snapg[27][11]:%.17g) $(c_snapg[27][12]:%.17g) $(c_snapg[27][13]:%.17g) $(c_snapg[27][14]:%.17g) $(c_snapg[27][15]:%.17g) $(c_snapg[27][16]:%.17g) $(c_snapg[27][17]:%.17g) $(c_snapg[27][18]:%.17g) $(c_snapg[27][19]:%.17g) $(c_snapg[27][20]:%.17g) $(c_snapg[27][21]:%.17g) $(c_snapg[27][22]:%.17g) $(c_snapg[27][23]:%.17g) $(c_snapg[27][24]:%.17g) $(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
print "$(c_snapg[28][1]:%.17g) $(c_snapg[28][2]:%.17g) $(c_snapg[28][3]:%.17g) $(c_snapg[28][4]:%.17g) $(c_snapg[28][5]:%.17g) $(c_snapg[28][6]:%.17g) $(c_snapg[28][7]:%.17g) $(c_snapg[28][8]:%.17g) $(c_snapg[28][9]:%.17g) $(c_snapg[28][10]:%.17g) $(c_snapg[28][11]:%.17g) $(c_snapg[28][12]:%.17g) $(c_snapg[28][13]:%.17g) $(c_snapg[28][14]:%.17g) $(c_snapg[28][15]:%.17g) $(c_snapg[28][16]:%.17g) $(c_snapg[28][17]:%.17g) $(c_snapg[28][18]:%.17g) $(c_snapg[28][19]:%.17g) $(c_snapg[28][20]:%.17g) $(c_snapg[28][21]:%.17g) $(c_snapg[28][22]:%.17g) $(c_snapg[28][23]:%.17g) $(c_snapg[28][24]:%.17g) $(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
print "$(c_snapg[29][1]:%.17g) $(c_snapg[29][2]:%.17g) $(c_snapg[29][3]:%.17g) $(c_snapg[29][4]:%.17g) $(c_snapg[29][5]:%.17g) $(c_snapg[29][6]:%.17g) $(c_snapg[29][7]:%.17g) $(c_snapg[29][8]:%.17g) $(c_snapg[29][9]:%.17g) $(c_snapg[29][10]:%.17g) $(c_snapg[29][11]:%.17g) $(c_snapg[29][12]:%.17g) $(c_snapg[29][13]:%.17g) $(c_snapg[29][14]:%.17g) $(c_snapg[29][15]:%.17g) $(c_snapg[29][16]:%.17g) $(c_snapg[29][17]:%.17g) $(c_snapg[29][18]:%.17g) $(c_snapg[29][19]:%.17g) $(c_snapg[29][20]:%.17g) $(c_snapg[29][21]:%.17g) $(c_snapg[29][22]:%.17g) $(c_snapg[29][23]:%.17g) $(c_snapg[29][24]:%.17g) $(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
print "$(c_snapg[30][1]:%.17g) $(c_snapg[30][2]:%.17g) $(c_snapg[30][3]:%.17g) $(c_snapg[30][4]:%.17g) $(c_snapg[30][5]:%.17g) $(c_snapg[30][6]:%.17g) $(c_snapg[30][7]:%.17g) $(c_snapg[30][8]:%.17g) $(c_snapg[30][9]:%.17g) $(c_snapg[30][10]:%.17g) $(c_snapg[30][11]:%.17g) $(c_snapg[30][12]:%.17g) $(c_snapg[30][13]:%.17g) $(c_snapg[30][14]:%.17g) $(c_snapg[30][15]:%.17g) $(c_snapg[30][16]:%.17g) $(c_snapg[30][17]:%.17g) $(c_snapg[30][18]:%.17g) $(c_snapg[30][19]:%.17g) $(c_snapg[30][20]:%.17g) $(c_snapg[30][21]:%.17g) $(c_snapg[30][22]:%.17g) $(c_snapg[30][23]:%.17g) $(c_snapg[30][24]:%.17g) $(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
print "$(c_snapg[31][1]:%.17g) $(c_snapg[31][2]:%.17g) $(c_snapg[31][3]:%.17g) $(c_snapg[31][4]:%.17g) $(c_snapg[31][5]:%.17g) $(c_snapg[31][6]:%.17g) $(c_snapg[31][7]:%.17g) $(c_snapg[31][8]:%.17g) $(c_snapg[31][9]:%.17g) $(c_snapg[31][10]:%.17g) $(c_snapg[31][11]:%.17g) $(c_snapg[31][12]:%.17g) $(c_snapg[31][13]:%.17g) $(c_snapg[31][14]:%.17g) $(c_snapg[31][15]:%.17g) $(c_snapg[31][16]:%.17g) $(c_snapg[31][17]:%.17g) $(c_snapg[31][18]:%.17g) $(c_snapg[31][19]:%.17g) $(c_snapg[31][20]:%.17g) $(c_snapg[31][21]:%.17g) $(c_snapg[31][22]:%.17g) $(c_snapg[31][23]:%.17g) $(c_snapg[31][24]:%.17g) $(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
