# 48-atom In/P LAMMPS ground truth for compute_descriptor_snap_global chem_flag=true,
# used to verify np=4 multi-rank correctness on a system with more cells (64, 4x4x4) than
# MPI ranks and a safe grid_dim=4 per axis (avoids the grid_dim=2 periodic-ghost edge case).
# 151 rows (1+3*48+6), 480 cols (240 per type) + 1 trailing label col = 481.

units       metal
atom_style  atomic
boundary    p p p

read_data   InP_large.lmp

pair_style  zero 8.5
pair_coeff  * *

variable    rcutfac  equal 1.0
variable    rfac0    equal 0.99363
variable    twojmax  equal 6
variable    radelem1 equal 3.81205
variable    radelem2 equal 3.82945
variable    wj1      equal 1.0
variable    wj2      equal 0.929316

compute snapg all snap ${rcutfac} ${rfac0} ${twojmax} ${radelem1} ${radelem2} ${wj1} ${wj2} rmin0 0.0 bzeroflag 1 quadraticflag 0 chem 2 0 1 bnormflag 1 wselfallflag 1

run         0

print "$(c_snapg[1][1]:%.17g) $(c_snapg[1][2]:%.17g) $(c_snapg[1][3]:%.17g) $(c_snapg[1][4]:%.17g) $(c_snapg[1][5]:%.17g) $(c_snapg[1][6]:%.17g) $(c_snapg[1][7]:%.17g) $(c_snapg[1][8]:%.17g) $(c_snapg[1][9]:%.17g) $(c_snapg[1][10]:%.17g) $(c_snapg[1][11]:%.17g) $(c_snapg[1][12]:%.17g) $(c_snapg[1][13]:%.17g) $(c_snapg[1][14]:%.17g) $(c_snapg[1][15]:%.17g) $(c_snapg[1][16]:%.17g) $(c_snapg[1][17]:%.17g) $(c_snapg[1][18]:%.17g) $(c_snapg[1][19]:%.17g) $(c_snapg[1][20]:%.17g) $(c_snapg[1][21]:%.17g) $(c_snapg[1][22]:%.17g) $(c_snapg[1][23]:%.17g) $(c_snapg[1][24]:%.17g) $(c_snapg[1][25]:%.17g) $(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
print "$(c_snapg[2][1]:%.17g) $(c_snapg[2][2]:%.17g) $(c_snapg[2][3]:%.17g) $(c_snapg[2][4]:%.17g) $(c_snapg[2][5]:%.17g) $(c_snapg[2][6]:%.17g) $(c_snapg[2][7]:%.17g) $(c_snapg[2][8]:%.17g) $(c_snapg[2][9]:%.17g) $(c_snapg[2][10]:%.17g) $(c_snapg[2][11]:%.17g) $(c_snapg[2][12]:%.17g) $(c_snapg[2][13]:%.17g) $(c_snapg[2][14]:%.17g) $(c_snapg[2][15]:%.17g) $(c_snapg[2][16]:%.17g) $(c_snapg[2][17]:%.17g) $(c_snapg[2][18]:%.17g) $(c_snapg[2][19]:%.17g) $(c_snapg[2][20]:%.17g) $(c_snapg[2][21]:%.17g) $(c_snapg[2][22]:%.17g) $(c_snapg[2][23]:%.17g) $(c_snapg[2][24]:%.17g) $(c_snapg[2][25]:%.17g) $(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
print "$(c_snapg[3][1]:%.17g) $(c_snapg[3][2]:%.17g) $(c_snapg[3][3]:%.17g) $(c_snapg[3][4]:%.17g) $(c_snapg[3][5]:%.17g) $(c_snapg[3][6]:%.17g) $(c_snapg[3][7]:%.17g) $(c_snapg[3][8]:%.17g) $(c_snapg[3][9]:%.17g) $(c_snapg[3][10]:%.17g) $(c_snapg[3][11]:%.17g) $(c_snapg[3][12]:%.17g) $(c_snapg[3][13]:%.17g) $(c_snapg[3][14]:%.17g) $(c_snapg[3][15]:%.17g) $(c_snapg[3][16]:%.17g) $(c_snapg[3][17]:%.17g) $(c_snapg[3][18]:%.17g) $(c_snapg[3][19]:%.17g) $(c_snapg[3][20]:%.17g) $(c_snapg[3][21]:%.17g) $(c_snapg[3][22]:%.17g) $(c_snapg[3][23]:%.17g) $(c_snapg[3][24]:%.17g) $(c_snapg[3][25]:%.17g) $(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
print "$(c_snapg[4][1]:%.17g) $(c_snapg[4][2]:%.17g) $(c_snapg[4][3]:%.17g) $(c_snapg[4][4]:%.17g) $(c_snapg[4][5]:%.17g) $(c_snapg[4][6]:%.17g) $(c_snapg[4][7]:%.17g) $(c_snapg[4][8]:%.17g) $(c_snapg[4][9]:%.17g) $(c_snapg[4][10]:%.17g) $(c_snapg[4][11]:%.17g) $(c_snapg[4][12]:%.17g) $(c_snapg[4][13]:%.17g) $(c_snapg[4][14]:%.17g) $(c_snapg[4][15]:%.17g) $(c_snapg[4][16]:%.17g) $(c_snapg[4][17]:%.17g) $(c_snapg[4][18]:%.17g) $(c_snapg[4][19]:%.17g) $(c_snapg[4][20]:%.17g) $(c_snapg[4][21]:%.17g) $(c_snapg[4][22]:%.17g) $(c_snapg[4][23]:%.17g) $(c_snapg[4][24]:%.17g) $(c_snapg[4][25]:%.17g) $(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
print "$(c_snapg[5][1]:%.17g) $(c_snapg[5][2]:%.17g) $(c_snapg[5][3]:%.17g) $(c_snapg[5][4]:%.17g) $(c_snapg[5][5]:%.17g) $(c_snapg[5][6]:%.17g) $(c_snapg[5][7]:%.17g) $(c_snapg[5][8]:%.17g) $(c_snapg[5][9]:%.17g) $(c_snapg[5][10]:%.17g) $(c_snapg[5][11]:%.17g) $(c_snapg[5][12]:%.17g) $(c_snapg[5][13]:%.17g) $(c_snapg[5][14]:%.17g) $(c_snapg[5][15]:%.17g) $(c_snapg[5][16]:%.17g) $(c_snapg[5][17]:%.17g) $(c_snapg[5][18]:%.17g) $(c_snapg[5][19]:%.17g) $(c_snapg[5][20]:%.17g) $(c_snapg[5][21]:%.17g) $(c_snapg[5][22]:%.17g) $(c_snapg[5][23]:%.17g) $(c_snapg[5][24]:%.17g) $(c_snapg[5][25]:%.17g) $(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
print "$(c_snapg[6][1]:%.17g) $(c_snapg[6][2]:%.17g) $(c_snapg[6][3]:%.17g) $(c_snapg[6][4]:%.17g) $(c_snapg[6][5]:%.17g) $(c_snapg[6][6]:%.17g) $(c_snapg[6][7]:%.17g) $(c_snapg[6][8]:%.17g) $(c_snapg[6][9]:%.17g) $(c_snapg[6][10]:%.17g) $(c_snapg[6][11]:%.17g) $(c_snapg[6][12]:%.17g) $(c_snapg[6][13]:%.17g) $(c_snapg[6][14]:%.17g) $(c_snapg[6][15]:%.17g) $(c_snapg[6][16]:%.17g) $(c_snapg[6][17]:%.17g) $(c_snapg[6][18]:%.17g) $(c_snapg[6][19]:%.17g) $(c_snapg[6][20]:%.17g) $(c_snapg[6][21]:%.17g) $(c_snapg[6][22]:%.17g) $(c_snapg[6][23]:%.17g) $(c_snapg[6][24]:%.17g) $(c_snapg[6][25]:%.17g) $(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
print "$(c_snapg[7][1]:%.17g) $(c_snapg[7][2]:%.17g) $(c_snapg[7][3]:%.17g) $(c_snapg[7][4]:%.17g) $(c_snapg[7][5]:%.17g) $(c_snapg[7][6]:%.17g) $(c_snapg[7][7]:%.17g) $(c_snapg[7][8]:%.17g) $(c_snapg[7][9]:%.17g) $(c_snapg[7][10]:%.17g) $(c_snapg[7][11]:%.17g) $(c_snapg[7][12]:%.17g) $(c_snapg[7][13]:%.17g) $(c_snapg[7][14]:%.17g) $(c_snapg[7][15]:%.17g) $(c_snapg[7][16]:%.17g) $(c_snapg[7][17]:%.17g) $(c_snapg[7][18]:%.17g) $(c_snapg[7][19]:%.17g) $(c_snapg[7][20]:%.17g) $(c_snapg[7][21]:%.17g) $(c_snapg[7][22]:%.17g) $(c_snapg[7][23]:%.17g) $(c_snapg[7][24]:%.17g) $(c_snapg[7][25]:%.17g) $(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
print "$(c_snapg[8][1]:%.17g) $(c_snapg[8][2]:%.17g) $(c_snapg[8][3]:%.17g) $(c_snapg[8][4]:%.17g) $(c_snapg[8][5]:%.17g) $(c_snapg[8][6]:%.17g) $(c_snapg[8][7]:%.17g) $(c_snapg[8][8]:%.17g) $(c_snapg[8][9]:%.17g) $(c_snapg[8][10]:%.17g) $(c_snapg[8][11]:%.17g) $(c_snapg[8][12]:%.17g) $(c_snapg[8][13]:%.17g) $(c_snapg[8][14]:%.17g) $(c_snapg[8][15]:%.17g) $(c_snapg[8][16]:%.17g) $(c_snapg[8][17]:%.17g) $(c_snapg[8][18]:%.17g) $(c_snapg[8][19]:%.17g) $(c_snapg[8][20]:%.17g) $(c_snapg[8][21]:%.17g) $(c_snapg[8][22]:%.17g) $(c_snapg[8][23]:%.17g) $(c_snapg[8][24]:%.17g) $(c_snapg[8][25]:%.17g) $(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
print "$(c_snapg[9][1]:%.17g) $(c_snapg[9][2]:%.17g) $(c_snapg[9][3]:%.17g) $(c_snapg[9][4]:%.17g) $(c_snapg[9][5]:%.17g) $(c_snapg[9][6]:%.17g) $(c_snapg[9][7]:%.17g) $(c_snapg[9][8]:%.17g) $(c_snapg[9][9]:%.17g) $(c_snapg[9][10]:%.17g) $(c_snapg[9][11]:%.17g) $(c_snapg[9][12]:%.17g) $(c_snapg[9][13]:%.17g) $(c_snapg[9][14]:%.17g) $(c_snapg[9][15]:%.17g) $(c_snapg[9][16]:%.17g) $(c_snapg[9][17]:%.17g) $(c_snapg[9][18]:%.17g) $(c_snapg[9][19]:%.17g) $(c_snapg[9][20]:%.17g) $(c_snapg[9][21]:%.17g) $(c_snapg[9][22]:%.17g) $(c_snapg[9][23]:%.17g) $(c_snapg[9][24]:%.17g) $(c_snapg[9][25]:%.17g) $(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
print "$(c_snapg[10][1]:%.17g) $(c_snapg[10][2]:%.17g) $(c_snapg[10][3]:%.17g) $(c_snapg[10][4]:%.17g) $(c_snapg[10][5]:%.17g) $(c_snapg[10][6]:%.17g) $(c_snapg[10][7]:%.17g) $(c_snapg[10][8]:%.17g) $(c_snapg[10][9]:%.17g) $(c_snapg[10][10]:%.17g) $(c_snapg[10][11]:%.17g) $(c_snapg[10][12]:%.17g) $(c_snapg[10][13]:%.17g) $(c_snapg[10][14]:%.17g) $(c_snapg[10][15]:%.17g) $(c_snapg[10][16]:%.17g) $(c_snapg[10][17]:%.17g) $(c_snapg[10][18]:%.17g) $(c_snapg[10][19]:%.17g) $(c_snapg[10][20]:%.17g) $(c_snapg[10][21]:%.17g) $(c_snapg[10][22]:%.17g) $(c_snapg[10][23]:%.17g) $(c_snapg[10][24]:%.17g) $(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
print "$(c_snapg[11][1]:%.17g) $(c_snapg[11][2]:%.17g) $(c_snapg[11][3]:%.17g) $(c_snapg[11][4]:%.17g) $(c_snapg[11][5]:%.17g) $(c_snapg[11][6]:%.17g) $(c_snapg[11][7]:%.17g) $(c_snapg[11][8]:%.17g) $(c_snapg[11][9]:%.17g) $(c_snapg[11][10]:%.17g) $(c_snapg[11][11]:%.17g) $(c_snapg[11][12]:%.17g) $(c_snapg[11][13]:%.17g) $(c_snapg[11][14]:%.17g) $(c_snapg[11][15]:%.17g) $(c_snapg[11][16]:%.17g) $(c_snapg[11][17]:%.17g) $(c_snapg[11][18]:%.17g) $(c_snapg[11][19]:%.17g) $(c_snapg[11][20]:%.17g) $(c_snapg[11][21]:%.17g) $(c_snapg[11][22]:%.17g) $(c_snapg[11][23]:%.17g) $(c_snapg[11][24]:%.17g) $(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
print "$(c_snapg[12][1]:%.17g) $(c_snapg[12][2]:%.17g) $(c_snapg[12][3]:%.17g) $(c_snapg[12][4]:%.17g) $(c_snapg[12][5]:%.17g) $(c_snapg[12][6]:%.17g) $(c_snapg[12][7]:%.17g) $(c_snapg[12][8]:%.17g) $(c_snapg[12][9]:%.17g) $(c_snapg[12][10]:%.17g) $(c_snapg[12][11]:%.17g) $(c_snapg[12][12]:%.17g) $(c_snapg[12][13]:%.17g) $(c_snapg[12][14]:%.17g) $(c_snapg[12][15]:%.17g) $(c_snapg[12][16]:%.17g) $(c_snapg[12][17]:%.17g) $(c_snapg[12][18]:%.17g) $(c_snapg[12][19]:%.17g) $(c_snapg[12][20]:%.17g) $(c_snapg[12][21]:%.17g) $(c_snapg[12][22]:%.17g) $(c_snapg[12][23]:%.17g) $(c_snapg[12][24]:%.17g) $(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
print "$(c_snapg[13][1]:%.17g) $(c_snapg[13][2]:%.17g) $(c_snapg[13][3]:%.17g) $(c_snapg[13][4]:%.17g) $(c_snapg[13][5]:%.17g) $(c_snapg[13][6]:%.17g) $(c_snapg[13][7]:%.17g) $(c_snapg[13][8]:%.17g) $(c_snapg[13][9]:%.17g) $(c_snapg[13][10]:%.17g) $(c_snapg[13][11]:%.17g) $(c_snapg[13][12]:%.17g) $(c_snapg[13][13]:%.17g) $(c_snapg[13][14]:%.17g) $(c_snapg[13][15]:%.17g) $(c_snapg[13][16]:%.17g) $(c_snapg[13][17]:%.17g) $(c_snapg[13][18]:%.17g) $(c_snapg[13][19]:%.17g) $(c_snapg[13][20]:%.17g) $(c_snapg[13][21]:%.17g) $(c_snapg[13][22]:%.17g) $(c_snapg[13][23]:%.17g) $(c_snapg[13][24]:%.17g) $(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
print "$(c_snapg[14][1]:%.17g) $(c_snapg[14][2]:%.17g) $(c_snapg[14][3]:%.17g) $(c_snapg[14][4]:%.17g) $(c_snapg[14][5]:%.17g) $(c_snapg[14][6]:%.17g) $(c_snapg[14][7]:%.17g) $(c_snapg[14][8]:%.17g) $(c_snapg[14][9]:%.17g) $(c_snapg[14][10]:%.17g) $(c_snapg[14][11]:%.17g) $(c_snapg[14][12]:%.17g) $(c_snapg[14][13]:%.17g) $(c_snapg[14][14]:%.17g) $(c_snapg[14][15]:%.17g) $(c_snapg[14][16]:%.17g) $(c_snapg[14][17]:%.17g) $(c_snapg[14][18]:%.17g) $(c_snapg[14][19]:%.17g) $(c_snapg[14][20]:%.17g) $(c_snapg[14][21]:%.17g) $(c_snapg[14][22]:%.17g) $(c_snapg[14][23]:%.17g) $(c_snapg[14][24]:%.17g) $(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
print "$(c_snapg[15][1]:%.17g) $(c_snapg[15][2]:%.17g) $(c_snapg[15][3]:%.17g) $(c_snapg[15][4]:%.17g) $(c_snapg[15][5]:%.17g) $(c_snapg[15][6]:%.17g) $(c_snapg[15][7]:%.17g) $(c_snapg[15][8]:%.17g) $(c_snapg[15][9]:%.17g) $(c_snapg[15][10]:%.17g) $(c_snapg[15][11]:%.17g) $(c_snapg[15][12]:%.17g) $(c_snapg[15][13]:%.17g) $(c_snapg[15][14]:%.17g) $(c_snapg[15][15]:%.17g) $(c_snapg[15][16]:%.17g) $(c_snapg[15][17]:%.17g) $(c_snapg[15][18]:%.17g) $(c_snapg[15][19]:%.17g) $(c_snapg[15][20]:%.17g) $(c_snapg[15][21]:%.17g) $(c_snapg[15][22]:%.17g) $(c_snapg[15][23]:%.17g) $(c_snapg[15][24]:%.17g) $(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
print "$(c_snapg[16][1]:%.17g) $(c_snapg[16][2]:%.17g) $(c_snapg[16][3]:%.17g) $(c_snapg[16][4]:%.17g) $(c_snapg[16][5]:%.17g) $(c_snapg[16][6]:%.17g) $(c_snapg[16][7]:%.17g) $(c_snapg[16][8]:%.17g) $(c_snapg[16][9]:%.17g) $(c_snapg[16][10]:%.17g) $(c_snapg[16][11]:%.17g) $(c_snapg[16][12]:%.17g) $(c_snapg[16][13]:%.17g) $(c_snapg[16][14]:%.17g) $(c_snapg[16][15]:%.17g) $(c_snapg[16][16]:%.17g) $(c_snapg[16][17]:%.17g) $(c_snapg[16][18]:%.17g) $(c_snapg[16][19]:%.17g) $(c_snapg[16][20]:%.17g) $(c_snapg[16][21]:%.17g) $(c_snapg[16][22]:%.17g) $(c_snapg[16][23]:%.17g) $(c_snapg[16][24]:%.17g) $(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
print "$(c_snapg[17][1]:%.17g) $(c_snapg[17][2]:%.17g) $(c_snapg[17][3]:%.17g) $(c_snapg[17][4]:%.17g) $(c_snapg[17][5]:%.17g) $(c_snapg[17][6]:%.17g) $(c_snapg[17][7]:%.17g) $(c_snapg[17][8]:%.17g) $(c_snapg[17][9]:%.17g) $(c_snapg[17][10]:%.17g) $(c_snapg[17][11]:%.17g) $(c_snapg[17][12]:%.17g) $(c_snapg[17][13]:%.17g) $(c_snapg[17][14]:%.17g) $(c_snapg[17][15]:%.17g) $(c_snapg[17][16]:%.17g) $(c_snapg[17][17]:%.17g) $(c_snapg[17][18]:%.17g) $(c_snapg[17][19]:%.17g) $(c_snapg[17][20]:%.17g) $(c_snapg[17][21]:%.17g) $(c_snapg[17][22]:%.17g) $(c_snapg[17][23]:%.17g) $(c_snapg[17][24]:%.17g) $(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
print "$(c_snapg[18][1]:%.17g) $(c_snapg[18][2]:%.17g) $(c_snapg[18][3]:%.17g) $(c_snapg[18][4]:%.17g) $(c_snapg[18][5]:%.17g) $(c_snapg[18][6]:%.17g) $(c_snapg[18][7]:%.17g) $(c_snapg[18][8]:%.17g) $(c_snapg[18][9]:%.17g) $(c_snapg[18][10]:%.17g) $(c_snapg[18][11]:%.17g) $(c_snapg[18][12]:%.17g) $(c_snapg[18][13]:%.17g) $(c_snapg[18][14]:%.17g) $(c_snapg[18][15]:%.17g) $(c_snapg[18][16]:%.17g) $(c_snapg[18][17]:%.17g) $(c_snapg[18][18]:%.17g) $(c_snapg[18][19]:%.17g) $(c_snapg[18][20]:%.17g) $(c_snapg[18][21]:%.17g) $(c_snapg[18][22]:%.17g) $(c_snapg[18][23]:%.17g) $(c_snapg[18][24]:%.17g) $(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
print "$(c_snapg[19][1]:%.17g) $(c_snapg[19][2]:%.17g) $(c_snapg[19][3]:%.17g) $(c_snapg[19][4]:%.17g) $(c_snapg[19][5]:%.17g) $(c_snapg[19][6]:%.17g) $(c_snapg[19][7]:%.17g) $(c_snapg[19][8]:%.17g) $(c_snapg[19][9]:%.17g) $(c_snapg[19][10]:%.17g) $(c_snapg[19][11]:%.17g) $(c_snapg[19][12]:%.17g) $(c_snapg[19][13]:%.17g) $(c_snapg[19][14]:%.17g) $(c_snapg[19][15]:%.17g) $(c_snapg[19][16]:%.17g) $(c_snapg[19][17]:%.17g) $(c_snapg[19][18]:%.17g) $(c_snapg[19][19]:%.17g) $(c_snapg[19][20]:%.17g) $(c_snapg[19][21]:%.17g) $(c_snapg[19][22]:%.17g) $(c_snapg[19][23]:%.17g) $(c_snapg[19][24]:%.17g) $(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
print "$(c_snapg[20][1]:%.17g) $(c_snapg[20][2]:%.17g) $(c_snapg[20][3]:%.17g) $(c_snapg[20][4]:%.17g) $(c_snapg[20][5]:%.17g) $(c_snapg[20][6]:%.17g) $(c_snapg[20][7]:%.17g) $(c_snapg[20][8]:%.17g) $(c_snapg[20][9]:%.17g) $(c_snapg[20][10]:%.17g) $(c_snapg[20][11]:%.17g) $(c_snapg[20][12]:%.17g) $(c_snapg[20][13]:%.17g) $(c_snapg[20][14]:%.17g) $(c_snapg[20][15]:%.17g) $(c_snapg[20][16]:%.17g) $(c_snapg[20][17]:%.17g) $(c_snapg[20][18]:%.17g) $(c_snapg[20][19]:%.17g) $(c_snapg[20][20]:%.17g) $(c_snapg[20][21]:%.17g) $(c_snapg[20][22]:%.17g) $(c_snapg[20][23]:%.17g) $(c_snapg[20][24]:%.17g) $(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
print "$(c_snapg[21][1]:%.17g) $(c_snapg[21][2]:%.17g) $(c_snapg[21][3]:%.17g) $(c_snapg[21][4]:%.17g) $(c_snapg[21][5]:%.17g) $(c_snapg[21][6]:%.17g) $(c_snapg[21][7]:%.17g) $(c_snapg[21][8]:%.17g) $(c_snapg[21][9]:%.17g) $(c_snapg[21][10]:%.17g) $(c_snapg[21][11]:%.17g) $(c_snapg[21][12]:%.17g) $(c_snapg[21][13]:%.17g) $(c_snapg[21][14]:%.17g) $(c_snapg[21][15]:%.17g) $(c_snapg[21][16]:%.17g) $(c_snapg[21][17]:%.17g) $(c_snapg[21][18]:%.17g) $(c_snapg[21][19]:%.17g) $(c_snapg[21][20]:%.17g) $(c_snapg[21][21]:%.17g) $(c_snapg[21][22]:%.17g) $(c_snapg[21][23]:%.17g) $(c_snapg[21][24]:%.17g) $(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
print "$(c_snapg[22][1]:%.17g) $(c_snapg[22][2]:%.17g) $(c_snapg[22][3]:%.17g) $(c_snapg[22][4]:%.17g) $(c_snapg[22][5]:%.17g) $(c_snapg[22][6]:%.17g) $(c_snapg[22][7]:%.17g) $(c_snapg[22][8]:%.17g) $(c_snapg[22][9]:%.17g) $(c_snapg[22][10]:%.17g) $(c_snapg[22][11]:%.17g) $(c_snapg[22][12]:%.17g) $(c_snapg[22][13]:%.17g) $(c_snapg[22][14]:%.17g) $(c_snapg[22][15]:%.17g) $(c_snapg[22][16]:%.17g) $(c_snapg[22][17]:%.17g) $(c_snapg[22][18]:%.17g) $(c_snapg[22][19]:%.17g) $(c_snapg[22][20]:%.17g) $(c_snapg[22][21]:%.17g) $(c_snapg[22][22]:%.17g) $(c_snapg[22][23]:%.17g) $(c_snapg[22][24]:%.17g) $(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
print "$(c_snapg[23][1]:%.17g) $(c_snapg[23][2]:%.17g) $(c_snapg[23][3]:%.17g) $(c_snapg[23][4]:%.17g) $(c_snapg[23][5]:%.17g) $(c_snapg[23][6]:%.17g) $(c_snapg[23][7]:%.17g) $(c_snapg[23][8]:%.17g) $(c_snapg[23][9]:%.17g) $(c_snapg[23][10]:%.17g) $(c_snapg[23][11]:%.17g) $(c_snapg[23][12]:%.17g) $(c_snapg[23][13]:%.17g) $(c_snapg[23][14]:%.17g) $(c_snapg[23][15]:%.17g) $(c_snapg[23][16]:%.17g) $(c_snapg[23][17]:%.17g) $(c_snapg[23][18]:%.17g) $(c_snapg[23][19]:%.17g) $(c_snapg[23][20]:%.17g) $(c_snapg[23][21]:%.17g) $(c_snapg[23][22]:%.17g) $(c_snapg[23][23]:%.17g) $(c_snapg[23][24]:%.17g) $(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
print "$(c_snapg[24][1]:%.17g) $(c_snapg[24][2]:%.17g) $(c_snapg[24][3]:%.17g) $(c_snapg[24][4]:%.17g) $(c_snapg[24][5]:%.17g) $(c_snapg[24][6]:%.17g) $(c_snapg[24][7]:%.17g) $(c_snapg[24][8]:%.17g) $(c_snapg[24][9]:%.17g) $(c_snapg[24][10]:%.17g) $(c_snapg[24][11]:%.17g) $(c_snapg[24][12]:%.17g) $(c_snapg[24][13]:%.17g) $(c_snapg[24][14]:%.17g) $(c_snapg[24][15]:%.17g) $(c_snapg[24][16]:%.17g) $(c_snapg[24][17]:%.17g) $(c_snapg[24][18]:%.17g) $(c_snapg[24][19]:%.17g) $(c_snapg[24][20]:%.17g) $(c_snapg[24][21]:%.17g) $(c_snapg[24][22]:%.17g) $(c_snapg[24][23]:%.17g) $(c_snapg[24][24]:%.17g) $(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
print "$(c_snapg[25][1]:%.17g) $(c_snapg[25][2]:%.17g) $(c_snapg[25][3]:%.17g) $(c_snapg[25][4]:%.17g) $(c_snapg[25][5]:%.17g) $(c_snapg[25][6]:%.17g) $(c_snapg[25][7]:%.17g) $(c_snapg[25][8]:%.17g) $(c_snapg[25][9]:%.17g) $(c_snapg[25][10]:%.17g) $(c_snapg[25][11]:%.17g) $(c_snapg[25][12]:%.17g) $(c_snapg[25][13]:%.17g) $(c_snapg[25][14]:%.17g) $(c_snapg[25][15]:%.17g) $(c_snapg[25][16]:%.17g) $(c_snapg[25][17]:%.17g) $(c_snapg[25][18]:%.17g) $(c_snapg[25][19]:%.17g) $(c_snapg[25][20]:%.17g) $(c_snapg[25][21]:%.17g) $(c_snapg[25][22]:%.17g) $(c_snapg[25][23]:%.17g) $(c_snapg[25][24]:%.17g) $(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
print "$(c_snapg[26][1]:%.17g) $(c_snapg[26][2]:%.17g) $(c_snapg[26][3]:%.17g) $(c_snapg[26][4]:%.17g) $(c_snapg[26][5]:%.17g) $(c_snapg[26][6]:%.17g) $(c_snapg[26][7]:%.17g) $(c_snapg[26][8]:%.17g) $(c_snapg[26][9]:%.17g) $(c_snapg[26][10]:%.17g) $(c_snapg[26][11]:%.17g) $(c_snapg[26][12]:%.17g) $(c_snapg[26][13]:%.17g) $(c_snapg[26][14]:%.17g) $(c_snapg[26][15]:%.17g) $(c_snapg[26][16]:%.17g) $(c_snapg[26][17]:%.17g) $(c_snapg[26][18]:%.17g) $(c_snapg[26][19]:%.17g) $(c_snapg[26][20]:%.17g) $(c_snapg[26][21]:%.17g) $(c_snapg[26][22]:%.17g) $(c_snapg[26][23]:%.17g) $(c_snapg[26][24]:%.17g) $(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
print "$(c_snapg[27][1]:%.17g) $(c_snapg[27][2]:%.17g) $(c_snapg[27][3]:%.17g) $(c_snapg[27][4]:%.17g) $(c_snapg[27][5]:%.17g) $(c_snapg[27][6]:%.17g) $(c_snapg[27][7]:%.17g) $(c_snapg[27][8]:%.17g) $(c_snapg[27][9]:%.17g) $(c_snapg[27][10]:%.17g) $(c_snapg[27][11]:%.17g) $(c_snapg[27][12]:%.17g) $(c_snapg[27][13]:%.17g) $(c_snapg[27][14]:%.17g) $(c_snapg[27][15]:%.17g) $(c_snapg[27][16]:%.17g) $(c_snapg[27][17]:%.17g) $(c_snapg[27][18]:%.17g) $(c_snapg[27][19]:%.17g) $(c_snapg[27][20]:%.17g) $(c_snapg[27][21]:%.17g) $(c_snapg[27][22]:%.17g) $(c_snapg[27][23]:%.17g) $(c_snapg[27][24]:%.17g) $(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
print "$(c_snapg[28][1]:%.17g) $(c_snapg[28][2]:%.17g) $(c_snapg[28][3]:%.17g) $(c_snapg[28][4]:%.17g) $(c_snapg[28][5]:%.17g) $(c_snapg[28][6]:%.17g) $(c_snapg[28][7]:%.17g) $(c_snapg[28][8]:%.17g) $(c_snapg[28][9]:%.17g) $(c_snapg[28][10]:%.17g) $(c_snapg[28][11]:%.17g) $(c_snapg[28][12]:%.17g) $(c_snapg[28][13]:%.17g) $(c_snapg[28][14]:%.17g) $(c_snapg[28][15]:%.17g) $(c_snapg[28][16]:%.17g) $(c_snapg[28][17]:%.17g) $(c_snapg[28][18]:%.17g) $(c_snapg[28][19]:%.17g) $(c_snapg[28][20]:%.17g) $(c_snapg[28][21]:%.17g) $(c_snapg[28][22]:%.17g) $(c_snapg[28][23]:%.17g) $(c_snapg[28][24]:%.17g) $(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
print "$(c_snapg[29][1]:%.17g) $(c_snapg[29][2]:%.17g) $(c_snapg[29][3]:%.17g) $(c_snapg[29][4]:%.17g) $(c_snapg[29][5]:%.17g) $(c_snapg[29][6]:%.17g) $(c_snapg[29][7]:%.17g) $(c_snapg[29][8]:%.17g) $(c_snapg[29][9]:%.17g) $(c_snapg[29][10]:%.17g) $(c_snapg[29][11]:%.17g) $(c_snapg[29][12]:%.17g) $(c_snapg[29][13]:%.17g) $(c_snapg[29][14]:%.17g) $(c_snapg[29][15]:%.17g) $(c_snapg[29][16]:%.17g) $(c_snapg[29][17]:%.17g) $(c_snapg[29][18]:%.17g) $(c_snapg[29][19]:%.17g) $(c_snapg[29][20]:%.17g) $(c_snapg[29][21]:%.17g) $(c_snapg[29][22]:%.17g) $(c_snapg[29][23]:%.17g) $(c_snapg[29][24]:%.17g) $(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
print "$(c_snapg[30][1]:%.17g) $(c_snapg[30][2]:%.17g) $(c_snapg[30][3]:%.17g) $(c_snapg[30][4]:%.17g) $(c_snapg[30][5]:%.17g) $(c_snapg[30][6]:%.17g) $(c_snapg[30][7]:%.17g) $(c_snapg[30][8]:%.17g) $(c_snapg[30][9]:%.17g) $(c_snapg[30][10]:%.17g) $(c_snapg[30][11]:%.17g) $(c_snapg[30][12]:%.17g) $(c_snapg[30][13]:%.17g) $(c_snapg[30][14]:%.17g) $(c_snapg[30][15]:%.17g) $(c_snapg[30][16]:%.17g) $(c_snapg[30][17]:%.17g) $(c_snapg[30][18]:%.17g) $(c_snapg[30][19]:%.17g) $(c_snapg[30][20]:%.17g) $(c_snapg[30][21]:%.17g) $(c_snapg[30][22]:%.17g) $(c_snapg[30][23]:%.17g) $(c_snapg[30][24]:%.17g) $(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
print "$(c_snapg[31][1]:%.17g) $(c_snapg[31][2]:%.17g) $(c_snapg[31][3]:%.17g) $(c_snapg[31][4]:%.17g) $(c_snapg[31][5]:%.17g) $(c_snapg[31][6]:%.17g) $(c_snapg[31][7]:%.17g) $(c_snapg[31][8]:%.17g) $(c_snapg[31][9]:%.17g) $(c_snapg[31][10]:%.17g) $(c_snapg[31][11]:%.17g) $(c_snapg[31][12]:%.17g) $(c_snapg[31][13]:%.17g) $(c_snapg[31][14]:%.17g) $(c_snapg[31][15]:%.17g) $(c_snapg[31][16]:%.17g) $(c_snapg[31][17]:%.17g) $(c_snapg[31][18]:%.17g) $(c_snapg[31][19]:%.17g) $(c_snapg[31][20]:%.17g) $(c_snapg[31][21]:%.17g) $(c_snapg[31][22]:%.17g) $(c_snapg[31][23]:%.17g) $(c_snapg[31][24]:%.17g) $(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
print "$(c_snapg[32][1]:%.17g) $(c_snapg[32][2]:%.17g) $(c_snapg[32][3]:%.17g) $(c_snapg[32][4]:%.17g) $(c_snapg[32][5]:%.17g) $(c_snapg[32][6]:%.17g) $(c_snapg[32][7]:%.17g) $(c_snapg[32][8]:%.17g) $(c_snapg[32][9]:%.17g) $(c_snapg[32][10]:%.17g) $(c_snapg[32][11]:%.17g) $(c_snapg[32][12]:%.17g) $(c_snapg[32][13]:%.17g) $(c_snapg[32][14]:%.17g) $(c_snapg[32][15]:%.17g) $(c_snapg[32][16]:%.17g) $(c_snapg[32][17]:%.17g) $(c_snapg[32][18]:%.17g) $(c_snapg[32][19]:%.17g) $(c_snapg[32][20]:%.17g) $(c_snapg[32][21]:%.17g) $(c_snapg[32][22]:%.17g) $(c_snapg[32][23]:%.17g) $(c_snapg[32][24]:%.17g) $(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
print "$(c_snapg[33][1]:%.17g) $(c_snapg[33][2]:%.17g) $(c_snapg[33][3]:%.17g) $(c_snapg[33][4]:%.17g) $(c_snapg[33][5]:%.17g) $(c_snapg[33][6]:%.17g) $(c_snapg[33][7]:%.17g) $(c_snapg[33][8]:%.17g) $(c_snapg[33][9]:%.17g) $(c_snapg[33][10]:%.17g) $(c_snapg[33][11]:%.17g) $(c_snapg[33][12]:%.17g) $(c_snapg[33][13]:%.17g) $(c_snapg[33][14]:%.17g) $(c_snapg[33][15]:%.17g) $(c_snapg[33][16]:%.17g) $(c_snapg[33][17]:%.17g) $(c_snapg[33][18]:%.17g) $(c_snapg[33][19]:%.17g) $(c_snapg[33][20]:%.17g) $(c_snapg[33][21]:%.17g) $(c_snapg[33][22]:%.17g) $(c_snapg[33][23]:%.17g) $(c_snapg[33][24]:%.17g) $(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
print "$(c_snapg[34][1]:%.17g) $(c_snapg[34][2]:%.17g) $(c_snapg[34][3]:%.17g) $(c_snapg[34][4]:%.17g) $(c_snapg[34][5]:%.17g) $(c_snapg[34][6]:%.17g) $(c_snapg[34][7]:%.17g) $(c_snapg[34][8]:%.17g) $(c_snapg[34][9]:%.17g) $(c_snapg[34][10]:%.17g) $(c_snapg[34][11]:%.17g) $(c_snapg[34][12]:%.17g) $(c_snapg[34][13]:%.17g) $(c_snapg[34][14]:%.17g) $(c_snapg[34][15]:%.17g) $(c_snapg[34][16]:%.17g) $(c_snapg[34][17]:%.17g) $(c_snapg[34][18]:%.17g) $(c_snapg[34][19]:%.17g) $(c_snapg[34][20]:%.17g) $(c_snapg[34][21]:%.17g) $(c_snapg[34][22]:%.17g) $(c_snapg[34][23]:%.17g) $(c_snapg[34][24]:%.17g) $(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
print "$(c_snapg[35][1]:%.17g) $(c_snapg[35][2]:%.17g) $(c_snapg[35][3]:%.17g) $(c_snapg[35][4]:%.17g) $(c_snapg[35][5]:%.17g) $(c_snapg[35][6]:%.17g) $(c_snapg[35][7]:%.17g) $(c_snapg[35][8]:%.17g) $(c_snapg[35][9]:%.17g) $(c_snapg[35][10]:%.17g) $(c_snapg[35][11]:%.17g) $(c_snapg[35][12]:%.17g) $(c_snapg[35][13]:%.17g) $(c_snapg[35][14]:%.17g) $(c_snapg[35][15]:%.17g) $(c_snapg[35][16]:%.17g) $(c_snapg[35][17]:%.17g) $(c_snapg[35][18]:%.17g) $(c_snapg[35][19]:%.17g) $(c_snapg[35][20]:%.17g) $(c_snapg[35][21]:%.17g) $(c_snapg[35][22]:%.17g) $(c_snapg[35][23]:%.17g) $(c_snapg[35][24]:%.17g) $(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
print "$(c_snapg[36][1]:%.17g) $(c_snapg[36][2]:%.17g) $(c_snapg[36][3]:%.17g) $(c_snapg[36][4]:%.17g) $(c_snapg[36][5]:%.17g) $(c_snapg[36][6]:%.17g) $(c_snapg[36][7]:%.17g) $(c_snapg[36][8]:%.17g) $(c_snapg[36][9]:%.17g) $(c_snapg[36][10]:%.17g) $(c_snapg[36][11]:%.17g) $(c_snapg[36][12]:%.17g) $(c_snapg[36][13]:%.17g) $(c_snapg[36][14]:%.17g) $(c_snapg[36][15]:%.17g) $(c_snapg[36][16]:%.17g) $(c_snapg[36][17]:%.17g) $(c_snapg[36][18]:%.17g) $(c_snapg[36][19]:%.17g) $(c_snapg[36][20]:%.17g) $(c_snapg[36][21]:%.17g) $(c_snapg[36][22]:%.17g) $(c_snapg[36][23]:%.17g) $(c_snapg[36][24]:%.17g) $(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
print "$(c_snapg[37][1]:%.17g) $(c_snapg[37][2]:%.17g) $(c_snapg[37][3]:%.17g) $(c_snapg[37][4]:%.17g) $(c_snapg[37][5]:%.17g) $(c_snapg[37][6]:%.17g) $(c_snapg[37][7]:%.17g) $(c_snapg[37][8]:%.17g) $(c_snapg[37][9]:%.17g) $(c_snapg[37][10]:%.17g) $(c_snapg[37][11]:%.17g) $(c_snapg[37][12]:%.17g) $(c_snapg[37][13]:%.17g) $(c_snapg[37][14]:%.17g) $(c_snapg[37][15]:%.17g) $(c_snapg[37][16]:%.17g) $(c_snapg[37][17]:%.17g) $(c_snapg[37][18]:%.17g) $(c_snapg[37][19]:%.17g) $(c_snapg[37][20]:%.17g) $(c_snapg[37][21]:%.17g) $(c_snapg[37][22]:%.17g) $(c_snapg[37][23]:%.17g) $(c_snapg[37][24]:%.17g) $(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
print "$(c_snapg[38][1]:%.17g) $(c_snapg[38][2]:%.17g) $(c_snapg[38][3]:%.17g) $(c_snapg[38][4]:%.17g) $(c_snapg[38][5]:%.17g) $(c_snapg[38][6]:%.17g) $(c_snapg[38][7]:%.17g) $(c_snapg[38][8]:%.17g) $(c_snapg[38][9]:%.17g) $(c_snapg[38][10]:%.17g) $(c_snapg[38][11]:%.17g) $(c_snapg[38][12]:%.17g) $(c_snapg[38][13]:%.17g) $(c_snapg[38][14]:%.17g) $(c_snapg[38][15]:%.17g) $(c_snapg[38][16]:%.17g) $(c_snapg[38][17]:%.17g) $(c_snapg[38][18]:%.17g) $(c_snapg[38][19]:%.17g) $(c_snapg[38][20]:%.17g) $(c_snapg[38][21]:%.17g) $(c_snapg[38][22]:%.17g) $(c_snapg[38][23]:%.17g) $(c_snapg[38][24]:%.17g) $(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
print "$(c_snapg[39][1]:%.17g) $(c_snapg[39][2]:%.17g) $(c_snapg[39][3]:%.17g) $(c_snapg[39][4]:%.17g) $(c_snapg[39][5]:%.17g) $(c_snapg[39][6]:%.17g) $(c_snapg[39][7]:%.17g) $(c_snapg[39][8]:%.17g) $(c_snapg[39][9]:%.17g) $(c_snapg[39][10]:%.17g) $(c_snapg[39][11]:%.17g) $(c_snapg[39][12]:%.17g) $(c_snapg[39][13]:%.17g) $(c_snapg[39][14]:%.17g) $(c_snapg[39][15]:%.17g) $(c_snapg[39][16]:%.17g) $(c_snapg[39][17]:%.17g) $(c_snapg[39][18]:%.17g) $(c_snapg[39][19]:%.17g) $(c_snapg[39][20]:%.17g) $(c_snapg[39][21]:%.17g) $(c_snapg[39][22]:%.17g) $(c_snapg[39][23]:%.17g) $(c_snapg[39][24]:%.17g) $(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
print "$(c_snapg[40][1]:%.17g) $(c_snapg[40][2]:%.17g) $(c_snapg[40][3]:%.17g) $(c_snapg[40][4]:%.17g) $(c_snapg[40][5]:%.17g) $(c_snapg[40][6]:%.17g) $(c_snapg[40][7]:%.17g) $(c_snapg[40][8]:%.17g) $(c_snapg[40][9]:%.17g) $(c_snapg[40][10]:%.17g) $(c_snapg[40][11]:%.17g) $(c_snapg[40][12]:%.17g) $(c_snapg[40][13]:%.17g) $(c_snapg[40][14]:%.17g) $(c_snapg[40][15]:%.17g) $(c_snapg[40][16]:%.17g) $(c_snapg[40][17]:%.17g) $(c_snapg[40][18]:%.17g) $(c_snapg[40][19]:%.17g) $(c_snapg[40][20]:%.17g) $(c_snapg[40][21]:%.17g) $(c_snapg[40][22]:%.17g) $(c_snapg[40][23]:%.17g) $(c_snapg[40][24]:%.17g) $(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
print "$(c_snapg[41][1]:%.17g) $(c_snapg[41][2]:%.17g) $(c_snapg[41][3]:%.17g) $(c_snapg[41][4]:%.17g) $(c_snapg[41][5]:%.17g) $(c_snapg[41][6]:%.17g) $(c_snapg[41][7]:%.17g) $(c_snapg[41][8]:%.17g) $(c_snapg[41][9]:%.17g) $(c_snapg[41][10]:%.17g) $(c_snapg[41][11]:%.17g) $(c_snapg[41][12]:%.17g) $(c_snapg[41][13]:%.17g) $(c_snapg[41][14]:%.17g) $(c_snapg[41][15]:%.17g) $(c_snapg[41][16]:%.17g) $(c_snapg[41][17]:%.17g) $(c_snapg[41][18]:%.17g) $(c_snapg[41][19]:%.17g) $(c_snapg[41][20]:%.17g) $(c_snapg[41][21]:%.17g) $(c_snapg[41][22]:%.17g) $(c_snapg[41][23]:%.17g) $(c_snapg[41][24]:%.17g) $(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
print "$(c_snapg[42][1]:%.17g) $(c_snapg[42][2]:%.17g) $(c_snapg[42][3]:%.17g) $(c_snapg[42][4]:%.17g) $(c_snapg[42][5]:%.17g) $(c_snapg[42][6]:%.17g) $(c_snapg[42][7]:%.17g) $(c_snapg[42][8]:%.17g) $(c_snapg[42][9]:%.17g) $(c_snapg[42][10]:%.17g) $(c_snapg[42][11]:%.17g) $(c_snapg[42][12]:%.17g) $(c_snapg[42][13]:%.17g) $(c_snapg[42][14]:%.17g) $(c_snapg[42][15]:%.17g) $(c_snapg[42][16]:%.17g) $(c_snapg[42][17]:%.17g) $(c_snapg[42][18]:%.17g) $(c_snapg[42][19]:%.17g) $(c_snapg[42][20]:%.17g) $(c_snapg[42][21]:%.17g) $(c_snapg[42][22]:%.17g) $(c_snapg[42][23]:%.17g) $(c_snapg[42][24]:%.17g) $(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
print "$(c_snapg[43][1]:%.17g) $(c_snapg[43][2]:%.17g) $(c_snapg[43][3]:%.17g) $(c_snapg[43][4]:%.17g) $(c_snapg[43][5]:%.17g) $(c_snapg[43][6]:%.17g) $(c_snapg[43][7]:%.17g) $(c_snapg[43][8]:%.17g) $(c_snapg[43][9]:%.17g) $(c_snapg[43][10]:%.17g) $(c_snapg[43][11]:%.17g) $(c_snapg[43][12]:%.17g) $(c_snapg[43][13]:%.17g) $(c_snapg[43][14]:%.17g) $(c_snapg[43][15]:%.17g) $(c_snapg[43][16]:%.17g) $(c_snapg[43][17]:%.17g) $(c_snapg[43][18]:%.17g) $(c_snapg[43][19]:%.17g) $(c_snapg[43][20]:%.17g) $(c_snapg[43][21]:%.17g) $(c_snapg[43][22]:%.17g) $(c_snapg[43][23]:%.17g) $(c_snapg[43][24]:%.17g) $(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
print "$(c_snapg[44][1]:%.17g) $(c_snapg[44][2]:%.17g) $(c_snapg[44][3]:%.17g) $(c_snapg[44][4]:%.17g) $(c_snapg[44][5]:%.17g) $(c_snapg[44][6]:%.17g) $(c_snapg[44][7]:%.17g) $(c_snapg[44][8]:%.17g) $(c_snapg[44][9]:%.17g) $(c_snapg[44][10]:%.17g) $(c_snapg[44][11]:%.17g) $(c_snapg[44][12]:%.17g) $(c_snapg[44][13]:%.17g) $(c_snapg[44][14]:%.17g) $(c_snapg[44][15]:%.17g) $(c_snapg[44][16]:%.17g) $(c_snapg[44][17]:%.17g) $(c_snapg[44][18]:%.17g) $(c_snapg[44][19]:%.17g) $(c_snapg[44][20]:%.17g) $(c_snapg[44][21]:%.17g) $(c_snapg[44][22]:%.17g) $(c_snapg[44][23]:%.17g) $(c_snapg[44][24]:%.17g) $(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
print "$(c_snapg[45][1]:%.17g) $(c_snapg[45][2]:%.17g) $(c_snapg[45][3]:%.17g) $(c_snapg[45][4]:%.17g) $(c_snapg[45][5]:%.17g) $(c_snapg[45][6]:%.17g) $(c_snapg[45][7]:%.17g) $(c_snapg[45][8]:%.17g) $(c_snapg[45][9]:%.17g) $(c_snapg[45][10]:%.17g) $(c_snapg[45][11]:%.17g) $(c_snapg[45][12]:%.17g) $(c_snapg[45][13]:%.17g) $(c_snapg[45][14]:%.17g) $(c_snapg[45][15]:%.17g) $(c_snapg[45][16]:%.17g) $(c_snapg[45][17]:%.17g) $(c_snapg[45][18]:%.17g) $(c_snapg[45][19]:%.17g) $(c_snapg[45][20]:%.17g) $(c_snapg[45][21]:%.17g) $(c_snapg[45][22]:%.17g) $(c_snapg[45][23]:%.17g) $(c_snapg[45][24]:%.17g) $(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
print "$(c_snapg[46][1]:%.17g) $(c_snapg[46][2]:%.17g) $(c_snapg[46][3]:%.17g) $(c_snapg[46][4]:%.17g) $(c_snapg[46][5]:%.17g) $(c_snapg[46][6]:%.17g) $(c_snapg[46][7]:%.17g) $(c_snapg[46][8]:%.17g) $(c_snapg[46][9]:%.17g) $(c_snapg[46][10]:%.17g) $(c_snapg[46][11]:%.17g) $(c_snapg[46][12]:%.17g) $(c_snapg[46][13]:%.17g) $(c_snapg[46][14]:%.17g) $(c_snapg[46][15]:%.17g) $(c_snapg[46][16]:%.17g) $(c_snapg[46][17]:%.17g) $(c_snapg[46][18]:%.17g) $(c_snapg[46][19]:%.17g) $(c_snapg[46][20]:%.17g) $(c_snapg[46][21]:%.17g) $(c_snapg[46][22]:%.17g) $(c_snapg[46][23]:%.17g) $(c_snapg[46][24]:%.17g) $(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
print "$(c_snapg[47][1]:%.17g) $(c_snapg[47][2]:%.17g) $(c_snapg[47][3]:%.17g) $(c_snapg[47][4]:%.17g) $(c_snapg[47][5]:%.17g) $(c_snapg[47][6]:%.17g) $(c_snapg[47][7]:%.17g) $(c_snapg[47][8]:%.17g) $(c_snapg[47][9]:%.17g) $(c_snapg[47][10]:%.17g) $(c_snapg[47][11]:%.17g) $(c_snapg[47][12]:%.17g) $(c_snapg[47][13]:%.17g) $(c_snapg[47][14]:%.17g) $(c_snapg[47][15]:%.17g) $(c_snapg[47][16]:%.17g) $(c_snapg[47][17]:%.17g) $(c_snapg[47][18]:%.17g) $(c_snapg[47][19]:%.17g) $(c_snapg[47][20]:%.17g) $(c_snapg[47][21]:%.17g) $(c_snapg[47][22]:%.17g) $(c_snapg[47][23]:%.17g) $(c_snapg[47][24]:%.17g) $(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
print "$(c_snapg[48][1]:%.17g) $(c_snapg[48][2]:%.17g) $(c_snapg[48][3]:%.17g) $(c_snapg[48][4]:%.17g) $(c_snapg[48][5]:%.17g) $(c_snapg[48][6]:%.17g) $(c_snapg[48][7]:%.17g) $(c_snapg[48][8]:%.17g) $(c_snapg[48][9]:%.17g) $(c_snapg[48][10]:%.17g) $(c_snapg[48][11]:%.17g) $(c_snapg[48][12]:%.17g) $(c_snapg[48][13]:%.17g) $(c_snapg[48][14]:%.17g) $(c_snapg[48][15]:%.17g) $(c_snapg[48][16]:%.17g) $(c_snapg[48][17]:%.17g) $(c_snapg[48][18]:%.17g) $(c_snapg[48][19]:%.17g) $(c_snapg[48][20]:%.17g) $(c_snapg[48][21]:%.17g) $(c_snapg[48][22]:%.17g) $(c_snapg[48][23]:%.17g) $(c_snapg[48][24]:%.17g) $(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
print "$(c_snapg[49][1]:%.17g) $(c_snapg[49][2]:%.17g) $(c_snapg[49][3]:%.17g) $(c_snapg[49][4]:%.17g) $(c_snapg[49][5]:%.17g) $(c_snapg[49][6]:%.17g) $(c_snapg[49][7]:%.17g) $(c_snapg[49][8]:%.17g) $(c_snapg[49][9]:%.17g) $(c_snapg[49][10]:%.17g) $(c_snapg[49][11]:%.17g) $(c_snapg[49][12]:%.17g) $(c_snapg[49][13]:%.17g) $(c_snapg[49][14]:%.17g) $(c_snapg[49][15]:%.17g) $(c_snapg[49][16]:%.17g) $(c_snapg[49][17]:%.17g) $(c_snapg[49][18]:%.17g) $(c_snapg[49][19]:%.17g) $(c_snapg[49][20]:%.17g) $(c_snapg[49][21]:%.17g) $(c_snapg[49][22]:%.17g) $(c_snapg[49][23]:%.17g) $(c_snapg[49][24]:%.17g) $(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
print "$(c_snapg[50][1]:%.17g) $(c_snapg[50][2]:%.17g) $(c_snapg[50][3]:%.17g) $(c_snapg[50][4]:%.17g) $(c_snapg[50][5]:%.17g) $(c_snapg[50][6]:%.17g) $(c_snapg[50][7]:%.17g) $(c_snapg[50][8]:%.17g) $(c_snapg[50][9]:%.17g) $(c_snapg[50][10]:%.17g) $(c_snapg[50][11]:%.17g) $(c_snapg[50][12]:%.17g) $(c_snapg[50][13]:%.17g) $(c_snapg[50][14]:%.17g) $(c_snapg[50][15]:%.17g) $(c_snapg[50][16]:%.17g) $(c_snapg[50][17]:%.17g) $(c_snapg[50][18]:%.17g) $(c_snapg[50][19]:%.17g) $(c_snapg[50][20]:%.17g) $(c_snapg[50][21]:%.17g) $(c_snapg[50][22]:%.17g) $(c_snapg[50][23]:%.17g) $(c_snapg[50][24]:%.17g) $(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
print "$(c_snapg[51][1]:%.17g) $(c_snapg[51][2]:%.17g) $(c_snapg[51][3]:%.17g) $(c_snapg[51][4]:%.17g) $(c_snapg[51][5]:%.17g) $(c_snapg[51][6]:%.17g) $(c_snapg[51][7]:%.17g) $(c_snapg[51][8]:%.17g) $(c_snapg[51][9]:%.17g) $(c_snapg[51][10]:%.17g) $(c_snapg[51][11]:%.17g) $(c_snapg[51][12]:%.17g) $(c_snapg[51][13]:%.17g) $(c_snapg[51][14]:%.17g) $(c_snapg[51][15]:%.17g) $(c_snapg[51][16]:%.17g) $(c_snapg[51][17]:%.17g) $(c_snapg[51][18]:%.17g) $(c_snapg[51][19]:%.17g) $(c_snapg[51][20]:%.17g) $(c_snapg[51][21]:%.17g) $(c_snapg[51][22]:%.17g) $(c_snapg[51][23]:%.17g) $(c_snapg[51][24]:%.17g) $(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
print "$(c_snapg[52][1]:%.17g) $(c_snapg[52][2]:%.17g) $(c_snapg[52][3]:%.17g) $(c_snapg[52][4]:%.17g) $(c_snapg[52][5]:%.17g) $(c_snapg[52][6]:%.17g) $(c_snapg[52][7]:%.17g) $(c_snapg[52][8]:%.17g) $(c_snapg[52][9]:%.17g) $(c_snapg[52][10]:%.17g) $(c_snapg[52][11]:%.17g) $(c_snapg[52][12]:%.17g) $(c_snapg[52][13]:%.17g) $(c_snapg[52][14]:%.17g) $(c_snapg[52][15]:%.17g) $(c_snapg[52][16]:%.17g) $(c_snapg[52][17]:%.17g) $(c_snapg[52][18]:%.17g) $(c_snapg[52][19]:%.17g) $(c_snapg[52][20]:%.17g) $(c_snapg[52][21]:%.17g) $(c_snapg[52][22]:%.17g) $(c_snapg[52][23]:%.17g) $(c_snapg[52][24]:%.17g) $(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
print "$(c_snapg[53][1]:%.17g) $(c_snapg[53][2]:%.17g) $(c_snapg[53][3]:%.17g) $(c_snapg[53][4]:%.17g) $(c_snapg[53][5]:%.17g) $(c_snapg[53][6]:%.17g) $(c_snapg[53][7]:%.17g) $(c_snapg[53][8]:%.17g) $(c_snapg[53][9]:%.17g) $(c_snapg[53][10]:%.17g) $(c_snapg[53][11]:%.17g) $(c_snapg[53][12]:%.17g) $(c_snapg[53][13]:%.17g) $(c_snapg[53][14]:%.17g) $(c_snapg[53][15]:%.17g) $(c_snapg[53][16]:%.17g) $(c_snapg[53][17]:%.17g) $(c_snapg[53][18]:%.17g) $(c_snapg[53][19]:%.17g) $(c_snapg[53][20]:%.17g) $(c_snapg[53][21]:%.17g) $(c_snapg[53][22]:%.17g) $(c_snapg[53][23]:%.17g) $(c_snapg[53][24]:%.17g) $(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
print "$(c_snapg[54][1]:%.17g) $(c_snapg[54][2]:%.17g) $(c_snapg[54][3]:%.17g) $(c_snapg[54][4]:%.17g) $(c_snapg[54][5]:%.17g) $(c_snapg[54][6]:%.17g) $(c_snapg[54][7]:%.17g) $(c_snapg[54][8]:%.17g) $(c_snapg[54][9]:%.17g) $(c_snapg[54][10]:%.17g) $(c_snapg[54][11]:%.17g) $(c_snapg[54][12]:%.17g) $(c_snapg[54][13]:%.17g) $(c_snapg[54][14]:%.17g) $(c_snapg[54][15]:%.17g) $(c_snapg[54][16]:%.17g) $(c_snapg[54][17]:%.17g) $(c_snapg[54][18]:%.17g) $(c_snapg[54][19]:%.17g) $(c_snapg[54][20]:%.17g) $(c_snapg[54][21]:%.17g) $(c_snapg[54][22]:%.17g) $(c_snapg[54][23]:%.17g) $(c_snapg[54][24]:%.17g) $(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
print "$(c_snapg[55][1]:%.17g) $(c_snapg[55][2]:%.17g) $(c_snapg[55][3]:%.17g) $(c_snapg[55][4]:%.17g) $(c_snapg[55][5]:%.17g) $(c_snapg[55][6]:%.17g) $(c_snapg[55][7]:%.17g) $(c_snapg[55][8]:%.17g) $(c_snapg[55][9]:%.17g) $(c_snapg[55][10]:%.17g) $(c_snapg[55][11]:%.17g) $(c_snapg[55][12]:%.17g) $(c_snapg[55][13]:%.17g) $(c_snapg[55][14]:%.17g) $(c_snapg[55][15]:%.17g) $(c_snapg[55][16]:%.17g) $(c_snapg[55][17]:%.17g) $(c_snapg[55][18]:%.17g) $(c_snapg[55][19]:%.17g) $(c_snapg[55][20]:%.17g) $(c_snapg[55][21]:%.17g) $(c_snapg[55][22]:%.17g) $(c_snapg[55][23]:%.17g) $(c_snapg[55][24]:%.17g) $(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
print "$(c_snapg[56][1]:%.17g) $(c_snapg[56][2]:%.17g) $(c_snapg[56][3]:%.17g) $(c_snapg[56][4]:%.17g) $(c_snapg[56][5]:%.17g) $(c_snapg[56][6]:%.17g) $(c_snapg[56][7]:%.17g) $(c_snapg[56][8]:%.17g) $(c_snapg[56][9]:%.17g) $(c_snapg[56][10]:%.17g) $(c_snapg[56][11]:%.17g) $(c_snapg[56][12]:%.17g) $(c_snapg[56][13]:%.17g) $(c_snapg[56][14]:%.17g) $(c_snapg[56][15]:%.17g) $(c_snapg[56][16]:%.17g) $(c_snapg[56][17]:%.17g) $(c_snapg[56][18]:%.17g) $(c_snapg[56][19]:%.17g) $(c_snapg[56][20]:%.17g) $(c_snapg[56][21]:%.17g) $(c_snapg[56][22]:%.17g) $(c_snapg[56][23]:%.17g) $(c_snapg[56][24]:%.17g) $(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
print "$(c_snapg[57][1]:%.17g) $(c_snapg[57][2]:%.17g) $(c_snapg[57][3]:%.17g) $(c_snapg[57][4]:%.17g) $(c_snapg[57][5]:%.17g) $(c_snapg[57][6]:%.17g) $(c_snapg[57][7]:%.17g) $(c_snapg[57][8]:%.17g) $(c_snapg[57][9]:%.17g) $(c_snapg[57][10]:%.17g) $(c_snapg[57][11]:%.17g) $(c_snapg[57][12]:%.17g) $(c_snapg[57][13]:%.17g) $(c_snapg[57][14]:%.17g) $(c_snapg[57][15]:%.17g) $(c_snapg[57][16]:%.17g) $(c_snapg[57][17]:%.17g) $(c_snapg[57][18]:%.17g) $(c_snapg[57][19]:%.17g) $(c_snapg[57][20]:%.17g) $(c_snapg[57][21]:%.17g) $(c_snapg[57][22]:%.17g) $(c_snapg[57][23]:%.17g) $(c_snapg[57][24]:%.17g) $(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
print "$(c_snapg[58][1]:%.17g) $(c_snapg[58][2]:%.17g) $(c_snapg[58][3]:%.17g) $(c_snapg[58][4]:%.17g) $(c_snapg[58][5]:%.17g) $(c_snapg[58][6]:%.17g) $(c_snapg[58][7]:%.17g) $(c_snapg[58][8]:%.17g) $(c_snapg[58][9]:%.17g) $(c_snapg[58][10]:%.17g) $(c_snapg[58][11]:%.17g) $(c_snapg[58][12]:%.17g) $(c_snapg[58][13]:%.17g) $(c_snapg[58][14]:%.17g) $(c_snapg[58][15]:%.17g) $(c_snapg[58][16]:%.17g) $(c_snapg[58][17]:%.17g) $(c_snapg[58][18]:%.17g) $(c_snapg[58][19]:%.17g) $(c_snapg[58][20]:%.17g) $(c_snapg[58][21]:%.17g) $(c_snapg[58][22]:%.17g) $(c_snapg[58][23]:%.17g) $(c_snapg[58][24]:%.17g) $(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
print "$(c_snapg[59][1]:%.17g) $(c_snapg[59][2]:%.17g) $(c_snapg[59][3]:%.17g) $(c_snapg[59][4]:%.17g) $(c_snapg[59][5]:%.17g) $(c_snapg[59][6]:%.17g) $(c_snapg[59][7]:%.17g) $(c_snapg[59][8]:%.17g) $(c_snapg[59][9]:%.17g) $(c_snapg[59][10]:%.17g) $(c_snapg[59][11]:%.17g) $(c_snapg[59][12]:%.17g) $(c_snapg[59][13]:%.17g) $(c_snapg[59][14]:%.17g) $(c_snapg[59][15]:%.17g) $(c_snapg[59][16]:%.17g) $(c_snapg[59][17]:%.17g) $(c_snapg[59][18]:%.17g) $(c_snapg[59][19]:%.17g) $(c_snapg[59][20]:%.17g) $(c_snapg[59][21]:%.17g) $(c_snapg[59][22]:%.17g) $(c_snapg[59][23]:%.17g) $(c_snapg[59][24]:%.17g) $(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
print "$(c_snapg[60][1]:%.17g) $(c_snapg[60][2]:%.17g) $(c_snapg[60][3]:%.17g) $(c_snapg[60][4]:%.17g) $(c_snapg[60][5]:%.17g) $(c_snapg[60][6]:%.17g) $(c_snapg[60][7]:%.17g) $(c_snapg[60][8]:%.17g) $(c_snapg[60][9]:%.17g) $(c_snapg[60][10]:%.17g) $(c_snapg[60][11]:%.17g) $(c_snapg[60][12]:%.17g) $(c_snapg[60][13]:%.17g) $(c_snapg[60][14]:%.17g) $(c_snapg[60][15]:%.17g) $(c_snapg[60][16]:%.17g) $(c_snapg[60][17]:%.17g) $(c_snapg[60][18]:%.17g) $(c_snapg[60][19]:%.17g) $(c_snapg[60][20]:%.17g) $(c_snapg[60][21]:%.17g) $(c_snapg[60][22]:%.17g) $(c_snapg[60][23]:%.17g) $(c_snapg[60][24]:%.17g) $(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
print "$(c_snapg[61][1]:%.17g) $(c_snapg[61][2]:%.17g) $(c_snapg[61][3]:%.17g) $(c_snapg[61][4]:%.17g) $(c_snapg[61][5]:%.17g) $(c_snapg[61][6]:%.17g) $(c_snapg[61][7]:%.17g) $(c_snapg[61][8]:%.17g) $(c_snapg[61][9]:%.17g) $(c_snapg[61][10]:%.17g) $(c_snapg[61][11]:%.17g) $(c_snapg[61][12]:%.17g) $(c_snapg[61][13]:%.17g) $(c_snapg[61][14]:%.17g) $(c_snapg[61][15]:%.17g) $(c_snapg[61][16]:%.17g) $(c_snapg[61][17]:%.17g) $(c_snapg[61][18]:%.17g) $(c_snapg[61][19]:%.17g) $(c_snapg[61][20]:%.17g) $(c_snapg[61][21]:%.17g) $(c_snapg[61][22]:%.17g) $(c_snapg[61][23]:%.17g) $(c_snapg[61][24]:%.17g) $(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
print "$(c_snapg[62][1]:%.17g) $(c_snapg[62][2]:%.17g) $(c_snapg[62][3]:%.17g) $(c_snapg[62][4]:%.17g) $(c_snapg[62][5]:%.17g) $(c_snapg[62][6]:%.17g) $(c_snapg[62][7]:%.17g) $(c_snapg[62][8]:%.17g) $(c_snapg[62][9]:%.17g) $(c_snapg[62][10]:%.17g) $(c_snapg[62][11]:%.17g) $(c_snapg[62][12]:%.17g) $(c_snapg[62][13]:%.17g) $(c_snapg[62][14]:%.17g) $(c_snapg[62][15]:%.17g) $(c_snapg[62][16]:%.17g) $(c_snapg[62][17]:%.17g) $(c_snapg[62][18]:%.17g) $(c_snapg[62][19]:%.17g) $(c_snapg[62][20]:%.17g) $(c_snapg[62][21]:%.17g) $(c_snapg[62][22]:%.17g) $(c_snapg[62][23]:%.17g) $(c_snapg[62][24]:%.17g) $(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
print "$(c_snapg[63][1]:%.17g) $(c_snapg[63][2]:%.17g) $(c_snapg[63][3]:%.17g) $(c_snapg[63][4]:%.17g) $(c_snapg[63][5]:%.17g) $(c_snapg[63][6]:%.17g) $(c_snapg[63][7]:%.17g) $(c_snapg[63][8]:%.17g) $(c_snapg[63][9]:%.17g) $(c_snapg[63][10]:%.17g) $(c_snapg[63][11]:%.17g) $(c_snapg[63][12]:%.17g) $(c_snapg[63][13]:%.17g) $(c_snapg[63][14]:%.17g) $(c_snapg[63][15]:%.17g) $(c_snapg[63][16]:%.17g) $(c_snapg[63][17]:%.17g) $(c_snapg[63][18]:%.17g) $(c_snapg[63][19]:%.17g) $(c_snapg[63][20]:%.17g) $(c_snapg[63][21]:%.17g) $(c_snapg[63][22]:%.17g) $(c_snapg[63][23]:%.17g) $(c_snapg[63][24]:%.17g) $(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
print "$(c_snapg[64][1]:%.17g) $(c_snapg[64][2]:%.17g) $(c_snapg[64][3]:%.17g) $(c_snapg[64][4]:%.17g) $(c_snapg[64][5]:%.17g) $(c_snapg[64][6]:%.17g) $(c_snapg[64][7]:%.17g) $(c_snapg[64][8]:%.17g) $(c_snapg[64][9]:%.17g) $(c_snapg[64][10]:%.17g) $(c_snapg[64][11]:%.17g) $(c_snapg[64][12]:%.17g) $(c_snapg[64][13]:%.17g) $(c_snapg[64][14]:%.17g) $(c_snapg[64][15]:%.17g) $(c_snapg[64][16]:%.17g) $(c_snapg[64][17]:%.17g) $(c_snapg[64][18]:%.17g) $(c_snapg[64][19]:%.17g) $(c_snapg[64][20]:%.17g) $(c_snapg[64][21]:%.17g) $(c_snapg[64][22]:%.17g) $(c_snapg[64][23]:%.17g) $(c_snapg[64][24]:%.17g) $(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
print "$(c_snapg[65][1]:%.17g) $(c_snapg[65][2]:%.17g) $(c_snapg[65][3]:%.17g) $(c_snapg[65][4]:%.17g) $(c_snapg[65][5]:%.17g) $(c_snapg[65][6]:%.17g) $(c_snapg[65][7]:%.17g) $(c_snapg[65][8]:%.17g) $(c_snapg[65][9]:%.17g) $(c_snapg[65][10]:%.17g) $(c_snapg[65][11]:%.17g) $(c_snapg[65][12]:%.17g) $(c_snapg[65][13]:%.17g) $(c_snapg[65][14]:%.17g) $(c_snapg[65][15]:%.17g) $(c_snapg[65][16]:%.17g) $(c_snapg[65][17]:%.17g) $(c_snapg[65][18]:%.17g) $(c_snapg[65][19]:%.17g) $(c_snapg[65][20]:%.17g) $(c_snapg[65][21]:%.17g) $(c_snapg[65][22]:%.17g) $(c_snapg[65][23]:%.17g) $(c_snapg[65][24]:%.17g) $(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
print "$(c_snapg[66][1]:%.17g) $(c_snapg[66][2]:%.17g) $(c_snapg[66][3]:%.17g) $(c_snapg[66][4]:%.17g) $(c_snapg[66][5]:%.17g) $(c_snapg[66][6]:%.17g) $(c_snapg[66][7]:%.17g) $(c_snapg[66][8]:%.17g) $(c_snapg[66][9]:%.17g) $(c_snapg[66][10]:%.17g) $(c_snapg[66][11]:%.17g) $(c_snapg[66][12]:%.17g) $(c_snapg[66][13]:%.17g) $(c_snapg[66][14]:%.17g) $(c_snapg[66][15]:%.17g) $(c_snapg[66][16]:%.17g) $(c_snapg[66][17]:%.17g) $(c_snapg[66][18]:%.17g) $(c_snapg[66][19]:%.17g) $(c_snapg[66][20]:%.17g) $(c_snapg[66][21]:%.17g) $(c_snapg[66][22]:%.17g) $(c_snapg[66][23]:%.17g) $(c_snapg[66][24]:%.17g) $(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
print "$(c_snapg[67][1]:%.17g) $(c_snapg[67][2]:%.17g) $(c_snapg[67][3]:%.17g) $(c_snapg[67][4]:%.17g) $(c_snapg[67][5]:%.17g) $(c_snapg[67][6]:%.17g) $(c_snapg[67][7]:%.17g) $(c_snapg[67][8]:%.17g) $(c_snapg[67][9]:%.17g) $(c_snapg[67][10]:%.17g) $(c_snapg[67][11]:%.17g) $(c_snapg[67][12]:%.17g) $(c_snapg[67][13]:%.17g) $(c_snapg[67][14]:%.17g) $(c_snapg[67][15]:%.17g) $(c_snapg[67][16]:%.17g) $(c_snapg[67][17]:%.17g) $(c_snapg[67][18]:%.17g) $(c_snapg[67][19]:%.17g) $(c_snapg[67][20]:%.17g) $(c_snapg[67][21]:%.17g) $(c_snapg[67][22]:%.17g) $(c_snapg[67][23]:%.17g) $(c_snapg[67][24]:%.17g) $(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
print "$(c_snapg[68][1]:%.17g) $(c_snapg[68][2]:%.17g) $(c_snapg[68][3]:%.17g) $(c_snapg[68][4]:%.17g) $(c_snapg[68][5]:%.17g) $(c_snapg[68][6]:%.17g) $(c_snapg[68][7]:%.17g) $(c_snapg[68][8]:%.17g) $(c_snapg[68][9]:%.17g) $(c_snapg[68][10]:%.17g) $(c_snapg[68][11]:%.17g) $(c_snapg[68][12]:%.17g) $(c_snapg[68][13]:%.17g) $(c_snapg[68][14]:%.17g) $(c_snapg[68][15]:%.17g) $(c_snapg[68][16]:%.17g) $(c_snapg[68][17]:%.17g) $(c_snapg[68][18]:%.17g) $(c_snapg[68][19]:%.17g) $(c_snapg[68][20]:%.17g) $(c_snapg[68][21]:%.17g) $(c_snapg[68][22]:%.17g) $(c_snapg[68][23]:%.17g) $(c_snapg[68][24]:%.17g) $(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
print "$(c_snapg[69][1]:%.17g) $(c_snapg[69][2]:%.17g) $(c_snapg[69][3]:%.17g) $(c_snapg[69][4]:%.17g) $(c_snapg[69][5]:%.17g) $(c_snapg[69][6]:%.17g) $(c_snapg[69][7]:%.17g) $(c_snapg[69][8]:%.17g) $(c_snapg[69][9]:%.17g) $(c_snapg[69][10]:%.17g) $(c_snapg[69][11]:%.17g) $(c_snapg[69][12]:%.17g) $(c_snapg[69][13]:%.17g) $(c_snapg[69][14]:%.17g) $(c_snapg[69][15]:%.17g) $(c_snapg[69][16]:%.17g) $(c_snapg[69][17]:%.17g) $(c_snapg[69][18]:%.17g) $(c_snapg[69][19]:%.17g) $(c_snapg[69][20]:%.17g) $(c_snapg[69][21]:%.17g) $(c_snapg[69][22]:%.17g) $(c_snapg[69][23]:%.17g) $(c_snapg[69][24]:%.17g) $(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
print "$(c_snapg[70][1]:%.17g) $(c_snapg[70][2]:%.17g) $(c_snapg[70][3]:%.17g) $(c_snapg[70][4]:%.17g) $(c_snapg[70][5]:%.17g) $(c_snapg[70][6]:%.17g) $(c_snapg[70][7]:%.17g) $(c_snapg[70][8]:%.17g) $(c_snapg[70][9]:%.17g) $(c_snapg[70][10]:%.17g) $(c_snapg[70][11]:%.17g) $(c_snapg[70][12]:%.17g) $(c_snapg[70][13]:%.17g) $(c_snapg[70][14]:%.17g) $(c_snapg[70][15]:%.17g) $(c_snapg[70][16]:%.17g) $(c_snapg[70][17]:%.17g) $(c_snapg[70][18]:%.17g) $(c_snapg[70][19]:%.17g) $(c_snapg[70][20]:%.17g) $(c_snapg[70][21]:%.17g) $(c_snapg[70][22]:%.17g) $(c_snapg[70][23]:%.17g) $(c_snapg[70][24]:%.17g) $(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
print "$(c_snapg[71][1]:%.17g) $(c_snapg[71][2]:%.17g) $(c_snapg[71][3]:%.17g) $(c_snapg[71][4]:%.17g) $(c_snapg[71][5]:%.17g) $(c_snapg[71][6]:%.17g) $(c_snapg[71][7]:%.17g) $(c_snapg[71][8]:%.17g) $(c_snapg[71][9]:%.17g) $(c_snapg[71][10]:%.17g) $(c_snapg[71][11]:%.17g) $(c_snapg[71][12]:%.17g) $(c_snapg[71][13]:%.17g) $(c_snapg[71][14]:%.17g) $(c_snapg[71][15]:%.17g) $(c_snapg[71][16]:%.17g) $(c_snapg[71][17]:%.17g) $(c_snapg[71][18]:%.17g) $(c_snapg[71][19]:%.17g) $(c_snapg[71][20]:%.17g) $(c_snapg[71][21]:%.17g) $(c_snapg[71][22]:%.17g) $(c_snapg[71][23]:%.17g) $(c_snapg[71][24]:%.17g) $(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
print "$(c_snapg[72][1]:%.17g) $(c_snapg[72][2]:%.17g) $(c_snapg[72][3]:%.17g) $(c_snapg[72][4]:%.17g) $(c_snapg[72][5]:%.17g) $(c_snapg[72][6]:%.17g) $(c_snapg[72][7]:%.17g) $(c_snapg[72][8]:%.17g) $(c_snapg[72][9]:%.17g) $(c_snapg[72][10]:%.17g) $(c_snapg[72][11]:%.17g) $(c_snapg[72][12]:%.17g) $(c_snapg[72][13]:%.17g) $(c_snapg[72][14]:%.17g) $(c_snapg[72][15]:%.17g) $(c_snapg[72][16]:%.17g) $(c_snapg[72][17]:%.17g) $(c_snapg[72][18]:%.17g) $(c_snapg[72][19]:%.17g) $(c_snapg[72][20]:%.17g) $(c_snapg[72][21]:%.17g) $(c_snapg[72][22]:%.17g) $(c_snapg[72][23]:%.17g) $(c_snapg[72][24]:%.17g) $(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
print "$(c_snapg[73][1]:%.17g) $(c_snapg[73][2]:%.17g) $(c_snapg[73][3]:%.17g) $(c_snapg[73][4]:%.17g) $(c_snapg[73][5]:%.17g) $(c_snapg[73][6]:%.17g) $(c_snapg[73][7]:%.17g) $(c_snapg[73][8]:%.17g) $(c_snapg[73][9]:%.17g) $(c_snapg[73][10]:%.17g) $(c_snapg[73][11]:%.17g) $(c_snapg[73][12]:%.17g) $(c_snapg[73][13]:%.17g) $(c_snapg[73][14]:%.17g) $(c_snapg[73][15]:%.17g) $(c_snapg[73][16]:%.17g) $(c_snapg[73][17]:%.17g) $(c_snapg[73][18]:%.17g) $(c_snapg[73][19]:%.17g) $(c_snapg[73][20]:%.17g) $(c_snapg[73][21]:%.17g) $(c_snapg[73][22]:%.17g) $(c_snapg[73][23]:%.17g) $(c_snapg[73][24]:%.17g) $(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
print "$(c_snapg[74][1]:%.17g) $(c_snapg[74][2]:%.17g) $(c_snapg[74][3]:%.17g) $(c_snapg[74][4]:%.17g) $(c_snapg[74][5]:%.17g) $(c_snapg[74][6]:%.17g) $(c_snapg[74][7]:%.17g) $(c_snapg[74][8]:%.17g) $(c_snapg[74][9]:%.17g) $(c_snapg[74][10]:%.17g) $(c_snapg[74][11]:%.17g) $(c_snapg[74][12]:%.17g) $(c_snapg[74][13]:%.17g) $(c_snapg[74][14]:%.17g) $(c_snapg[74][15]:%.17g) $(c_snapg[74][16]:%.17g) $(c_snapg[74][17]:%.17g) $(c_snapg[74][18]:%.17g) $(c_snapg[74][19]:%.17g) $(c_snapg[74][20]:%.17g) $(c_snapg[74][21]:%.17g) $(c_snapg[74][22]:%.17g) $(c_snapg[74][23]:%.17g) $(c_snapg[74][24]:%.17g) $(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
print "$(c_snapg[75][1]:%.17g) $(c_snapg[75][2]:%.17g) $(c_snapg[75][3]:%.17g) $(c_snapg[75][4]:%.17g) $(c_snapg[75][5]:%.17g) $(c_snapg[75][6]:%.17g) $(c_snapg[75][7]:%.17g) $(c_snapg[75][8]:%.17g) $(c_snapg[75][9]:%.17g) $(c_snapg[75][10]:%.17g) $(c_snapg[75][11]:%.17g) $(c_snapg[75][12]:%.17g) $(c_snapg[75][13]:%.17g) $(c_snapg[75][14]:%.17g) $(c_snapg[75][15]:%.17g) $(c_snapg[75][16]:%.17g) $(c_snapg[75][17]:%.17g) $(c_snapg[75][18]:%.17g) $(c_snapg[75][19]:%.17g) $(c_snapg[75][20]:%.17g) $(c_snapg[75][21]:%.17g) $(c_snapg[75][22]:%.17g) $(c_snapg[75][23]:%.17g) $(c_snapg[75][24]:%.17g) $(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
print "$(c_snapg[76][1]:%.17g) $(c_snapg[76][2]:%.17g) $(c_snapg[76][3]:%.17g) $(c_snapg[76][4]:%.17g) $(c_snapg[76][5]:%.17g) $(c_snapg[76][6]:%.17g) $(c_snapg[76][7]:%.17g) $(c_snapg[76][8]:%.17g) $(c_snapg[76][9]:%.17g) $(c_snapg[76][10]:%.17g) $(c_snapg[76][11]:%.17g) $(c_snapg[76][12]:%.17g) $(c_snapg[76][13]:%.17g) $(c_snapg[76][14]:%.17g) $(c_snapg[76][15]:%.17g) $(c_snapg[76][16]:%.17g) $(c_snapg[76][17]:%.17g) $(c_snapg[76][18]:%.17g) $(c_snapg[76][19]:%.17g) $(c_snapg[76][20]:%.17g) $(c_snapg[76][21]:%.17g) $(c_snapg[76][22]:%.17g) $(c_snapg[76][23]:%.17g) $(c_snapg[76][24]:%.17g) $(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
print "$(c_snapg[77][1]:%.17g) $(c_snapg[77][2]:%.17g) $(c_snapg[77][3]:%.17g) $(c_snapg[77][4]:%.17g) $(c_snapg[77][5]:%.17g) $(c_snapg[77][6]:%.17g) $(c_snapg[77][7]:%.17g) $(c_snapg[77][8]:%.17g) $(c_snapg[77][9]:%.17g) $(c_snapg[77][10]:%.17g) $(c_snapg[77][11]:%.17g) $(c_snapg[77][12]:%.17g) $(c_snapg[77][13]:%.17g) $(c_snapg[77][14]:%.17g) $(c_snapg[77][15]:%.17g) $(c_snapg[77][16]:%.17g) $(c_snapg[77][17]:%.17g) $(c_snapg[77][18]:%.17g) $(c_snapg[77][19]:%.17g) $(c_snapg[77][20]:%.17g) $(c_snapg[77][21]:%.17g) $(c_snapg[77][22]:%.17g) $(c_snapg[77][23]:%.17g) $(c_snapg[77][24]:%.17g) $(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
print "$(c_snapg[78][1]:%.17g) $(c_snapg[78][2]:%.17g) $(c_snapg[78][3]:%.17g) $(c_snapg[78][4]:%.17g) $(c_snapg[78][5]:%.17g) $(c_snapg[78][6]:%.17g) $(c_snapg[78][7]:%.17g) $(c_snapg[78][8]:%.17g) $(c_snapg[78][9]:%.17g) $(c_snapg[78][10]:%.17g) $(c_snapg[78][11]:%.17g) $(c_snapg[78][12]:%.17g) $(c_snapg[78][13]:%.17g) $(c_snapg[78][14]:%.17g) $(c_snapg[78][15]:%.17g) $(c_snapg[78][16]:%.17g) $(c_snapg[78][17]:%.17g) $(c_snapg[78][18]:%.17g) $(c_snapg[78][19]:%.17g) $(c_snapg[78][20]:%.17g) $(c_snapg[78][21]:%.17g) $(c_snapg[78][22]:%.17g) $(c_snapg[78][23]:%.17g) $(c_snapg[78][24]:%.17g) $(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
print "$(c_snapg[79][1]:%.17g) $(c_snapg[79][2]:%.17g) $(c_snapg[79][3]:%.17g) $(c_snapg[79][4]:%.17g) $(c_snapg[79][5]:%.17g) $(c_snapg[79][6]:%.17g) $(c_snapg[79][7]:%.17g) $(c_snapg[79][8]:%.17g) $(c_snapg[79][9]:%.17g) $(c_snapg[79][10]:%.17g) $(c_snapg[79][11]:%.17g) $(c_snapg[79][12]:%.17g) $(c_snapg[79][13]:%.17g) $(c_snapg[79][14]:%.17g) $(c_snapg[79][15]:%.17g) $(c_snapg[79][16]:%.17g) $(c_snapg[79][17]:%.17g) $(c_snapg[79][18]:%.17g) $(c_snapg[79][19]:%.17g) $(c_snapg[79][20]:%.17g) $(c_snapg[79][21]:%.17g) $(c_snapg[79][22]:%.17g) $(c_snapg[79][23]:%.17g) $(c_snapg[79][24]:%.17g) $(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
print "$(c_snapg[80][1]:%.17g) $(c_snapg[80][2]:%.17g) $(c_snapg[80][3]:%.17g) $(c_snapg[80][4]:%.17g) $(c_snapg[80][5]:%.17g) $(c_snapg[80][6]:%.17g) $(c_snapg[80][7]:%.17g) $(c_snapg[80][8]:%.17g) $(c_snapg[80][9]:%.17g) $(c_snapg[80][10]:%.17g) $(c_snapg[80][11]:%.17g) $(c_snapg[80][12]:%.17g) $(c_snapg[80][13]:%.17g) $(c_snapg[80][14]:%.17g) $(c_snapg[80][15]:%.17g) $(c_snapg[80][16]:%.17g) $(c_snapg[80][17]:%.17g) $(c_snapg[80][18]:%.17g) $(c_snapg[80][19]:%.17g) $(c_snapg[80][20]:%.17g) $(c_snapg[80][21]:%.17g) $(c_snapg[80][22]:%.17g) $(c_snapg[80][23]:%.17g) $(c_snapg[80][24]:%.17g) $(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
print "$(c_snapg[81][1]:%.17g) $(c_snapg[81][2]:%.17g) $(c_snapg[81][3]:%.17g) $(c_snapg[81][4]:%.17g) $(c_snapg[81][5]:%.17g) $(c_snapg[81][6]:%.17g) $(c_snapg[81][7]:%.17g) $(c_snapg[81][8]:%.17g) $(c_snapg[81][9]:%.17g) $(c_snapg[81][10]:%.17g) $(c_snapg[81][11]:%.17g) $(c_snapg[81][12]:%.17g) $(c_snapg[81][13]:%.17g) $(c_snapg[81][14]:%.17g) $(c_snapg[81][15]:%.17g) $(c_snapg[81][16]:%.17g) $(c_snapg[81][17]:%.17g) $(c_snapg[81][18]:%.17g) $(c_snapg[81][19]:%.17g) $(c_snapg[81][20]:%.17g) $(c_snapg[81][21]:%.17g) $(c_snapg[81][22]:%.17g) $(c_snapg[81][23]:%.17g) $(c_snapg[81][24]:%.17g) $(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
print "$(c_snapg[82][1]:%.17g) $(c_snapg[82][2]:%.17g) $(c_snapg[82][3]:%.17g) $(c_snapg[82][4]:%.17g) $(c_snapg[82][5]:%.17g) $(c_snapg[82][6]:%.17g) $(c_snapg[82][7]:%.17g) $(c_snapg[82][8]:%.17g) $(c_snapg[82][9]:%.17g) $(c_snapg[82][10]:%.17g) $(c_snapg[82][11]:%.17g) $(c_snapg[82][12]:%.17g) $(c_snapg[82][13]:%.17g) $(c_snapg[82][14]:%.17g) $(c_snapg[82][15]:%.17g) $(c_snapg[82][16]:%.17g) $(c_snapg[82][17]:%.17g) $(c_snapg[82][18]:%.17g) $(c_snapg[82][19]:%.17g) $(c_snapg[82][20]:%.17g) $(c_snapg[82][21]:%.17g) $(c_snapg[82][22]:%.17g) $(c_snapg[82][23]:%.17g) $(c_snapg[82][24]:%.17g) $(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
print "$(c_snapg[83][1]:%.17g) $(c_snapg[83][2]:%.17g) $(c_snapg[83][3]:%.17g) $(c_snapg[83][4]:%.17g) $(c_snapg[83][5]:%.17g) $(c_snapg[83][6]:%.17g) $(c_snapg[83][7]:%.17g) $(c_snapg[83][8]:%.17g) $(c_snapg[83][9]:%.17g) $(c_snapg[83][10]:%.17g) $(c_snapg[83][11]:%.17g) $(c_snapg[83][12]:%.17g) $(c_snapg[83][13]:%.17g) $(c_snapg[83][14]:%.17g) $(c_snapg[83][15]:%.17g) $(c_snapg[83][16]:%.17g) $(c_snapg[83][17]:%.17g) $(c_snapg[83][18]:%.17g) $(c_snapg[83][19]:%.17g) $(c_snapg[83][20]:%.17g) $(c_snapg[83][21]:%.17g) $(c_snapg[83][22]:%.17g) $(c_snapg[83][23]:%.17g) $(c_snapg[83][24]:%.17g) $(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
print "$(c_snapg[84][1]:%.17g) $(c_snapg[84][2]:%.17g) $(c_snapg[84][3]:%.17g) $(c_snapg[84][4]:%.17g) $(c_snapg[84][5]:%.17g) $(c_snapg[84][6]:%.17g) $(c_snapg[84][7]:%.17g) $(c_snapg[84][8]:%.17g) $(c_snapg[84][9]:%.17g) $(c_snapg[84][10]:%.17g) $(c_snapg[84][11]:%.17g) $(c_snapg[84][12]:%.17g) $(c_snapg[84][13]:%.17g) $(c_snapg[84][14]:%.17g) $(c_snapg[84][15]:%.17g) $(c_snapg[84][16]:%.17g) $(c_snapg[84][17]:%.17g) $(c_snapg[84][18]:%.17g) $(c_snapg[84][19]:%.17g) $(c_snapg[84][20]:%.17g) $(c_snapg[84][21]:%.17g) $(c_snapg[84][22]:%.17g) $(c_snapg[84][23]:%.17g) $(c_snapg[84][24]:%.17g) $(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
print "$(c_snapg[85][1]:%.17g) $(c_snapg[85][2]:%.17g) $(c_snapg[85][3]:%.17g) $(c_snapg[85][4]:%.17g) $(c_snapg[85][5]:%.17g) $(c_snapg[85][6]:%.17g) $(c_snapg[85][7]:%.17g) $(c_snapg[85][8]:%.17g) $(c_snapg[85][9]:%.17g) $(c_snapg[85][10]:%.17g) $(c_snapg[85][11]:%.17g) $(c_snapg[85][12]:%.17g) $(c_snapg[85][13]:%.17g) $(c_snapg[85][14]:%.17g) $(c_snapg[85][15]:%.17g) $(c_snapg[85][16]:%.17g) $(c_snapg[85][17]:%.17g) $(c_snapg[85][18]:%.17g) $(c_snapg[85][19]:%.17g) $(c_snapg[85][20]:%.17g) $(c_snapg[85][21]:%.17g) $(c_snapg[85][22]:%.17g) $(c_snapg[85][23]:%.17g) $(c_snapg[85][24]:%.17g) $(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
print "$(c_snapg[86][1]:%.17g) $(c_snapg[86][2]:%.17g) $(c_snapg[86][3]:%.17g) $(c_snapg[86][4]:%.17g) $(c_snapg[86][5]:%.17g) $(c_snapg[86][6]:%.17g) $(c_snapg[86][7]:%.17g) $(c_snapg[86][8]:%.17g) $(c_snapg[86][9]:%.17g) $(c_snapg[86][10]:%.17g) $(c_snapg[86][11]:%.17g) $(c_snapg[86][12]:%.17g) $(c_snapg[86][13]:%.17g) $(c_snapg[86][14]:%.17g) $(c_snapg[86][15]:%.17g) $(c_snapg[86][16]:%.17g) $(c_snapg[86][17]:%.17g) $(c_snapg[86][18]:%.17g) $(c_snapg[86][19]:%.17g) $(c_snapg[86][20]:%.17g) $(c_snapg[86][21]:%.17g) $(c_snapg[86][22]:%.17g) $(c_snapg[86][23]:%.17g) $(c_snapg[86][24]:%.17g) $(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
print "$(c_snapg[87][1]:%.17g) $(c_snapg[87][2]:%.17g) $(c_snapg[87][3]:%.17g) $(c_snapg[87][4]:%.17g) $(c_snapg[87][5]:%.17g) $(c_snapg[87][6]:%.17g) $(c_snapg[87][7]:%.17g) $(c_snapg[87][8]:%.17g) $(c_snapg[87][9]:%.17g) $(c_snapg[87][10]:%.17g) $(c_snapg[87][11]:%.17g) $(c_snapg[87][12]:%.17g) $(c_snapg[87][13]:%.17g) $(c_snapg[87][14]:%.17g) $(c_snapg[87][15]:%.17g) $(c_snapg[87][16]:%.17g) $(c_snapg[87][17]:%.17g) $(c_snapg[87][18]:%.17g) $(c_snapg[87][19]:%.17g) $(c_snapg[87][20]:%.17g) $(c_snapg[87][21]:%.17g) $(c_snapg[87][22]:%.17g) $(c_snapg[87][23]:%.17g) $(c_snapg[87][24]:%.17g) $(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
print "$(c_snapg[88][1]:%.17g) $(c_snapg[88][2]:%.17g) $(c_snapg[88][3]:%.17g) $(c_snapg[88][4]:%.17g) $(c_snapg[88][5]:%.17g) $(c_snapg[88][6]:%.17g) $(c_snapg[88][7]:%.17g) $(c_snapg[88][8]:%.17g) $(c_snapg[88][9]:%.17g) $(c_snapg[88][10]:%.17g) $(c_snapg[88][11]:%.17g) $(c_snapg[88][12]:%.17g) $(c_snapg[88][13]:%.17g) $(c_snapg[88][14]:%.17g) $(c_snapg[88][15]:%.17g) $(c_snapg[88][16]:%.17g) $(c_snapg[88][17]:%.17g) $(c_snapg[88][18]:%.17g) $(c_snapg[88][19]:%.17g) $(c_snapg[88][20]:%.17g) $(c_snapg[88][21]:%.17g) $(c_snapg[88][22]:%.17g) $(c_snapg[88][23]:%.17g) $(c_snapg[88][24]:%.17g) $(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
print "$(c_snapg[89][1]:%.17g) $(c_snapg[89][2]:%.17g) $(c_snapg[89][3]:%.17g) $(c_snapg[89][4]:%.17g) $(c_snapg[89][5]:%.17g) $(c_snapg[89][6]:%.17g) $(c_snapg[89][7]:%.17g) $(c_snapg[89][8]:%.17g) $(c_snapg[89][9]:%.17g) $(c_snapg[89][10]:%.17g) $(c_snapg[89][11]:%.17g) $(c_snapg[89][12]:%.17g) $(c_snapg[89][13]:%.17g) $(c_snapg[89][14]:%.17g) $(c_snapg[89][15]:%.17g) $(c_snapg[89][16]:%.17g) $(c_snapg[89][17]:%.17g) $(c_snapg[89][18]:%.17g) $(c_snapg[89][19]:%.17g) $(c_snapg[89][20]:%.17g) $(c_snapg[89][21]:%.17g) $(c_snapg[89][22]:%.17g) $(c_snapg[89][23]:%.17g) $(c_snapg[89][24]:%.17g) $(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
print "$(c_snapg[90][1]:%.17g) $(c_snapg[90][2]:%.17g) $(c_snapg[90][3]:%.17g) $(c_snapg[90][4]:%.17g) $(c_snapg[90][5]:%.17g) $(c_snapg[90][6]:%.17g) $(c_snapg[90][7]:%.17g) $(c_snapg[90][8]:%.17g) $(c_snapg[90][9]:%.17g) $(c_snapg[90][10]:%.17g) $(c_snapg[90][11]:%.17g) $(c_snapg[90][12]:%.17g) $(c_snapg[90][13]:%.17g) $(c_snapg[90][14]:%.17g) $(c_snapg[90][15]:%.17g) $(c_snapg[90][16]:%.17g) $(c_snapg[90][17]:%.17g) $(c_snapg[90][18]:%.17g) $(c_snapg[90][19]:%.17g) $(c_snapg[90][20]:%.17g) $(c_snapg[90][21]:%.17g) $(c_snapg[90][22]:%.17g) $(c_snapg[90][23]:%.17g) $(c_snapg[90][24]:%.17g) $(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
print "$(c_snapg[91][1]:%.17g) $(c_snapg[91][2]:%.17g) $(c_snapg[91][3]:%.17g) $(c_snapg[91][4]:%.17g) $(c_snapg[91][5]:%.17g) $(c_snapg[91][6]:%.17g) $(c_snapg[91][7]:%.17g) $(c_snapg[91][8]:%.17g) $(c_snapg[91][9]:%.17g) $(c_snapg[91][10]:%.17g) $(c_snapg[91][11]:%.17g) $(c_snapg[91][12]:%.17g) $(c_snapg[91][13]:%.17g) $(c_snapg[91][14]:%.17g) $(c_snapg[91][15]:%.17g) $(c_snapg[91][16]:%.17g) $(c_snapg[91][17]:%.17g) $(c_snapg[91][18]:%.17g) $(c_snapg[91][19]:%.17g) $(c_snapg[91][20]:%.17g) $(c_snapg[91][21]:%.17g) $(c_snapg[91][22]:%.17g) $(c_snapg[91][23]:%.17g) $(c_snapg[91][24]:%.17g) $(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
print "$(c_snapg[92][1]:%.17g) $(c_snapg[92][2]:%.17g) $(c_snapg[92][3]:%.17g) $(c_snapg[92][4]:%.17g) $(c_snapg[92][5]:%.17g) $(c_snapg[92][6]:%.17g) $(c_snapg[92][7]:%.17g) $(c_snapg[92][8]:%.17g) $(c_snapg[92][9]:%.17g) $(c_snapg[92][10]:%.17g) $(c_snapg[92][11]:%.17g) $(c_snapg[92][12]:%.17g) $(c_snapg[92][13]:%.17g) $(c_snapg[92][14]:%.17g) $(c_snapg[92][15]:%.17g) $(c_snapg[92][16]:%.17g) $(c_snapg[92][17]:%.17g) $(c_snapg[92][18]:%.17g) $(c_snapg[92][19]:%.17g) $(c_snapg[92][20]:%.17g) $(c_snapg[92][21]:%.17g) $(c_snapg[92][22]:%.17g) $(c_snapg[92][23]:%.17g) $(c_snapg[92][24]:%.17g) $(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
print "$(c_snapg[93][1]:%.17g) $(c_snapg[93][2]:%.17g) $(c_snapg[93][3]:%.17g) $(c_snapg[93][4]:%.17g) $(c_snapg[93][5]:%.17g) $(c_snapg[93][6]:%.17g) $(c_snapg[93][7]:%.17g) $(c_snapg[93][8]:%.17g) $(c_snapg[93][9]:%.17g) $(c_snapg[93][10]:%.17g) $(c_snapg[93][11]:%.17g) $(c_snapg[93][12]:%.17g) $(c_snapg[93][13]:%.17g) $(c_snapg[93][14]:%.17g) $(c_snapg[93][15]:%.17g) $(c_snapg[93][16]:%.17g) $(c_snapg[93][17]:%.17g) $(c_snapg[93][18]:%.17g) $(c_snapg[93][19]:%.17g) $(c_snapg[93][20]:%.17g) $(c_snapg[93][21]:%.17g) $(c_snapg[93][22]:%.17g) $(c_snapg[93][23]:%.17g) $(c_snapg[93][24]:%.17g) $(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
print "$(c_snapg[94][1]:%.17g) $(c_snapg[94][2]:%.17g) $(c_snapg[94][3]:%.17g) $(c_snapg[94][4]:%.17g) $(c_snapg[94][5]:%.17g) $(c_snapg[94][6]:%.17g) $(c_snapg[94][7]:%.17g) $(c_snapg[94][8]:%.17g) $(c_snapg[94][9]:%.17g) $(c_snapg[94][10]:%.17g) $(c_snapg[94][11]:%.17g) $(c_snapg[94][12]:%.17g) $(c_snapg[94][13]:%.17g) $(c_snapg[94][14]:%.17g) $(c_snapg[94][15]:%.17g) $(c_snapg[94][16]:%.17g) $(c_snapg[94][17]:%.17g) $(c_snapg[94][18]:%.17g) $(c_snapg[94][19]:%.17g) $(c_snapg[94][20]:%.17g) $(c_snapg[94][21]:%.17g) $(c_snapg[94][22]:%.17g) $(c_snapg[94][23]:%.17g) $(c_snapg[94][24]:%.17g) $(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
print "$(c_snapg[95][1]:%.17g) $(c_snapg[95][2]:%.17g) $(c_snapg[95][3]:%.17g) $(c_snapg[95][4]:%.17g) $(c_snapg[95][5]:%.17g) $(c_snapg[95][6]:%.17g) $(c_snapg[95][7]:%.17g) $(c_snapg[95][8]:%.17g) $(c_snapg[95][9]:%.17g) $(c_snapg[95][10]:%.17g) $(c_snapg[95][11]:%.17g) $(c_snapg[95][12]:%.17g) $(c_snapg[95][13]:%.17g) $(c_snapg[95][14]:%.17g) $(c_snapg[95][15]:%.17g) $(c_snapg[95][16]:%.17g) $(c_snapg[95][17]:%.17g) $(c_snapg[95][18]:%.17g) $(c_snapg[95][19]:%.17g) $(c_snapg[95][20]:%.17g) $(c_snapg[95][21]:%.17g) $(c_snapg[95][22]:%.17g) $(c_snapg[95][23]:%.17g) $(c_snapg[95][24]:%.17g) $(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
print "$(c_snapg[96][1]:%.17g) $(c_snapg[96][2]:%.17g) $(c_snapg[96][3]:%.17g) $(c_snapg[96][4]:%.17g) $(c_snapg[96][5]:%.17g) $(c_snapg[96][6]:%.17g) $(c_snapg[96][7]:%.17g) $(c_snapg[96][8]:%.17g) $(c_snapg[96][9]:%.17g) $(c_snapg[96][10]:%.17g) $(c_snapg[96][11]:%.17g) $(c_snapg[96][12]:%.17g) $(c_snapg[96][13]:%.17g) $(c_snapg[96][14]:%.17g) $(c_snapg[96][15]:%.17g) $(c_snapg[96][16]:%.17g) $(c_snapg[96][17]:%.17g) $(c_snapg[96][18]:%.17g) $(c_snapg[96][19]:%.17g) $(c_snapg[96][20]:%.17g) $(c_snapg[96][21]:%.17g) $(c_snapg[96][22]:%.17g) $(c_snapg[96][23]:%.17g) $(c_snapg[96][24]:%.17g) $(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
print "$(c_snapg[97][1]:%.17g) $(c_snapg[97][2]:%.17g) $(c_snapg[97][3]:%.17g) $(c_snapg[97][4]:%.17g) $(c_snapg[97][5]:%.17g) $(c_snapg[97][6]:%.17g) $(c_snapg[97][7]:%.17g) $(c_snapg[97][8]:%.17g) $(c_snapg[97][9]:%.17g) $(c_snapg[97][10]:%.17g) $(c_snapg[97][11]:%.17g) $(c_snapg[97][12]:%.17g) $(c_snapg[97][13]:%.17g) $(c_snapg[97][14]:%.17g) $(c_snapg[97][15]:%.17g) $(c_snapg[97][16]:%.17g) $(c_snapg[97][17]:%.17g) $(c_snapg[97][18]:%.17g) $(c_snapg[97][19]:%.17g) $(c_snapg[97][20]:%.17g) $(c_snapg[97][21]:%.17g) $(c_snapg[97][22]:%.17g) $(c_snapg[97][23]:%.17g) $(c_snapg[97][24]:%.17g) $(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
print "$(c_snapg[98][1]:%.17g) $(c_snapg[98][2]:%.17g) $(c_snapg[98][3]:%.17g) $(c_snapg[98][4]:%.17g) $(c_snapg[98][5]:%.17g) $(c_snapg[98][6]:%.17g) $(c_snapg[98][7]:%.17g) $(c_snapg[98][8]:%.17g) $(c_snapg[98][9]:%.17g) $(c_snapg[98][10]:%.17g) $(c_snapg[98][11]:%.17g) $(c_snapg[98][12]:%.17g) $(c_snapg[98][13]:%.17g) $(c_snapg[98][14]:%.17g) $(c_snapg[98][15]:%.17g) $(c_snapg[98][16]:%.17g) $(c_snapg[98][17]:%.17g) $(c_snapg[98][18]:%.17g) $(c_snapg[98][19]:%.17g) $(c_snapg[98][20]:%.17g) $(c_snapg[98][21]:%.17g) $(c_snapg[98][22]:%.17g) $(c_snapg[98][23]:%.17g) $(c_snapg[98][24]:%.17g) $(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
print "$(c_snapg[99][1]:%.17g) $(c_snapg[99][2]:%.17g) $(c_snapg[99][3]:%.17g) $(c_snapg[99][4]:%.17g) $(c_snapg[99][5]:%.17g) $(c_snapg[99][6]:%.17g) $(c_snapg[99][7]:%.17g) $(c_snapg[99][8]:%.17g) $(c_snapg[99][9]:%.17g) $(c_snapg[99][10]:%.17g) $(c_snapg[99][11]:%.17g) $(c_snapg[99][12]:%.17g) $(c_snapg[99][13]:%.17g) $(c_snapg[99][14]:%.17g) $(c_snapg[99][15]:%.17g) $(c_snapg[99][16]:%.17g) $(c_snapg[99][17]:%.17g) $(c_snapg[99][18]:%.17g) $(c_snapg[99][19]:%.17g) $(c_snapg[99][20]:%.17g) $(c_snapg[99][21]:%.17g) $(c_snapg[99][22]:%.17g) $(c_snapg[99][23]:%.17g) $(c_snapg[99][24]:%.17g) $(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
print "$(c_snapg[100][1]:%.17g) $(c_snapg[100][2]:%.17g) $(c_snapg[100][3]:%.17g) $(c_snapg[100][4]:%.17g) $(c_snapg[100][5]:%.17g) $(c_snapg[100][6]:%.17g) $(c_snapg[100][7]:%.17g) $(c_snapg[100][8]:%.17g) $(c_snapg[100][9]:%.17g) $(c_snapg[100][10]:%.17g) $(c_snapg[100][11]:%.17g) $(c_snapg[100][12]:%.17g) $(c_snapg[100][13]:%.17g) $(c_snapg[100][14]:%.17g) $(c_snapg[100][15]:%.17g) $(c_snapg[100][16]:%.17g) $(c_snapg[100][17]:%.17g) $(c_snapg[100][18]:%.17g) $(c_snapg[100][19]:%.17g) $(c_snapg[100][20]:%.17g) $(c_snapg[100][21]:%.17g) $(c_snapg[100][22]:%.17g) $(c_snapg[100][23]:%.17g) $(c_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
print "$(c_snapg[101][1]:%.17g) $(c_snapg[101][2]:%.17g) $(c_snapg[101][3]:%.17g) $(c_snapg[101][4]:%.17g) $(c_snapg[101][5]:%.17g) $(c_snapg[101][6]:%.17g) $(c_snapg[101][7]:%.17g) $(c_snapg[101][8]:%.17g) $(c_snapg[101][9]:%.17g) $(c_snapg[101][10]:%.17g) $(c_snapg[101][11]:%.17g) $(c_snapg[101][12]:%.17g) $(c_snapg[101][13]:%.17g) $(c_snapg[101][14]:%.17g) $(c_snapg[101][15]:%.17g) $(c_snapg[101][16]:%.17g) $(c_snapg[101][17]:%.17g) $(c_snapg[101][18]:%.17g) $(c_snapg[101][19]:%.17g) $(c_snapg[101][20]:%.17g) $(c_snapg[101][21]:%.17g) $(c_snapg[101][22]:%.17g) $(c_snapg[101][23]:%.17g) $(c_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
print "$(c_snapg[102][1]:%.17g) $(c_snapg[102][2]:%.17g) $(c_snapg[102][3]:%.17g) $(c_snapg[102][4]:%.17g) $(c_snapg[102][5]:%.17g) $(c_snapg[102][6]:%.17g) $(c_snapg[102][7]:%.17g) $(c_snapg[102][8]:%.17g) $(c_snapg[102][9]:%.17g) $(c_snapg[102][10]:%.17g) $(c_snapg[102][11]:%.17g) $(c_snapg[102][12]:%.17g) $(c_snapg[102][13]:%.17g) $(c_snapg[102][14]:%.17g) $(c_snapg[102][15]:%.17g) $(c_snapg[102][16]:%.17g) $(c_snapg[102][17]:%.17g) $(c_snapg[102][18]:%.17g) $(c_snapg[102][19]:%.17g) $(c_snapg[102][20]:%.17g) $(c_snapg[102][21]:%.17g) $(c_snapg[102][22]:%.17g) $(c_snapg[102][23]:%.17g) $(c_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
print "$(c_snapg[103][1]:%.17g) $(c_snapg[103][2]:%.17g) $(c_snapg[103][3]:%.17g) $(c_snapg[103][4]:%.17g) $(c_snapg[103][5]:%.17g) $(c_snapg[103][6]:%.17g) $(c_snapg[103][7]:%.17g) $(c_snapg[103][8]:%.17g) $(c_snapg[103][9]:%.17g) $(c_snapg[103][10]:%.17g) $(c_snapg[103][11]:%.17g) $(c_snapg[103][12]:%.17g) $(c_snapg[103][13]:%.17g) $(c_snapg[103][14]:%.17g) $(c_snapg[103][15]:%.17g) $(c_snapg[103][16]:%.17g) $(c_snapg[103][17]:%.17g) $(c_snapg[103][18]:%.17g) $(c_snapg[103][19]:%.17g) $(c_snapg[103][20]:%.17g) $(c_snapg[103][21]:%.17g) $(c_snapg[103][22]:%.17g) $(c_snapg[103][23]:%.17g) $(c_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
print "$(c_snapg[104][1]:%.17g) $(c_snapg[104][2]:%.17g) $(c_snapg[104][3]:%.17g) $(c_snapg[104][4]:%.17g) $(c_snapg[104][5]:%.17g) $(c_snapg[104][6]:%.17g) $(c_snapg[104][7]:%.17g) $(c_snapg[104][8]:%.17g) $(c_snapg[104][9]:%.17g) $(c_snapg[104][10]:%.17g) $(c_snapg[104][11]:%.17g) $(c_snapg[104][12]:%.17g) $(c_snapg[104][13]:%.17g) $(c_snapg[104][14]:%.17g) $(c_snapg[104][15]:%.17g) $(c_snapg[104][16]:%.17g) $(c_snapg[104][17]:%.17g) $(c_snapg[104][18]:%.17g) $(c_snapg[104][19]:%.17g) $(c_snapg[104][20]:%.17g) $(c_snapg[104][21]:%.17g) $(c_snapg[104][22]:%.17g) $(c_snapg[104][23]:%.17g) $(c_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
print "$(c_snapg[105][1]:%.17g) $(c_snapg[105][2]:%.17g) $(c_snapg[105][3]:%.17g) $(c_snapg[105][4]:%.17g) $(c_snapg[105][5]:%.17g) $(c_snapg[105][6]:%.17g) $(c_snapg[105][7]:%.17g) $(c_snapg[105][8]:%.17g) $(c_snapg[105][9]:%.17g) $(c_snapg[105][10]:%.17g) $(c_snapg[105][11]:%.17g) $(c_snapg[105][12]:%.17g) $(c_snapg[105][13]:%.17g) $(c_snapg[105][14]:%.17g) $(c_snapg[105][15]:%.17g) $(c_snapg[105][16]:%.17g) $(c_snapg[105][17]:%.17g) $(c_snapg[105][18]:%.17g) $(c_snapg[105][19]:%.17g) $(c_snapg[105][20]:%.17g) $(c_snapg[105][21]:%.17g) $(c_snapg[105][22]:%.17g) $(c_snapg[105][23]:%.17g) $(c_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
print "$(c_snapg[106][1]:%.17g) $(c_snapg[106][2]:%.17g) $(c_snapg[106][3]:%.17g) $(c_snapg[106][4]:%.17g) $(c_snapg[106][5]:%.17g) $(c_snapg[106][6]:%.17g) $(c_snapg[106][7]:%.17g) $(c_snapg[106][8]:%.17g) $(c_snapg[106][9]:%.17g) $(c_snapg[106][10]:%.17g) $(c_snapg[106][11]:%.17g) $(c_snapg[106][12]:%.17g) $(c_snapg[106][13]:%.17g) $(c_snapg[106][14]:%.17g) $(c_snapg[106][15]:%.17g) $(c_snapg[106][16]:%.17g) $(c_snapg[106][17]:%.17g) $(c_snapg[106][18]:%.17g) $(c_snapg[106][19]:%.17g) $(c_snapg[106][20]:%.17g) $(c_snapg[106][21]:%.17g) $(c_snapg[106][22]:%.17g) $(c_snapg[106][23]:%.17g) $(c_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
print "$(c_snapg[107][1]:%.17g) $(c_snapg[107][2]:%.17g) $(c_snapg[107][3]:%.17g) $(c_snapg[107][4]:%.17g) $(c_snapg[107][5]:%.17g) $(c_snapg[107][6]:%.17g) $(c_snapg[107][7]:%.17g) $(c_snapg[107][8]:%.17g) $(c_snapg[107][9]:%.17g) $(c_snapg[107][10]:%.17g) $(c_snapg[107][11]:%.17g) $(c_snapg[107][12]:%.17g) $(c_snapg[107][13]:%.17g) $(c_snapg[107][14]:%.17g) $(c_snapg[107][15]:%.17g) $(c_snapg[107][16]:%.17g) $(c_snapg[107][17]:%.17g) $(c_snapg[107][18]:%.17g) $(c_snapg[107][19]:%.17g) $(c_snapg[107][20]:%.17g) $(c_snapg[107][21]:%.17g) $(c_snapg[107][22]:%.17g) $(c_snapg[107][23]:%.17g) $(c_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
print "$(c_snapg[108][1]:%.17g) $(c_snapg[108][2]:%.17g) $(c_snapg[108][3]:%.17g) $(c_snapg[108][4]:%.17g) $(c_snapg[108][5]:%.17g) $(c_snapg[108][6]:%.17g) $(c_snapg[108][7]:%.17g) $(c_snapg[108][8]:%.17g) $(c_snapg[108][9]:%.17g) $(c_snapg[108][10]:%.17g) $(c_snapg[108][11]:%.17g) $(c_snapg[108][12]:%.17g) $(c_snapg[108][13]:%.17g) $(c_snapg[108][14]:%.17g) $(c_snapg[108][15]:%.17g) $(c_snapg[108][16]:%.17g) $(c_snapg[108][17]:%.17g) $(c_snapg[108][18]:%.17g) $(c_snapg[108][19]:%.17g) $(c_snapg[108][20]:%.17g) $(c_snapg[108][21]:%.17g) $(c_snapg[108][22]:%.17g) $(c_snapg[108][23]:%.17g) $(c_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
print "$(c_snapg[109][1]:%.17g) $(c_snapg[109][2]:%.17g) $(c_snapg[109][3]:%.17g) $(c_snapg[109][4]:%.17g) $(c_snapg[109][5]:%.17g) $(c_snapg[109][6]:%.17g) $(c_snapg[109][7]:%.17g) $(c_snapg[109][8]:%.17g) $(c_snapg[109][9]:%.17g) $(c_snapg[109][10]:%.17g) $(c_snapg[109][11]:%.17g) $(c_snapg[109][12]:%.17g) $(c_snapg[109][13]:%.17g) $(c_snapg[109][14]:%.17g) $(c_snapg[109][15]:%.17g) $(c_snapg[109][16]:%.17g) $(c_snapg[109][17]:%.17g) $(c_snapg[109][18]:%.17g) $(c_snapg[109][19]:%.17g) $(c_snapg[109][20]:%.17g) $(c_snapg[109][21]:%.17g) $(c_snapg[109][22]:%.17g) $(c_snapg[109][23]:%.17g) $(c_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
print "$(c_snapg[110][1]:%.17g) $(c_snapg[110][2]:%.17g) $(c_snapg[110][3]:%.17g) $(c_snapg[110][4]:%.17g) $(c_snapg[110][5]:%.17g) $(c_snapg[110][6]:%.17g) $(c_snapg[110][7]:%.17g) $(c_snapg[110][8]:%.17g) $(c_snapg[110][9]:%.17g) $(c_snapg[110][10]:%.17g) $(c_snapg[110][11]:%.17g) $(c_snapg[110][12]:%.17g) $(c_snapg[110][13]:%.17g) $(c_snapg[110][14]:%.17g) $(c_snapg[110][15]:%.17g) $(c_snapg[110][16]:%.17g) $(c_snapg[110][17]:%.17g) $(c_snapg[110][18]:%.17g) $(c_snapg[110][19]:%.17g) $(c_snapg[110][20]:%.17g) $(c_snapg[110][21]:%.17g) $(c_snapg[110][22]:%.17g) $(c_snapg[110][23]:%.17g) $(c_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
print "$(c_snapg[111][1]:%.17g) $(c_snapg[111][2]:%.17g) $(c_snapg[111][3]:%.17g) $(c_snapg[111][4]:%.17g) $(c_snapg[111][5]:%.17g) $(c_snapg[111][6]:%.17g) $(c_snapg[111][7]:%.17g) $(c_snapg[111][8]:%.17g) $(c_snapg[111][9]:%.17g) $(c_snapg[111][10]:%.17g) $(c_snapg[111][11]:%.17g) $(c_snapg[111][12]:%.17g) $(c_snapg[111][13]:%.17g) $(c_snapg[111][14]:%.17g) $(c_snapg[111][15]:%.17g) $(c_snapg[111][16]:%.17g) $(c_snapg[111][17]:%.17g) $(c_snapg[111][18]:%.17g) $(c_snapg[111][19]:%.17g) $(c_snapg[111][20]:%.17g) $(c_snapg[111][21]:%.17g) $(c_snapg[111][22]:%.17g) $(c_snapg[111][23]:%.17g) $(c_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
print "$(c_snapg[112][1]:%.17g) $(c_snapg[112][2]:%.17g) $(c_snapg[112][3]:%.17g) $(c_snapg[112][4]:%.17g) $(c_snapg[112][5]:%.17g) $(c_snapg[112][6]:%.17g) $(c_snapg[112][7]:%.17g) $(c_snapg[112][8]:%.17g) $(c_snapg[112][9]:%.17g) $(c_snapg[112][10]:%.17g) $(c_snapg[112][11]:%.17g) $(c_snapg[112][12]:%.17g) $(c_snapg[112][13]:%.17g) $(c_snapg[112][14]:%.17g) $(c_snapg[112][15]:%.17g) $(c_snapg[112][16]:%.17g) $(c_snapg[112][17]:%.17g) $(c_snapg[112][18]:%.17g) $(c_snapg[112][19]:%.17g) $(c_snapg[112][20]:%.17g) $(c_snapg[112][21]:%.17g) $(c_snapg[112][22]:%.17g) $(c_snapg[112][23]:%.17g) $(c_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
print "$(c_snapg[113][1]:%.17g) $(c_snapg[113][2]:%.17g) $(c_snapg[113][3]:%.17g) $(c_snapg[113][4]:%.17g) $(c_snapg[113][5]:%.17g) $(c_snapg[113][6]:%.17g) $(c_snapg[113][7]:%.17g) $(c_snapg[113][8]:%.17g) $(c_snapg[113][9]:%.17g) $(c_snapg[113][10]:%.17g) $(c_snapg[113][11]:%.17g) $(c_snapg[113][12]:%.17g) $(c_snapg[113][13]:%.17g) $(c_snapg[113][14]:%.17g) $(c_snapg[113][15]:%.17g) $(c_snapg[113][16]:%.17g) $(c_snapg[113][17]:%.17g) $(c_snapg[113][18]:%.17g) $(c_snapg[113][19]:%.17g) $(c_snapg[113][20]:%.17g) $(c_snapg[113][21]:%.17g) $(c_snapg[113][22]:%.17g) $(c_snapg[113][23]:%.17g) $(c_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
print "$(c_snapg[114][1]:%.17g) $(c_snapg[114][2]:%.17g) $(c_snapg[114][3]:%.17g) $(c_snapg[114][4]:%.17g) $(c_snapg[114][5]:%.17g) $(c_snapg[114][6]:%.17g) $(c_snapg[114][7]:%.17g) $(c_snapg[114][8]:%.17g) $(c_snapg[114][9]:%.17g) $(c_snapg[114][10]:%.17g) $(c_snapg[114][11]:%.17g) $(c_snapg[114][12]:%.17g) $(c_snapg[114][13]:%.17g) $(c_snapg[114][14]:%.17g) $(c_snapg[114][15]:%.17g) $(c_snapg[114][16]:%.17g) $(c_snapg[114][17]:%.17g) $(c_snapg[114][18]:%.17g) $(c_snapg[114][19]:%.17g) $(c_snapg[114][20]:%.17g) $(c_snapg[114][21]:%.17g) $(c_snapg[114][22]:%.17g) $(c_snapg[114][23]:%.17g) $(c_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
print "$(c_snapg[115][1]:%.17g) $(c_snapg[115][2]:%.17g) $(c_snapg[115][3]:%.17g) $(c_snapg[115][4]:%.17g) $(c_snapg[115][5]:%.17g) $(c_snapg[115][6]:%.17g) $(c_snapg[115][7]:%.17g) $(c_snapg[115][8]:%.17g) $(c_snapg[115][9]:%.17g) $(c_snapg[115][10]:%.17g) $(c_snapg[115][11]:%.17g) $(c_snapg[115][12]:%.17g) $(c_snapg[115][13]:%.17g) $(c_snapg[115][14]:%.17g) $(c_snapg[115][15]:%.17g) $(c_snapg[115][16]:%.17g) $(c_snapg[115][17]:%.17g) $(c_snapg[115][18]:%.17g) $(c_snapg[115][19]:%.17g) $(c_snapg[115][20]:%.17g) $(c_snapg[115][21]:%.17g) $(c_snapg[115][22]:%.17g) $(c_snapg[115][23]:%.17g) $(c_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
print "$(c_snapg[116][1]:%.17g) $(c_snapg[116][2]:%.17g) $(c_snapg[116][3]:%.17g) $(c_snapg[116][4]:%.17g) $(c_snapg[116][5]:%.17g) $(c_snapg[116][6]:%.17g) $(c_snapg[116][7]:%.17g) $(c_snapg[116][8]:%.17g) $(c_snapg[116][9]:%.17g) $(c_snapg[116][10]:%.17g) $(c_snapg[116][11]:%.17g) $(c_snapg[116][12]:%.17g) $(c_snapg[116][13]:%.17g) $(c_snapg[116][14]:%.17g) $(c_snapg[116][15]:%.17g) $(c_snapg[116][16]:%.17g) $(c_snapg[116][17]:%.17g) $(c_snapg[116][18]:%.17g) $(c_snapg[116][19]:%.17g) $(c_snapg[116][20]:%.17g) $(c_snapg[116][21]:%.17g) $(c_snapg[116][22]:%.17g) $(c_snapg[116][23]:%.17g) $(c_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
print "$(c_snapg[117][1]:%.17g) $(c_snapg[117][2]:%.17g) $(c_snapg[117][3]:%.17g) $(c_snapg[117][4]:%.17g) $(c_snapg[117][5]:%.17g) $(c_snapg[117][6]:%.17g) $(c_snapg[117][7]:%.17g) $(c_snapg[117][8]:%.17g) $(c_snapg[117][9]:%.17g) $(c_snapg[117][10]:%.17g) $(c_snapg[117][11]:%.17g) $(c_snapg[117][12]:%.17g) $(c_snapg[117][13]:%.17g) $(c_snapg[117][14]:%.17g) $(c_snapg[117][15]:%.17g) $(c_snapg[117][16]:%.17g) $(c_snapg[117][17]:%.17g) $(c_snapg[117][18]:%.17g) $(c_snapg[117][19]:%.17g) $(c_snapg[117][20]:%.17g) $(c_snapg[117][21]:%.17g) $(c_snapg[117][22]:%.17g) $(c_snapg[117][23]:%.17g) $(c_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
print "$(c_snapg[118][1]:%.17g) $(c_snapg[118][2]:%.17g) $(c_snapg[118][3]:%.17g) $(c_snapg[118][4]:%.17g) $(c_snapg[118][5]:%.17g) $(c_snapg[118][6]:%.17g) $(c_snapg[118][7]:%.17g) $(c_snapg[118][8]:%.17g) $(c_snapg[118][9]:%.17g) $(c_snapg[118][10]:%.17g) $(c_snapg[118][11]:%.17g) $(c_snapg[118][12]:%.17g) $(c_snapg[118][13]:%.17g) $(c_snapg[118][14]:%.17g) $(c_snapg[118][15]:%.17g) $(c_snapg[118][16]:%.17g) $(c_snapg[118][17]:%.17g) $(c_snapg[118][18]:%.17g) $(c_snapg[118][19]:%.17g) $(c_snapg[118][20]:%.17g) $(c_snapg[118][21]:%.17g) $(c_snapg[118][22]:%.17g) $(c_snapg[118][23]:%.17g) $(c_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
print "$(c_snapg[119][1]:%.17g) $(c_snapg[119][2]:%.17g) $(c_snapg[119][3]:%.17g) $(c_snapg[119][4]:%.17g) $(c_snapg[119][5]:%.17g) $(c_snapg[119][6]:%.17g) $(c_snapg[119][7]:%.17g) $(c_snapg[119][8]:%.17g) $(c_snapg[119][9]:%.17g) $(c_snapg[119][10]:%.17g) $(c_snapg[119][11]:%.17g) $(c_snapg[119][12]:%.17g) $(c_snapg[119][13]:%.17g) $(c_snapg[119][14]:%.17g) $(c_snapg[119][15]:%.17g) $(c_snapg[119][16]:%.17g) $(c_snapg[119][17]:%.17g) $(c_snapg[119][18]:%.17g) $(c_snapg[119][19]:%.17g) $(c_snapg[119][20]:%.17g) $(c_snapg[119][21]:%.17g) $(c_snapg[119][22]:%.17g) $(c_snapg[119][23]:%.17g) $(c_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
print "$(c_snapg[120][1]:%.17g) $(c_snapg[120][2]:%.17g) $(c_snapg[120][3]:%.17g) $(c_snapg[120][4]:%.17g) $(c_snapg[120][5]:%.17g) $(c_snapg[120][6]:%.17g) $(c_snapg[120][7]:%.17g) $(c_snapg[120][8]:%.17g) $(c_snapg[120][9]:%.17g) $(c_snapg[120][10]:%.17g) $(c_snapg[120][11]:%.17g) $(c_snapg[120][12]:%.17g) $(c_snapg[120][13]:%.17g) $(c_snapg[120][14]:%.17g) $(c_snapg[120][15]:%.17g) $(c_snapg[120][16]:%.17g) $(c_snapg[120][17]:%.17g) $(c_snapg[120][18]:%.17g) $(c_snapg[120][19]:%.17g) $(c_snapg[120][20]:%.17g) $(c_snapg[120][21]:%.17g) $(c_snapg[120][22]:%.17g) $(c_snapg[120][23]:%.17g) $(c_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
print "$(c_snapg[121][1]:%.17g) $(c_snapg[121][2]:%.17g) $(c_snapg[121][3]:%.17g) $(c_snapg[121][4]:%.17g) $(c_snapg[121][5]:%.17g) $(c_snapg[121][6]:%.17g) $(c_snapg[121][7]:%.17g) $(c_snapg[121][8]:%.17g) $(c_snapg[121][9]:%.17g) $(c_snapg[121][10]:%.17g) $(c_snapg[121][11]:%.17g) $(c_snapg[121][12]:%.17g) $(c_snapg[121][13]:%.17g) $(c_snapg[121][14]:%.17g) $(c_snapg[121][15]:%.17g) $(c_snapg[121][16]:%.17g) $(c_snapg[121][17]:%.17g) $(c_snapg[121][18]:%.17g) $(c_snapg[121][19]:%.17g) $(c_snapg[121][20]:%.17g) $(c_snapg[121][21]:%.17g) $(c_snapg[121][22]:%.17g) $(c_snapg[121][23]:%.17g) $(c_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
print "$(c_snapg[122][1]:%.17g) $(c_snapg[122][2]:%.17g) $(c_snapg[122][3]:%.17g) $(c_snapg[122][4]:%.17g) $(c_snapg[122][5]:%.17g) $(c_snapg[122][6]:%.17g) $(c_snapg[122][7]:%.17g) $(c_snapg[122][8]:%.17g) $(c_snapg[122][9]:%.17g) $(c_snapg[122][10]:%.17g) $(c_snapg[122][11]:%.17g) $(c_snapg[122][12]:%.17g) $(c_snapg[122][13]:%.17g) $(c_snapg[122][14]:%.17g) $(c_snapg[122][15]:%.17g) $(c_snapg[122][16]:%.17g) $(c_snapg[122][17]:%.17g) $(c_snapg[122][18]:%.17g) $(c_snapg[122][19]:%.17g) $(c_snapg[122][20]:%.17g) $(c_snapg[122][21]:%.17g) $(c_snapg[122][22]:%.17g) $(c_snapg[122][23]:%.17g) $(c_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
print "$(c_snapg[123][1]:%.17g) $(c_snapg[123][2]:%.17g) $(c_snapg[123][3]:%.17g) $(c_snapg[123][4]:%.17g) $(c_snapg[123][5]:%.17g) $(c_snapg[123][6]:%.17g) $(c_snapg[123][7]:%.17g) $(c_snapg[123][8]:%.17g) $(c_snapg[123][9]:%.17g) $(c_snapg[123][10]:%.17g) $(c_snapg[123][11]:%.17g) $(c_snapg[123][12]:%.17g) $(c_snapg[123][13]:%.17g) $(c_snapg[123][14]:%.17g) $(c_snapg[123][15]:%.17g) $(c_snapg[123][16]:%.17g) $(c_snapg[123][17]:%.17g) $(c_snapg[123][18]:%.17g) $(c_snapg[123][19]:%.17g) $(c_snapg[123][20]:%.17g) $(c_snapg[123][21]:%.17g) $(c_snapg[123][22]:%.17g) $(c_snapg[123][23]:%.17g) $(c_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
print "$(c_snapg[124][1]:%.17g) $(c_snapg[124][2]:%.17g) $(c_snapg[124][3]:%.17g) $(c_snapg[124][4]:%.17g) $(c_snapg[124][5]:%.17g) $(c_snapg[124][6]:%.17g) $(c_snapg[124][7]:%.17g) $(c_snapg[124][8]:%.17g) $(c_snapg[124][9]:%.17g) $(c_snapg[124][10]:%.17g) $(c_snapg[124][11]:%.17g) $(c_snapg[124][12]:%.17g) $(c_snapg[124][13]:%.17g) $(c_snapg[124][14]:%.17g) $(c_snapg[124][15]:%.17g) $(c_snapg[124][16]:%.17g) $(c_snapg[124][17]:%.17g) $(c_snapg[124][18]:%.17g) $(c_snapg[124][19]:%.17g) $(c_snapg[124][20]:%.17g) $(c_snapg[124][21]:%.17g) $(c_snapg[124][22]:%.17g) $(c_snapg[124][23]:%.17g) $(c_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
print "$(c_snapg[125][1]:%.17g) $(c_snapg[125][2]:%.17g) $(c_snapg[125][3]:%.17g) $(c_snapg[125][4]:%.17g) $(c_snapg[125][5]:%.17g) $(c_snapg[125][6]:%.17g) $(c_snapg[125][7]:%.17g) $(c_snapg[125][8]:%.17g) $(c_snapg[125][9]:%.17g) $(c_snapg[125][10]:%.17g) $(c_snapg[125][11]:%.17g) $(c_snapg[125][12]:%.17g) $(c_snapg[125][13]:%.17g) $(c_snapg[125][14]:%.17g) $(c_snapg[125][15]:%.17g) $(c_snapg[125][16]:%.17g) $(c_snapg[125][17]:%.17g) $(c_snapg[125][18]:%.17g) $(c_snapg[125][19]:%.17g) $(c_snapg[125][20]:%.17g) $(c_snapg[125][21]:%.17g) $(c_snapg[125][22]:%.17g) $(c_snapg[125][23]:%.17g) $(c_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
print "$(c_snapg[126][1]:%.17g) $(c_snapg[126][2]:%.17g) $(c_snapg[126][3]:%.17g) $(c_snapg[126][4]:%.17g) $(c_snapg[126][5]:%.17g) $(c_snapg[126][6]:%.17g) $(c_snapg[126][7]:%.17g) $(c_snapg[126][8]:%.17g) $(c_snapg[126][9]:%.17g) $(c_snapg[126][10]:%.17g) $(c_snapg[126][11]:%.17g) $(c_snapg[126][12]:%.17g) $(c_snapg[126][13]:%.17g) $(c_snapg[126][14]:%.17g) $(c_snapg[126][15]:%.17g) $(c_snapg[126][16]:%.17g) $(c_snapg[126][17]:%.17g) $(c_snapg[126][18]:%.17g) $(c_snapg[126][19]:%.17g) $(c_snapg[126][20]:%.17g) $(c_snapg[126][21]:%.17g) $(c_snapg[126][22]:%.17g) $(c_snapg[126][23]:%.17g) $(c_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
print "$(c_snapg[127][1]:%.17g) $(c_snapg[127][2]:%.17g) $(c_snapg[127][3]:%.17g) $(c_snapg[127][4]:%.17g) $(c_snapg[127][5]:%.17g) $(c_snapg[127][6]:%.17g) $(c_snapg[127][7]:%.17g) $(c_snapg[127][8]:%.17g) $(c_snapg[127][9]:%.17g) $(c_snapg[127][10]:%.17g) $(c_snapg[127][11]:%.17g) $(c_snapg[127][12]:%.17g) $(c_snapg[127][13]:%.17g) $(c_snapg[127][14]:%.17g) $(c_snapg[127][15]:%.17g) $(c_snapg[127][16]:%.17g) $(c_snapg[127][17]:%.17g) $(c_snapg[127][18]:%.17g) $(c_snapg[127][19]:%.17g) $(c_snapg[127][20]:%.17g) $(c_snapg[127][21]:%.17g) $(c_snapg[127][22]:%.17g) $(c_snapg[127][23]:%.17g) $(c_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
print "$(c_snapg[128][1]:%.17g) $(c_snapg[128][2]:%.17g) $(c_snapg[128][3]:%.17g) $(c_snapg[128][4]:%.17g) $(c_snapg[128][5]:%.17g) $(c_snapg[128][6]:%.17g) $(c_snapg[128][7]:%.17g) $(c_snapg[128][8]:%.17g) $(c_snapg[128][9]:%.17g) $(c_snapg[128][10]:%.17g) $(c_snapg[128][11]:%.17g) $(c_snapg[128][12]:%.17g) $(c_snapg[128][13]:%.17g) $(c_snapg[128][14]:%.17g) $(c_snapg[128][15]:%.17g) $(c_snapg[128][16]:%.17g) $(c_snapg[128][17]:%.17g) $(c_snapg[128][18]:%.17g) $(c_snapg[128][19]:%.17g) $(c_snapg[128][20]:%.17g) $(c_snapg[128][21]:%.17g) $(c_snapg[128][22]:%.17g) $(c_snapg[128][23]:%.17g) $(c_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
print "$(c_snapg[129][1]:%.17g) $(c_snapg[129][2]:%.17g) $(c_snapg[129][3]:%.17g) $(c_snapg[129][4]:%.17g) $(c_snapg[129][5]:%.17g) $(c_snapg[129][6]:%.17g) $(c_snapg[129][7]:%.17g) $(c_snapg[129][8]:%.17g) $(c_snapg[129][9]:%.17g) $(c_snapg[129][10]:%.17g) $(c_snapg[129][11]:%.17g) $(c_snapg[129][12]:%.17g) $(c_snapg[129][13]:%.17g) $(c_snapg[129][14]:%.17g) $(c_snapg[129][15]:%.17g) $(c_snapg[129][16]:%.17g) $(c_snapg[129][17]:%.17g) $(c_snapg[129][18]:%.17g) $(c_snapg[129][19]:%.17g) $(c_snapg[129][20]:%.17g) $(c_snapg[129][21]:%.17g) $(c_snapg[129][22]:%.17g) $(c_snapg[129][23]:%.17g) $(c_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
print "$(c_snapg[130][1]:%.17g) $(c_snapg[130][2]:%.17g) $(c_snapg[130][3]:%.17g) $(c_snapg[130][4]:%.17g) $(c_snapg[130][5]:%.17g) $(c_snapg[130][6]:%.17g) $(c_snapg[130][7]:%.17g) $(c_snapg[130][8]:%.17g) $(c_snapg[130][9]:%.17g) $(c_snapg[130][10]:%.17g) $(c_snapg[130][11]:%.17g) $(c_snapg[130][12]:%.17g) $(c_snapg[130][13]:%.17g) $(c_snapg[130][14]:%.17g) $(c_snapg[130][15]:%.17g) $(c_snapg[130][16]:%.17g) $(c_snapg[130][17]:%.17g) $(c_snapg[130][18]:%.17g) $(c_snapg[130][19]:%.17g) $(c_snapg[130][20]:%.17g) $(c_snapg[130][21]:%.17g) $(c_snapg[130][22]:%.17g) $(c_snapg[130][23]:%.17g) $(c_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
print "$(c_snapg[131][1]:%.17g) $(c_snapg[131][2]:%.17g) $(c_snapg[131][3]:%.17g) $(c_snapg[131][4]:%.17g) $(c_snapg[131][5]:%.17g) $(c_snapg[131][6]:%.17g) $(c_snapg[131][7]:%.17g) $(c_snapg[131][8]:%.17g) $(c_snapg[131][9]:%.17g) $(c_snapg[131][10]:%.17g) $(c_snapg[131][11]:%.17g) $(c_snapg[131][12]:%.17g) $(c_snapg[131][13]:%.17g) $(c_snapg[131][14]:%.17g) $(c_snapg[131][15]:%.17g) $(c_snapg[131][16]:%.17g) $(c_snapg[131][17]:%.17g) $(c_snapg[131][18]:%.17g) $(c_snapg[131][19]:%.17g) $(c_snapg[131][20]:%.17g) $(c_snapg[131][21]:%.17g) $(c_snapg[131][22]:%.17g) $(c_snapg[131][23]:%.17g) $(c_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
print "$(c_snapg[132][1]:%.17g) $(c_snapg[132][2]:%.17g) $(c_snapg[132][3]:%.17g) $(c_snapg[132][4]:%.17g) $(c_snapg[132][5]:%.17g) $(c_snapg[132][6]:%.17g) $(c_snapg[132][7]:%.17g) $(c_snapg[132][8]:%.17g) $(c_snapg[132][9]:%.17g) $(c_snapg[132][10]:%.17g) $(c_snapg[132][11]:%.17g) $(c_snapg[132][12]:%.17g) $(c_snapg[132][13]:%.17g) $(c_snapg[132][14]:%.17g) $(c_snapg[132][15]:%.17g) $(c_snapg[132][16]:%.17g) $(c_snapg[132][17]:%.17g) $(c_snapg[132][18]:%.17g) $(c_snapg[132][19]:%.17g) $(c_snapg[132][20]:%.17g) $(c_snapg[132][21]:%.17g) $(c_snapg[132][22]:%.17g) $(c_snapg[132][23]:%.17g) $(c_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
print "$(c_snapg[133][1]:%.17g) $(c_snapg[133][2]:%.17g) $(c_snapg[133][3]:%.17g) $(c_snapg[133][4]:%.17g) $(c_snapg[133][5]:%.17g) $(c_snapg[133][6]:%.17g) $(c_snapg[133][7]:%.17g) $(c_snapg[133][8]:%.17g) $(c_snapg[133][9]:%.17g) $(c_snapg[133][10]:%.17g) $(c_snapg[133][11]:%.17g) $(c_snapg[133][12]:%.17g) $(c_snapg[133][13]:%.17g) $(c_snapg[133][14]:%.17g) $(c_snapg[133][15]:%.17g) $(c_snapg[133][16]:%.17g) $(c_snapg[133][17]:%.17g) $(c_snapg[133][18]:%.17g) $(c_snapg[133][19]:%.17g) $(c_snapg[133][20]:%.17g) $(c_snapg[133][21]:%.17g) $(c_snapg[133][22]:%.17g) $(c_snapg[133][23]:%.17g) $(c_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
print "$(c_snapg[134][1]:%.17g) $(c_snapg[134][2]:%.17g) $(c_snapg[134][3]:%.17g) $(c_snapg[134][4]:%.17g) $(c_snapg[134][5]:%.17g) $(c_snapg[134][6]:%.17g) $(c_snapg[134][7]:%.17g) $(c_snapg[134][8]:%.17g) $(c_snapg[134][9]:%.17g) $(c_snapg[134][10]:%.17g) $(c_snapg[134][11]:%.17g) $(c_snapg[134][12]:%.17g) $(c_snapg[134][13]:%.17g) $(c_snapg[134][14]:%.17g) $(c_snapg[134][15]:%.17g) $(c_snapg[134][16]:%.17g) $(c_snapg[134][17]:%.17g) $(c_snapg[134][18]:%.17g) $(c_snapg[134][19]:%.17g) $(c_snapg[134][20]:%.17g) $(c_snapg[134][21]:%.17g) $(c_snapg[134][22]:%.17g) $(c_snapg[134][23]:%.17g) $(c_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
print "$(c_snapg[135][1]:%.17g) $(c_snapg[135][2]:%.17g) $(c_snapg[135][3]:%.17g) $(c_snapg[135][4]:%.17g) $(c_snapg[135][5]:%.17g) $(c_snapg[135][6]:%.17g) $(c_snapg[135][7]:%.17g) $(c_snapg[135][8]:%.17g) $(c_snapg[135][9]:%.17g) $(c_snapg[135][10]:%.17g) $(c_snapg[135][11]:%.17g) $(c_snapg[135][12]:%.17g) $(c_snapg[135][13]:%.17g) $(c_snapg[135][14]:%.17g) $(c_snapg[135][15]:%.17g) $(c_snapg[135][16]:%.17g) $(c_snapg[135][17]:%.17g) $(c_snapg[135][18]:%.17g) $(c_snapg[135][19]:%.17g) $(c_snapg[135][20]:%.17g) $(c_snapg[135][21]:%.17g) $(c_snapg[135][22]:%.17g) $(c_snapg[135][23]:%.17g) $(c_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
print "$(c_snapg[136][1]:%.17g) $(c_snapg[136][2]:%.17g) $(c_snapg[136][3]:%.17g) $(c_snapg[136][4]:%.17g) $(c_snapg[136][5]:%.17g) $(c_snapg[136][6]:%.17g) $(c_snapg[136][7]:%.17g) $(c_snapg[136][8]:%.17g) $(c_snapg[136][9]:%.17g) $(c_snapg[136][10]:%.17g) $(c_snapg[136][11]:%.17g) $(c_snapg[136][12]:%.17g) $(c_snapg[136][13]:%.17g) $(c_snapg[136][14]:%.17g) $(c_snapg[136][15]:%.17g) $(c_snapg[136][16]:%.17g) $(c_snapg[136][17]:%.17g) $(c_snapg[136][18]:%.17g) $(c_snapg[136][19]:%.17g) $(c_snapg[136][20]:%.17g) $(c_snapg[136][21]:%.17g) $(c_snapg[136][22]:%.17g) $(c_snapg[136][23]:%.17g) $(c_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
print "$(c_snapg[137][1]:%.17g) $(c_snapg[137][2]:%.17g) $(c_snapg[137][3]:%.17g) $(c_snapg[137][4]:%.17g) $(c_snapg[137][5]:%.17g) $(c_snapg[137][6]:%.17g) $(c_snapg[137][7]:%.17g) $(c_snapg[137][8]:%.17g) $(c_snapg[137][9]:%.17g) $(c_snapg[137][10]:%.17g) $(c_snapg[137][11]:%.17g) $(c_snapg[137][12]:%.17g) $(c_snapg[137][13]:%.17g) $(c_snapg[137][14]:%.17g) $(c_snapg[137][15]:%.17g) $(c_snapg[137][16]:%.17g) $(c_snapg[137][17]:%.17g) $(c_snapg[137][18]:%.17g) $(c_snapg[137][19]:%.17g) $(c_snapg[137][20]:%.17g) $(c_snapg[137][21]:%.17g) $(c_snapg[137][22]:%.17g) $(c_snapg[137][23]:%.17g) $(c_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
print "$(c_snapg[138][1]:%.17g) $(c_snapg[138][2]:%.17g) $(c_snapg[138][3]:%.17g) $(c_snapg[138][4]:%.17g) $(c_snapg[138][5]:%.17g) $(c_snapg[138][6]:%.17g) $(c_snapg[138][7]:%.17g) $(c_snapg[138][8]:%.17g) $(c_snapg[138][9]:%.17g) $(c_snapg[138][10]:%.17g) $(c_snapg[138][11]:%.17g) $(c_snapg[138][12]:%.17g) $(c_snapg[138][13]:%.17g) $(c_snapg[138][14]:%.17g) $(c_snapg[138][15]:%.17g) $(c_snapg[138][16]:%.17g) $(c_snapg[138][17]:%.17g) $(c_snapg[138][18]:%.17g) $(c_snapg[138][19]:%.17g) $(c_snapg[138][20]:%.17g) $(c_snapg[138][21]:%.17g) $(c_snapg[138][22]:%.17g) $(c_snapg[138][23]:%.17g) $(c_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
print "$(c_snapg[139][1]:%.17g) $(c_snapg[139][2]:%.17g) $(c_snapg[139][3]:%.17g) $(c_snapg[139][4]:%.17g) $(c_snapg[139][5]:%.17g) $(c_snapg[139][6]:%.17g) $(c_snapg[139][7]:%.17g) $(c_snapg[139][8]:%.17g) $(c_snapg[139][9]:%.17g) $(c_snapg[139][10]:%.17g) $(c_snapg[139][11]:%.17g) $(c_snapg[139][12]:%.17g) $(c_snapg[139][13]:%.17g) $(c_snapg[139][14]:%.17g) $(c_snapg[139][15]:%.17g) $(c_snapg[139][16]:%.17g) $(c_snapg[139][17]:%.17g) $(c_snapg[139][18]:%.17g) $(c_snapg[139][19]:%.17g) $(c_snapg[139][20]:%.17g) $(c_snapg[139][21]:%.17g) $(c_snapg[139][22]:%.17g) $(c_snapg[139][23]:%.17g) $(c_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
print "$(c_snapg[140][1]:%.17g) $(c_snapg[140][2]:%.17g) $(c_snapg[140][3]:%.17g) $(c_snapg[140][4]:%.17g) $(c_snapg[140][5]:%.17g) $(c_snapg[140][6]:%.17g) $(c_snapg[140][7]:%.17g) $(c_snapg[140][8]:%.17g) $(c_snapg[140][9]:%.17g) $(c_snapg[140][10]:%.17g) $(c_snapg[140][11]:%.17g) $(c_snapg[140][12]:%.17g) $(c_snapg[140][13]:%.17g) $(c_snapg[140][14]:%.17g) $(c_snapg[140][15]:%.17g) $(c_snapg[140][16]:%.17g) $(c_snapg[140][17]:%.17g) $(c_snapg[140][18]:%.17g) $(c_snapg[140][19]:%.17g) $(c_snapg[140][20]:%.17g) $(c_snapg[140][21]:%.17g) $(c_snapg[140][22]:%.17g) $(c_snapg[140][23]:%.17g) $(c_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
print "$(c_snapg[141][1]:%.17g) $(c_snapg[141][2]:%.17g) $(c_snapg[141][3]:%.17g) $(c_snapg[141][4]:%.17g) $(c_snapg[141][5]:%.17g) $(c_snapg[141][6]:%.17g) $(c_snapg[141][7]:%.17g) $(c_snapg[141][8]:%.17g) $(c_snapg[141][9]:%.17g) $(c_snapg[141][10]:%.17g) $(c_snapg[141][11]:%.17g) $(c_snapg[141][12]:%.17g) $(c_snapg[141][13]:%.17g) $(c_snapg[141][14]:%.17g) $(c_snapg[141][15]:%.17g) $(c_snapg[141][16]:%.17g) $(c_snapg[141][17]:%.17g) $(c_snapg[141][18]:%.17g) $(c_snapg[141][19]:%.17g) $(c_snapg[141][20]:%.17g) $(c_snapg[141][21]:%.17g) $(c_snapg[141][22]:%.17g) $(c_snapg[141][23]:%.17g) $(c_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
print "$(c_snapg[142][1]:%.17g) $(c_snapg[142][2]:%.17g) $(c_snapg[142][3]:%.17g) $(c_snapg[142][4]:%.17g) $(c_snapg[142][5]:%.17g) $(c_snapg[142][6]:%.17g) $(c_snapg[142][7]:%.17g) $(c_snapg[142][8]:%.17g) $(c_snapg[142][9]:%.17g) $(c_snapg[142][10]:%.17g) $(c_snapg[142][11]:%.17g) $(c_snapg[142][12]:%.17g) $(c_snapg[142][13]:%.17g) $(c_snapg[142][14]:%.17g) $(c_snapg[142][15]:%.17g) $(c_snapg[142][16]:%.17g) $(c_snapg[142][17]:%.17g) $(c_snapg[142][18]:%.17g) $(c_snapg[142][19]:%.17g) $(c_snapg[142][20]:%.17g) $(c_snapg[142][21]:%.17g) $(c_snapg[142][22]:%.17g) $(c_snapg[142][23]:%.17g) $(c_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
print "$(c_snapg[143][1]:%.17g) $(c_snapg[143][2]:%.17g) $(c_snapg[143][3]:%.17g) $(c_snapg[143][4]:%.17g) $(c_snapg[143][5]:%.17g) $(c_snapg[143][6]:%.17g) $(c_snapg[143][7]:%.17g) $(c_snapg[143][8]:%.17g) $(c_snapg[143][9]:%.17g) $(c_snapg[143][10]:%.17g) $(c_snapg[143][11]:%.17g) $(c_snapg[143][12]:%.17g) $(c_snapg[143][13]:%.17g) $(c_snapg[143][14]:%.17g) $(c_snapg[143][15]:%.17g) $(c_snapg[143][16]:%.17g) $(c_snapg[143][17]:%.17g) $(c_snapg[143][18]:%.17g) $(c_snapg[143][19]:%.17g) $(c_snapg[143][20]:%.17g) $(c_snapg[143][21]:%.17g) $(c_snapg[143][22]:%.17g) $(c_snapg[143][23]:%.17g) $(c_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
print "$(c_snapg[144][1]:%.17g) $(c_snapg[144][2]:%.17g) $(c_snapg[144][3]:%.17g) $(c_snapg[144][4]:%.17g) $(c_snapg[144][5]:%.17g) $(c_snapg[144][6]:%.17g) $(c_snapg[144][7]:%.17g) $(c_snapg[144][8]:%.17g) $(c_snapg[144][9]:%.17g) $(c_snapg[144][10]:%.17g) $(c_snapg[144][11]:%.17g) $(c_snapg[144][12]:%.17g) $(c_snapg[144][13]:%.17g) $(c_snapg[144][14]:%.17g) $(c_snapg[144][15]:%.17g) $(c_snapg[144][16]:%.17g) $(c_snapg[144][17]:%.17g) $(c_snapg[144][18]:%.17g) $(c_snapg[144][19]:%.17g) $(c_snapg[144][20]:%.17g) $(c_snapg[144][21]:%.17g) $(c_snapg[144][22]:%.17g) $(c_snapg[144][23]:%.17g) $(c_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
print "$(c_snapg[145][1]:%.17g) $(c_snapg[145][2]:%.17g) $(c_snapg[145][3]:%.17g) $(c_snapg[145][4]:%.17g) $(c_snapg[145][5]:%.17g) $(c_snapg[145][6]:%.17g) $(c_snapg[145][7]:%.17g) $(c_snapg[145][8]:%.17g) $(c_snapg[145][9]:%.17g) $(c_snapg[145][10]:%.17g) $(c_snapg[145][11]:%.17g) $(c_snapg[145][12]:%.17g) $(c_snapg[145][13]:%.17g) $(c_snapg[145][14]:%.17g) $(c_snapg[145][15]:%.17g) $(c_snapg[145][16]:%.17g) $(c_snapg[145][17]:%.17g) $(c_snapg[145][18]:%.17g) $(c_snapg[145][19]:%.17g) $(c_snapg[145][20]:%.17g) $(c_snapg[145][21]:%.17g) $(c_snapg[145][22]:%.17g) $(c_snapg[145][23]:%.17g) $(c_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
print "$(c_snapg[146][1]:%.17g) $(c_snapg[146][2]:%.17g) $(c_snapg[146][3]:%.17g) $(c_snapg[146][4]:%.17g) $(c_snapg[146][5]:%.17g) $(c_snapg[146][6]:%.17g) $(c_snapg[146][7]:%.17g) $(c_snapg[146][8]:%.17g) $(c_snapg[146][9]:%.17g) $(c_snapg[146][10]:%.17g) $(c_snapg[146][11]:%.17g) $(c_snapg[146][12]:%.17g) $(c_snapg[146][13]:%.17g) $(c_snapg[146][14]:%.17g) $(c_snapg[146][15]:%.17g) $(c_snapg[146][16]:%.17g) $(c_snapg[146][17]:%.17g) $(c_snapg[146][18]:%.17g) $(c_snapg[146][19]:%.17g) $(c_snapg[146][20]:%.17g) $(c_snapg[146][21]:%.17g) $(c_snapg[146][22]:%.17g) $(c_snapg[146][23]:%.17g) $(c_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
print "$(c_snapg[147][1]:%.17g) $(c_snapg[147][2]:%.17g) $(c_snapg[147][3]:%.17g) $(c_snapg[147][4]:%.17g) $(c_snapg[147][5]:%.17g) $(c_snapg[147][6]:%.17g) $(c_snapg[147][7]:%.17g) $(c_snapg[147][8]:%.17g) $(c_snapg[147][9]:%.17g) $(c_snapg[147][10]:%.17g) $(c_snapg[147][11]:%.17g) $(c_snapg[147][12]:%.17g) $(c_snapg[147][13]:%.17g) $(c_snapg[147][14]:%.17g) $(c_snapg[147][15]:%.17g) $(c_snapg[147][16]:%.17g) $(c_snapg[147][17]:%.17g) $(c_snapg[147][18]:%.17g) $(c_snapg[147][19]:%.17g) $(c_snapg[147][20]:%.17g) $(c_snapg[147][21]:%.17g) $(c_snapg[147][22]:%.17g) $(c_snapg[147][23]:%.17g) $(c_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
print "$(c_snapg[148][1]:%.17g) $(c_snapg[148][2]:%.17g) $(c_snapg[148][3]:%.17g) $(c_snapg[148][4]:%.17g) $(c_snapg[148][5]:%.17g) $(c_snapg[148][6]:%.17g) $(c_snapg[148][7]:%.17g) $(c_snapg[148][8]:%.17g) $(c_snapg[148][9]:%.17g) $(c_snapg[148][10]:%.17g) $(c_snapg[148][11]:%.17g) $(c_snapg[148][12]:%.17g) $(c_snapg[148][13]:%.17g) $(c_snapg[148][14]:%.17g) $(c_snapg[148][15]:%.17g) $(c_snapg[148][16]:%.17g) $(c_snapg[148][17]:%.17g) $(c_snapg[148][18]:%.17g) $(c_snapg[148][19]:%.17g) $(c_snapg[148][20]:%.17g) $(c_snapg[148][21]:%.17g) $(c_snapg[148][22]:%.17g) $(c_snapg[148][23]:%.17g) $(c_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
print "$(c_snapg[149][1]:%.17g) $(c_snapg[149][2]:%.17g) $(c_snapg[149][3]:%.17g) $(c_snapg[149][4]:%.17g) $(c_snapg[149][5]:%.17g) $(c_snapg[149][6]:%.17g) $(c_snapg[149][7]:%.17g) $(c_snapg[149][8]:%.17g) $(c_snapg[149][9]:%.17g) $(c_snapg[149][10]:%.17g) $(c_snapg[149][11]:%.17g) $(c_snapg[149][12]:%.17g) $(c_snapg[149][13]:%.17g) $(c_snapg[149][14]:%.17g) $(c_snapg[149][15]:%.17g) $(c_snapg[149][16]:%.17g) $(c_snapg[149][17]:%.17g) $(c_snapg[149][18]:%.17g) $(c_snapg[149][19]:%.17g) $(c_snapg[149][20]:%.17g) $(c_snapg[149][21]:%.17g) $(c_snapg[149][22]:%.17g) $(c_snapg[149][23]:%.17g) $(c_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
print "$(c_snapg[150][1]:%.17g) $(c_snapg[150][2]:%.17g) $(c_snapg[150][3]:%.17g) $(c_snapg[150][4]:%.17g) $(c_snapg[150][5]:%.17g) $(c_snapg[150][6]:%.17g) $(c_snapg[150][7]:%.17g) $(c_snapg[150][8]:%.17g) $(c_snapg[150][9]:%.17g) $(c_snapg[150][10]:%.17g) $(c_snapg[150][11]:%.17g) $(c_snapg[150][12]:%.17g) $(c_snapg[150][13]:%.17g) $(c_snapg[150][14]:%.17g) $(c_snapg[150][15]:%.17g) $(c_snapg[150][16]:%.17g) $(c_snapg[150][17]:%.17g) $(c_snapg[150][18]:%.17g) $(c_snapg[150][19]:%.17g) $(c_snapg[150][20]:%.17g) $(c_snapg[150][21]:%.17g) $(c_snapg[150][22]:%.17g) $(c_snapg[150][23]:%.17g) $(c_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
print "$(c_snapg[151][1]:%.17g) $(c_snapg[151][2]:%.17g) $(c_snapg[151][3]:%.17g) $(c_snapg[151][4]:%.17g) $(c_snapg[151][5]:%.17g) $(c_snapg[151][6]:%.17g) $(c_snapg[151][7]:%.17g) $(c_snapg[151][8]:%.17g) $(c_snapg[151][9]:%.17g) $(c_snapg[151][10]:%.17g) $(c_snapg[151][11]:%.17g) $(c_snapg[151][12]:%.17g) $(c_snapg[151][13]:%.17g) $(c_snapg[151][14]:%.17g) $(c_snapg[151][15]:%.17g) $(c_snapg[151][16]:%.17g) $(c_snapg[151][17]:%.17g) $(c_snapg[151][18]:%.17g) $(c_snapg[151][19]:%.17g) $(c_snapg[151][20]:%.17g) $(c_snapg[151][21]:%.17g) $(c_snapg[151][22]:%.17g) $(c_snapg[151][23]:%.17g) $(c_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
