# Minimal 2-atom (1 In + 1 P) LAMMPS ground truth for isolating exaStamp's
# compute_descriptor_snap_global chem_flag=true row-0 bug in a hand-traceable system.
# 13 rows (1+3*2+6), 480 cols (240 per type) + 1 trailing label col = 481.

units       metal
atom_style  atomic
boundary    p p p

read_data   InP_pair.lmp

pair_style  zero 8.5
pair_coeff  * *

variable    rcutfac  equal 1.0
variable    rfac0    equal 0.99363
variable    twojmax  equal 6
variable    radelem1 equal 3.81205
variable    radelem2 equal 3.82945
variable    wj1      equal 1.0
variable    wj2      equal 0.929316

compute snapg all snap ${rcutfac} ${rfac0} ${twojmax} ${radelem1} ${radelem2} ${wj1} ${wj2} rmin0 0.0 bzeroflag 1 quadraticflag 0 chem 2 0 1 bnormflag 1 wselfallflag 1

run         0

print "$(c_snapg[1][1]:%.17g) $(c_snapg[1][2]:%.17g) $(c_snapg[1][3]:%.17g) $(c_snapg[1][4]:%.17g) $(c_snapg[1][5]:%.17g) $(c_snapg[1][6]:%.17g) $(c_snapg[1][7]:%.17g) $(c_snapg[1][8]:%.17g) $(c_snapg[1][9]:%.17g) $(c_snapg[1][10]:%.17g) $(c_snapg[1][11]:%.17g) $(c_snapg[1][12]:%.17g) $(c_snapg[1][13]:%.17g) $(c_snapg[1][14]:%.17g) $(c_snapg[1][15]:%.17g) $(c_snapg[1][16]:%.17g) $(c_snapg[1][17]:%.17g) $(c_snapg[1][18]:%.17g) $(c_snapg[1][19]:%.17g) $(c_snapg[1][20]:%.17g) $(c_snapg[1][21]:%.17g) $(c_snapg[1][22]:%.17g) $(c_snapg[1][23]:%.17g) $(c_snapg[1][24]:%.17g) $(c_snapg[1][25]:%.17g) $(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
print "$(c_snapg[2][1]:%.17g) $(c_snapg[2][2]:%.17g) $(c_snapg[2][3]:%.17g) $(c_snapg[2][4]:%.17g) $(c_snapg[2][5]:%.17g) $(c_snapg[2][6]:%.17g) $(c_snapg[2][7]:%.17g) $(c_snapg[2][8]:%.17g) $(c_snapg[2][9]:%.17g) $(c_snapg[2][10]:%.17g) $(c_snapg[2][11]:%.17g) $(c_snapg[2][12]:%.17g) $(c_snapg[2][13]:%.17g) $(c_snapg[2][14]:%.17g) $(c_snapg[2][15]:%.17g) $(c_snapg[2][16]:%.17g) $(c_snapg[2][17]:%.17g) $(c_snapg[2][18]:%.17g) $(c_snapg[2][19]:%.17g) $(c_snapg[2][20]:%.17g) $(c_snapg[2][21]:%.17g) $(c_snapg[2][22]:%.17g) $(c_snapg[2][23]:%.17g) $(c_snapg[2][24]:%.17g) $(c_snapg[2][25]:%.17g) $(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
print "$(c_snapg[3][1]:%.17g) $(c_snapg[3][2]:%.17g) $(c_snapg[3][3]:%.17g) $(c_snapg[3][4]:%.17g) $(c_snapg[3][5]:%.17g) $(c_snapg[3][6]:%.17g) $(c_snapg[3][7]:%.17g) $(c_snapg[3][8]:%.17g) $(c_snapg[3][9]:%.17g) $(c_snapg[3][10]:%.17g) $(c_snapg[3][11]:%.17g) $(c_snapg[3][12]:%.17g) $(c_snapg[3][13]:%.17g) $(c_snapg[3][14]:%.17g) $(c_snapg[3][15]:%.17g) $(c_snapg[3][16]:%.17g) $(c_snapg[3][17]:%.17g) $(c_snapg[3][18]:%.17g) $(c_snapg[3][19]:%.17g) $(c_snapg[3][20]:%.17g) $(c_snapg[3][21]:%.17g) $(c_snapg[3][22]:%.17g) $(c_snapg[3][23]:%.17g) $(c_snapg[3][24]:%.17g) $(c_snapg[3][25]:%.17g) $(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
print "$(c_snapg[4][1]:%.17g) $(c_snapg[4][2]:%.17g) $(c_snapg[4][3]:%.17g) $(c_snapg[4][4]:%.17g) $(c_snapg[4][5]:%.17g) $(c_snapg[4][6]:%.17g) $(c_snapg[4][7]:%.17g) $(c_snapg[4][8]:%.17g) $(c_snapg[4][9]:%.17g) $(c_snapg[4][10]:%.17g) $(c_snapg[4][11]:%.17g) $(c_snapg[4][12]:%.17g) $(c_snapg[4][13]:%.17g) $(c_snapg[4][14]:%.17g) $(c_snapg[4][15]:%.17g) $(c_snapg[4][16]:%.17g) $(c_snapg[4][17]:%.17g) $(c_snapg[4][18]:%.17g) $(c_snapg[4][19]:%.17g) $(c_snapg[4][20]:%.17g) $(c_snapg[4][21]:%.17g) $(c_snapg[4][22]:%.17g) $(c_snapg[4][23]:%.17g) $(c_snapg[4][24]:%.17g) $(c_snapg[4][25]:%.17g) $(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
print "$(c_snapg[5][1]:%.17g) $(c_snapg[5][2]:%.17g) $(c_snapg[5][3]:%.17g) $(c_snapg[5][4]:%.17g) $(c_snapg[5][5]:%.17g) $(c_snapg[5][6]:%.17g) $(c_snapg[5][7]:%.17g) $(c_snapg[5][8]:%.17g) $(c_snapg[5][9]:%.17g) $(c_snapg[5][10]:%.17g) $(c_snapg[5][11]:%.17g) $(c_snapg[5][12]:%.17g) $(c_snapg[5][13]:%.17g) $(c_snapg[5][14]:%.17g) $(c_snapg[5][15]:%.17g) $(c_snapg[5][16]:%.17g) $(c_snapg[5][17]:%.17g) $(c_snapg[5][18]:%.17g) $(c_snapg[5][19]:%.17g) $(c_snapg[5][20]:%.17g) $(c_snapg[5][21]:%.17g) $(c_snapg[5][22]:%.17g) $(c_snapg[5][23]:%.17g) $(c_snapg[5][24]:%.17g) $(c_snapg[5][25]:%.17g) $(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
print "$(c_snapg[6][1]:%.17g) $(c_snapg[6][2]:%.17g) $(c_snapg[6][3]:%.17g) $(c_snapg[6][4]:%.17g) $(c_snapg[6][5]:%.17g) $(c_snapg[6][6]:%.17g) $(c_snapg[6][7]:%.17g) $(c_snapg[6][8]:%.17g) $(c_snapg[6][9]:%.17g) $(c_snapg[6][10]:%.17g) $(c_snapg[6][11]:%.17g) $(c_snapg[6][12]:%.17g) $(c_snapg[6][13]:%.17g) $(c_snapg[6][14]:%.17g) $(c_snapg[6][15]:%.17g) $(c_snapg[6][16]:%.17g) $(c_snapg[6][17]:%.17g) $(c_snapg[6][18]:%.17g) $(c_snapg[6][19]:%.17g) $(c_snapg[6][20]:%.17g) $(c_snapg[6][21]:%.17g) $(c_snapg[6][22]:%.17g) $(c_snapg[6][23]:%.17g) $(c_snapg[6][24]:%.17g) $(c_snapg[6][25]:%.17g) $(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
print "$(c_snapg[7][1]:%.17g) $(c_snapg[7][2]:%.17g) $(c_snapg[7][3]:%.17g) $(c_snapg[7][4]:%.17g) $(c_snapg[7][5]:%.17g) $(c_snapg[7][6]:%.17g) $(c_snapg[7][7]:%.17g) $(c_snapg[7][8]:%.17g) $(c_snapg[7][9]:%.17g) $(c_snapg[7][10]:%.17g) $(c_snapg[7][11]:%.17g) $(c_snapg[7][12]:%.17g) $(c_snapg[7][13]:%.17g) $(c_snapg[7][14]:%.17g) $(c_snapg[7][15]:%.17g) $(c_snapg[7][16]:%.17g) $(c_snapg[7][17]:%.17g) $(c_snapg[7][18]:%.17g) $(c_snapg[7][19]:%.17g) $(c_snapg[7][20]:%.17g) $(c_snapg[7][21]:%.17g) $(c_snapg[7][22]:%.17g) $(c_snapg[7][23]:%.17g) $(c_snapg[7][24]:%.17g) $(c_snapg[7][25]:%.17g) $(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
print "$(c_snapg[8][1]:%.17g) $(c_snapg[8][2]:%.17g) $(c_snapg[8][3]:%.17g) $(c_snapg[8][4]:%.17g) $(c_snapg[8][5]:%.17g) $(c_snapg[8][6]:%.17g) $(c_snapg[8][7]:%.17g) $(c_snapg[8][8]:%.17g) $(c_snapg[8][9]:%.17g) $(c_snapg[8][10]:%.17g) $(c_snapg[8][11]:%.17g) $(c_snapg[8][12]:%.17g) $(c_snapg[8][13]:%.17g) $(c_snapg[8][14]:%.17g) $(c_snapg[8][15]:%.17g) $(c_snapg[8][16]:%.17g) $(c_snapg[8][17]:%.17g) $(c_snapg[8][18]:%.17g) $(c_snapg[8][19]:%.17g) $(c_snapg[8][20]:%.17g) $(c_snapg[8][21]:%.17g) $(c_snapg[8][22]:%.17g) $(c_snapg[8][23]:%.17g) $(c_snapg[8][24]:%.17g) $(c_snapg[8][25]:%.17g) $(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
print "$(c_snapg[9][1]:%.17g) $(c_snapg[9][2]:%.17g) $(c_snapg[9][3]:%.17g) $(c_snapg[9][4]:%.17g) $(c_snapg[9][5]:%.17g) $(c_snapg[9][6]:%.17g) $(c_snapg[9][7]:%.17g) $(c_snapg[9][8]:%.17g) $(c_snapg[9][9]:%.17g) $(c_snapg[9][10]:%.17g) $(c_snapg[9][11]:%.17g) $(c_snapg[9][12]:%.17g) $(c_snapg[9][13]:%.17g) $(c_snapg[9][14]:%.17g) $(c_snapg[9][15]:%.17g) $(c_snapg[9][16]:%.17g) $(c_snapg[9][17]:%.17g) $(c_snapg[9][18]:%.17g) $(c_snapg[9][19]:%.17g) $(c_snapg[9][20]:%.17g) $(c_snapg[9][21]:%.17g) $(c_snapg[9][22]:%.17g) $(c_snapg[9][23]:%.17g) $(c_snapg[9][24]:%.17g) $(c_snapg[9][25]:%.17g) $(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
print "$(c_snapg[10][1]:%.17g) $(c_snapg[10][2]:%.17g) $(c_snapg[10][3]:%.17g) $(c_snapg[10][4]:%.17g) $(c_snapg[10][5]:%.17g) $(c_snapg[10][6]:%.17g) $(c_snapg[10][7]:%.17g) $(c_snapg[10][8]:%.17g) $(c_snapg[10][9]:%.17g) $(c_snapg[10][10]:%.17g) $(c_snapg[10][11]:%.17g) $(c_snapg[10][12]:%.17g) $(c_snapg[10][13]:%.17g) $(c_snapg[10][14]:%.17g) $(c_snapg[10][15]:%.17g) $(c_snapg[10][16]:%.17g) $(c_snapg[10][17]:%.17g) $(c_snapg[10][18]:%.17g) $(c_snapg[10][19]:%.17g) $(c_snapg[10][20]:%.17g) $(c_snapg[10][21]:%.17g) $(c_snapg[10][22]:%.17g) $(c_snapg[10][23]:%.17g) $(c_snapg[10][24]:%.17g) $(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
print "$(c_snapg[11][1]:%.17g) $(c_snapg[11][2]:%.17g) $(c_snapg[11][3]:%.17g) $(c_snapg[11][4]:%.17g) $(c_snapg[11][5]:%.17g) $(c_snapg[11][6]:%.17g) $(c_snapg[11][7]:%.17g) $(c_snapg[11][8]:%.17g) $(c_snapg[11][9]:%.17g) $(c_snapg[11][10]:%.17g) $(c_snapg[11][11]:%.17g) $(c_snapg[11][12]:%.17g) $(c_snapg[11][13]:%.17g) $(c_snapg[11][14]:%.17g) $(c_snapg[11][15]:%.17g) $(c_snapg[11][16]:%.17g) $(c_snapg[11][17]:%.17g) $(c_snapg[11][18]:%.17g) $(c_snapg[11][19]:%.17g) $(c_snapg[11][20]:%.17g) $(c_snapg[11][21]:%.17g) $(c_snapg[11][22]:%.17g) $(c_snapg[11][23]:%.17g) $(c_snapg[11][24]:%.17g) $(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
print "$(c_snapg[12][1]:%.17g) $(c_snapg[12][2]:%.17g) $(c_snapg[12][3]:%.17g) $(c_snapg[12][4]:%.17g) $(c_snapg[12][5]:%.17g) $(c_snapg[12][6]:%.17g) $(c_snapg[12][7]:%.17g) $(c_snapg[12][8]:%.17g) $(c_snapg[12][9]:%.17g) $(c_snapg[12][10]:%.17g) $(c_snapg[12][11]:%.17g) $(c_snapg[12][12]:%.17g) $(c_snapg[12][13]:%.17g) $(c_snapg[12][14]:%.17g) $(c_snapg[12][15]:%.17g) $(c_snapg[12][16]:%.17g) $(c_snapg[12][17]:%.17g) $(c_snapg[12][18]:%.17g) $(c_snapg[12][19]:%.17g) $(c_snapg[12][20]:%.17g) $(c_snapg[12][21]:%.17g) $(c_snapg[12][22]:%.17g) $(c_snapg[12][23]:%.17g) $(c_snapg[12][24]:%.17g) $(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
print "$(c_snapg[13][1]:%.17g) $(c_snapg[13][2]:%.17g) $(c_snapg[13][3]:%.17g) $(c_snapg[13][4]:%.17g) $(c_snapg[13][5]:%.17g) $(c_snapg[13][6]:%.17g) $(c_snapg[13][7]:%.17g) $(c_snapg[13][8]:%.17g) $(c_snapg[13][9]:%.17g) $(c_snapg[13][10]:%.17g) $(c_snapg[13][11]:%.17g) $(c_snapg[13][12]:%.17g) $(c_snapg[13][13]:%.17g) $(c_snapg[13][14]:%.17g) $(c_snapg[13][15]:%.17g) $(c_snapg[13][16]:%.17g) $(c_snapg[13][17]:%.17g) $(c_snapg[13][18]:%.17g) $(c_snapg[13][19]:%.17g) $(c_snapg[13][20]:%.17g) $(c_snapg[13][21]:%.17g) $(c_snapg[13][22]:%.17g) $(c_snapg[13][23]:%.17g) $(c_snapg[13][24]:%.17g) $(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
