units       metal
atom_style  atomic
boundary    p p p

read_data   InP_small_typeswap.lmp

pair_style  zero 8.5
pair_coeff  * *

variable    rcutfac  equal 1.0
variable    rfac0    equal 0.99363
variable    twojmax  equal 6
variable    radelem1 equal 3.81205
variable    radelem2 equal 3.82945
variable    wj1      equal 1.0
variable    wj2      equal 0.929316

compute snapg all snap ${rcutfac} ${rfac0} ${twojmax} ${radelem1} ${radelem2} ${wj1} ${wj2} rmin0 0.0 bzeroflag 1 quadraticflag 0 chem 2 0 1 bnormflag 1 wselfallflag 1

run         0

print "$(c_snapg[1][1]:%.17g) $(c_snapg[1][2]:%.17g) $(c_snapg[1][3]:%.17g) $(c_snapg[1][4]:%.17g) $(c_snapg[1][5]:%.17g) $(c_snapg[1][6]:%.17g) $(c_snapg[1][7]:%.17g) $(c_snapg[1][8]:%.17g) $(c_snapg[1][9]:%.17g) $(c_snapg[1][10]:%.17g) $(c_snapg[1][11]:%.17g) $(c_snapg[1][12]:%.17g) $(c_snapg[1][13]:%.17g) $(c_snapg[1][14]:%.17g) $(c_snapg[1][15]:%.17g) $(c_snapg[1][16]:%.17g) $(c_snapg[1][17]:%.17g) $(c_snapg[1][18]:%.17g) $(c_snapg[1][19]:%.17g) $(c_snapg[1][20]:%.17g) $(c_snapg[1][21]:%.17g) $(c_snapg[1][22]:%.17g) $(c_snapg[1][23]:%.17g) $(c_snapg[1][24]:%.17g) $(c_snapg[1][25]:%.17g) $(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
